2019-01-28
오후 05:44
$PROBLEM    PHENOBARBITAL IV P:ROOT F:BASE
$INPUT      ID TIME AMT BWT APGA DV MDV EVID
$DATA      PHENO
$SUBROUTINE ADVAN1 TRANS2
$PK
  TVCL = THETA(1)
  TVV  = THETA(2)
  CL   = TVCL * EXP(ETA(1))
  V    = TVV  * EXP(ETA(2))
  S1   = V
  K    = CL / V
  HALF = LOG(2) / K

$ERROR
  IPRE  = F
  W     = SQRT(THETA(3)**2 + THETA(4)**2 * IPRE**2)
  IRES  = DV - IPRE
  IWRE  = IRES / W
  Y     = IPRE + W * EPS(1)

$THETA  (0,0.01)
 (0,1)
 (0,1)
 (0,0.1)
$OMEGA  BLOCK(2)
 0.2
 0.1 0.2
$SIGMA  1  FIX
$ESTIMATION MAXEVAL=9999 PRINT=5 METHOD=COND INTER MSFO=THIS2005.MSF
            NOTBT NOOBT NOSBT NOABORT
$COVARIANCE UNCOND
$TABLE      ID TIME MDV IPRE IWRE CWRES FILE=sdtab2005 NOPRINT
            ONEHEADER
$TABLE      ID CL V K HALF ETA(1) ETA(2) FILE=patab2005 NOPRINT
            ONEHEADER NOAPPEND
$TABLE      ID BWT APGA FILE=cotab2005 NOPRINT ONEHEADER NOAPPEND
$TABLE      ID APGA FILE=catab2005 NOPRINT ONEHEADER NOAPPEND

NM-TRAN MESSAGES
 WARNINGS AND ERRORS (IF ANY) FOR PROBLEM    1
 (WARNING  2) NM-TRAN INFERS THAT THE DATA ARE POPULATION.

1NONLINEAR MIXED EFFECTS MODEL PROGRAM (NONMEM) VERSION 7.4.3
 ORIGINALLY DEVELOPED BY STUART BEAL, LEWIS SHEINER, AND ALISON BOECKMANN
 CURRENT DEVELOPERS ARE ROBERT BAUER, ICON DEVELOPMENT SOLUTIONS,
 AND ALISON BOECKMANN. IMPLEMENTATION, EFFICIENCY, AND STANDARDIZATION
 PERFORMED BY NOUS INFOSYSTEMS.
 PROBLEM NO.:         1
 PHENOBARBITAL IV P:ROOT F:BASE
 TOT. NO. OF OBS RECS:      155
 TOT. NO. OF INDIVIDUALS:       59
 ONE COMPARTMENT MODEL (ADVAN1)
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 #TBLN:      1
 #METH: First Order Conditional Estimation with Interaction
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
 #TERM:
0MINIMIZATION SUCCESSFUL
 NO. OF FUNCTION EVALUATIONS USED:      238
 NO. OF SIG. DIGITS IN FINAL EST.:  3.5

 ETABAR IS THE ARITHMETIC MEAN OF THE ETA-ESTIMATES,
 AND THE P-VALUE IS GIVEN FOR THE NULL HYPOTHESIS THAT THE TRUE MEAN IS 0.

 ETABAR:        -4.6542E-03 -3.9030E-03
 SE:             6.4054E-02  5.0241E-02
 N:                      59          59

 P VAL.:         9.4208E-01  9.3808E-01

 ETASHRINKSD(%)  1.5020E+00  1.1580E+00
 ETASHRINKVR(%)  2.9814E+00  2.3027E+00
 EBVSHRINKSD(%)  2.2368E+00  1.8965E+00
 EBVSHRINKVR(%)  4.4235E+00  3.7570E+00
 EPSSHRINKSD(%)  2.1210E+01
 EPSSHRINKVR(%)  3.7922E+01


 TOTAL DATA POINTS NORMALLY DISTRIBUTED (N):          155
 N*LOG(2PI) CONSTANT TO OBJECTIVE FUNCTION:    284.87094529344853
 OBJECTIVE FUNCTION VALUE WITHOUT CONSTANT:    685.52519217011718
 OBJECTIVE FUNCTION VALUE WITH CONSTANT:       970.39613746356576
 REPORTED OBJECTIVE FUNCTION DOES NOT CONTAIN CONSTANT

 TOTAL EFFECTIVE ETAS (NIND*NETA):                           118


 #TERE:
 Elapsed estimation  time in seconds:     0.85
 Elapsed covariance  time in seconds:     0.33
 Elapsed postprocess time in seconds:     0.02

 ********************               FIRST ORDER CONDITIONAL ESTIMATION WITH INTERACTION              ********************
 #OBJT:**************                       MINIMUM VALUE OF OBJECTIVE FUNCTION                      ********************
 #OBJV:********************************************      685.525       **************************************************

 ********************               FIRST ORDER CONDITIONAL ESTIMATION WITH INTERACTION              ********************
 ********************                             FINAL PARAMETER ESTIMATE                           ********************

 THETA - VECTOR OF FIXED EFFECTS PARAMETERS   *********
         TH 1      TH 2      TH 3      TH 4
         6.78E-03  1.41E+00  2.28E+00  6.40E-02

 OMEGA - COV MATRIX FOR RANDOM EFFECTS - ETAS  ********
         ETA1      ETA2
 ETA1
+        2.54E-01
 ETA2
+        1.97E-01  1.55E-01

 SIGMA - COV MATRIX FOR RANDOM EFFECTS - EPSILONS  ****
         EPS1
 EPS1
+        1.00E+00

 OMEGA - CORR MATRIX FOR RANDOM EFFECTS - ETAS  *******
         ETA1      ETA2
 ETA1
+        5.04E-01
 ETA2
+        9.91E-01  3.94E-01

 SIGMA - CORR MATRIX FOR RANDOM EFFECTS - EPSILONS  ***
         EPS1
 EPS1
+        1.00E+00

 ********************               FIRST ORDER CONDITIONAL ESTIMATION WITH INTERACTION              ********************
 ********************                            STANDARD ERROR OF ESTIMATE                          ********************

 THETA - VECTOR OF FIXED EFFECTS PARAMETERS   *********
         TH 1      TH 2      TH 3      TH 4
         5.17E-04  7.48E-02  7.40E-01  3.13E-02

 OMEGA - COV MATRIX FOR RANDOM EFFECTS - ETAS  ********
         ETA1      ETA2
 ETA1
+        7.61E-02
 ETA2
+        5.06E-02  3.98E-02

 SIGMA - COV MATRIX FOR RANDOM EFFECTS - EPSILONS  ****
         EPS1
 EPS1
+       .........

 OMEGA - CORR MATRIX FOR RANDOM EFFECTS - ETAS  *******
         ETA1      ETA2
 ETA1
+        7.55E-02
 ETA2
+        4.96E-02  5.05E-02

 SIGMA - CORR MATRIX FOR RANDOM EFFECTS - EPSILONS  ***
         EPS1
 EPS1
+       .........

 ********************               FIRST ORDER CONDITIONAL ESTIMATION WITH INTERACTION              ********************
 ********************                          COVARIANCE MATRIX OF ESTIMATE                         ********************

            TH 1      TH 2      TH 3      TH 4      OM11      OM12      OM22      SG11
 TH 1
+        2.67E-07
 TH 2
+        2.94E-05  5.59E-03
 TH 3
+       -7.21E-05 -2.48E-03  5.48E-01
 TH 4
+        2.15E-06 -1.46E-04 -2.03E-02  9.83E-04
 OM11
+        5.98E-06  2.83E-03  9.95E-03 -5.16E-04  5.79E-03
 OM12
+        9.36E-06  2.24E-03  4.24E-03 -2.24E-04  3.63E-03  2.56E-03
 OM22
+        1.18E-05  1.61E-03 -7.96E-03  2.83E-04  1.93E-03  1.66E-03  1.58E-03
 SG11
+       ......... ......... ......... ......... ......... ......... ......... .........

 ********************               FIRST ORDER CONDITIONAL ESTIMATION WITH INTERACTION              ********************
 ********************                          CORRELATION MATRIX OF ESTIMATE                        ********************

            TH 1      TH 2      TH 3      TH 4      OM11      OM12      OM22      SG11
 TH 1
+        5.17E-04
 TH 2
+        7.62E-01  7.48E-02
 TH 3
+       -1.88E-01 -4.49E-02  7.40E-01
 TH 4
+        1.33E-01 -6.22E-02 -8.76E-01  3.13E-02
 OM11
+        1.52E-01  4.97E-01  1.77E-01 -2.17E-01  7.61E-02
 OM12
+        3.58E-01  5.93E-01  1.13E-01 -1.41E-01  9.42E-01  5.06E-02
 OM22
+        5.73E-01  5.41E-01 -2.70E-01  2.27E-01  6.38E-01  8.26E-01  3.98E-02
 SG11
+       ......... ......... ......... ......... ......... ......... ......... .........
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 Elapsed finaloutput time in seconds:     0.23
 #CPUT: Total CPU Time in Seconds,        1.435
