2016-09-21
22:34
$PROB PHENOBARBITAL IV P:ROOT F:BASE
$INPUT ID TIME AMT BWT APGA DV MDV EVID
$DATA ../PHENO
$SUBR ADVAN1 TRANS2
$PK
  TVCL = THETA(1)
  TVV  = THETA(2)
  CL   = TVCL * EXP(ETA(1))
  V    = TVV  * EXP(ETA(2))
  S1   = V
  K    = CL / V
  HALF = LOG(2) / K

$ERROR
  IPRE  = F
  W     = SQRT(THETA(3)**2 + THETA(4)**2 * IPRE**2)
  IRES  = DV - IPRE
  IWRE  = IRES / W
  Y     = IPRE + W * EPS(1)

$THETA
  (0, 0.01)
  (0, 1)
  (0, 1)
  (0, 0.1)

$OMEGA BLOCK(2)
  0.2
  0.1 0.2

$SIGMA 1 FIX
$EST MAXEVAL=9999 PRINT=5 METHOD=COND INTER MSFO=THIS.MSF
     NOTBT NOOBT NOSBT NOABORT
$COV UNCOND
$TAB ID TIME MDV IPRE IWRE CWRES
     FILE=sdtab NOPRINT ONEHEADER
$TAB ID CL V K HALF ETA(1) ETA(2)
     FILE=patab NOPRINT ONEHEADER NOAPPEND
$TAB ID BWT APGA
     FILE=cotab NOPRINT ONEHEADER NOAPPEND
$TAB ID APGA
     FILE=catab NOPRINT ONEHEADER NOAPPEND

NM-TRAN MESSAGES
 WARNINGS AND ERRORS (IF ANY) FOR PROBLEM    1
 (WARNING  2) NM-TRAN INFERS THAT THE DATA ARE POPULATION.

1NONLINEAR MIXED EFFECTS MODEL PROGRAM (NONMEM) VERSION 7.3.0
 ORIGINALLY DEVELOPED BY STUART BEAL, LEWIS SHEINER, AND ALISON BOECKMANN
 CURRENT DEVELOPERS ARE ROBERT BAUER, ICON DEVELOPMENT SOLUTIONS,
 AND ALISON BOECKMANN. IMPLEMENTATION, EFFICIENCY, AND STANDARDIZATION
 PERFORMED BY NOUS INFOSYSTEMS.
 PROBLEM NO.:         1
 PHENOBARBITAL IV P:ROOT F:BASE
 TOT. NO. OF OBS RECS:      155
 TOT. NO. OF INDIVIDUALS:     59
 ONE COMPARTMENT MODEL (ADVAN1)
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 #TBLN:      1
 #METH: First Order Conditional Estimation with Interaction
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
 #TERM:
0MINIMIZATION SUCCESSFUL
 NO. OF FUNCTION EVALUATIONS USED:      229
 NO. OF SIG. DIGITS IN FINAL EST.:  3.6

 ETABAR IS THE ARITHMETIC MEAN OF THE ETA-ESTIMATES,
 AND THE P-VALUE IS GIVEN FOR THE NULL HYPOTHESIS THAT THE TRUE MEAN IS 0.

 ETABAR:        -4.6545E-03 -3.9034E-03
 SE:             6.4054E-02  5.0241E-02
 N:                      59          59

 P VAL.:         9.4207E-01  9.3807E-01

 ETAshrink(%):   1.5019E+00  1.1578E+00
 EBVshrink(%):   2.2369E+00  1.8965E+00
 EPSshrink(%):   2.1210E+01

 #TERE:
 Elapsed estimation time in seconds:     1.06
 Elapsed covariance time in seconds:     0.36

 ********************               FIRST ORDER CONDITIONAL ESTIMATION WITH INTERACTION              ********************
 #OBJT:**************                       MINIMUM VALUE OF OBJECTIVE FUNCTION                      ********************
 #OBJV:********************************************      685.525       **************************************************

 ********************               FIRST ORDER CONDITIONAL ESTIMATION WITH INTERACTION              ********************
 ********************                             FINAL PARAMETER ESTIMATE                           ********************

 THETA - VECTOR OF FIXED EFFECTS PARAMETERS   *********
         TH 1      TH 2      TH 3      TH 4
         6.78E-03  1.41E+00  2.28E+00  6.40E-02

 OMEGA - COV MATRIX FOR RANDOM EFFECTS - ETAS  ********
            ETA1      ETA2
 ETA1
+        2.54E-01
 ETA2
+        1.97E-01  1.55E-01

 SIGMA - COV MATRIX FOR RANDOM EFFECTS - EPSILONS  ****
            EPS1
 EPS1
+        1.00E+00

 OMEGA - CORR MATRIX FOR RANDOM EFFECTS - ETAS  *******
            ETA1      ETA2
 ETA1
+        5.04E-01
 ETA2
+        9.91E-01  3.94E-01

 SIGMA - CORR MATRIX FOR RANDOM EFFECTS - EPSILONS  ***
            EPS1
 EPS1
+        1.00E+00

 ********************               FIRST ORDER CONDITIONAL ESTIMATION WITH INTERACTION              ********************
 ********************                            STANDARD ERROR OF ESTIMATE                          ********************

 THETA - VECTOR OF FIXED EFFECTS PARAMETERS   *********
         TH 1      TH 2      TH 3      TH 4
         5.17E-04  7.48E-02  7.42E-01  3.15E-02

 OMEGA - COV MATRIX FOR RANDOM EFFECTS - ETAS  ********
            ETA1      ETA2
 ETA1
+        7.61E-02
 ETA2
+        5.06E-02  3.98E-02

 SIGMA - COV MATRIX FOR RANDOM EFFECTS - EPSILONS  ****
            EPS1
 EPS1
+       .........

 OMEGA - CORR MATRIX FOR RANDOM EFFECTS - ETAS  *******
            ETA1      ETA2
 ETA1
+        7.55E-02
 ETA2
+        4.97E-02  5.05E-02

 SIGMA - CORR MATRIX FOR RANDOM EFFECTS - EPSILONS  ***
            EPS1
 EPS1
+       .........

 ********************               FIRST ORDER CONDITIONAL ESTIMATION WITH INTERACTION              ********************
 ********************                          COVARIANCE MATRIX OF ESTIMATE                         ********************

            TH 1      TH 2      TH 3      TH 4      OM11      OM12      OM22      SG11
 TH 1
+        2.67E-07
 TH 2
+        2.95E-05  5.59E-03
 TH 3
+       -7.23E-05 -2.50E-03  5.51E-01
 TH 4
+        2.16E-06 -1.45E-04 -2.05E-02  9.90E-04
 OM11
+        5.98E-06  2.83E-03  9.96E-03 -5.17E-04  5.79E-03
 OM12
+        9.36E-06  2.24E-03  4.25E-03 -2.24E-04  3.63E-03  2.56E-03
 OM22
+        1.18E-05  1.61E-03 -7.99E-03  2.85E-04  1.93E-03  1.66E-03  1.58E-03
 SG11
+       ......... ......... ......... ......... ......... ......... ......... .........

 ********************               FIRST ORDER CONDITIONAL ESTIMATION WITH INTERACTION              ********************
 ********************                          CORRELATION MATRIX OF ESTIMATE                        ********************

            TH 1      TH 2      TH 3      TH 4      OM11      OM12      OM22      SG11
 TH 1
+        5.17E-04
 TH 2
+        7.62E-01  7.48E-02
 TH 3
+       -1.88E-01 -4.51E-02  7.42E-01
 TH 4
+        1.33E-01 -6.18E-02 -8.77E-01  3.15E-02
 OM11
+        1.52E-01  4.97E-01  1.76E-01 -2.16E-01  7.61E-02
 OM12
+        3.58E-01  5.93E-01  1.13E-01 -1.41E-01  9.42E-01  5.06E-02
 OM22
+        5.73E-01  5.41E-01 -2.71E-01  2.27E-01  6.38E-01  8.25E-01  3.98E-02
 SG11
+       ......... ......... ......... ......... ......... ......... ......... .........
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 #CPUT: Total CPU Time in Seconds,        1.406
