2018-08-31
오후 03:38
$PROB THEOPHYLLINE ORAL
$INPUT ID AMT=DROP TIME DV BWT
$DATA THEO
$PRED
  DOSE = 320
  KA   = THETA(1) * EXP(ETA(1))
  K    = THETA(2) * EXP(ETA(2))
  V    = THETA(3) * EXP(ETA(3))
  F    = DOSE / V * KA / (KA - K) * (EXP(-K*TIME) - EXP(-KA*TIME))
  IPRED= F
  Y    = F + F * EPS(1) + EPS(2)

  IF (ICALL.EQ.3) THEN
    WRITE (53,*) OMEGA(BLOCK)
    WRITE (54,*) SIGMA(BLOCK)
  ENDIF

$THETA (0, 5, 50) (0, 1, 10) (0, 50, 500)
$OMEGA BLOCK(3)
  0.2
  0.1  0.2
  0.1  0.1  0.2
$SIGMA 0.1  0.1
$EST MAX=9999 METHOD=ZERO
$COV UNCOND
$TAB ID TIME IPRED CWRES G11 G21 G31 H11 H21
     FILE=sdtabC01-1 NOPRINT ONEHEADER

NM-TRAN MESSAGES
 WARNINGS AND ERRORS (IF ANY) FOR PROBLEM    1
 (WARNING  2) NM-TRAN INFERS THAT THE DATA ARE POPULATION.
 (WARNING  13) WITH USER-WRITTEN PRED OR $PRED, NM-TRAN CANNOT APPEND THE
 MDV DATA ITEM.

1NONLINEAR MIXED EFFECTS MODEL PROGRAM (NONMEM) VERSION 7.4.3
 ORIGINALLY DEVELOPED BY STUART BEAL, LEWIS SHEINER, AND ALISON BOECKMANN
 CURRENT DEVELOPERS ARE ROBERT BAUER, ICON DEVELOPMENT SOLUTIONS,
 AND ALISON BOECKMANN. IMPLEMENTATION, EFFICIENCY, AND STANDARDIZATION
 PERFORMED BY NOUS INFOSYSTEMS.
 PROBLEM NO.:         1
 THEOPHYLLINE ORAL
 TOT. NO. OF OBS RECS:      132
 TOT. NO. OF INDIVIDUALS:       12
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 #TBLN:      1
 #METH: First Order
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
 #TERM:
0MINIMIZATION SUCCESSFUL
 NO. OF FUNCTION EVALUATIONS USED:      479
 NO. OF SIG. DIGITS IN FINAL EST.:  3.2

 TOTAL DATA POINTS NORMALLY DISTRIBUTED (N):          132
 N*LOG(2PI) CONSTANT TO OBJECTIVE FUNCTION:    242.59977276603360
 OBJECTIVE FUNCTION VALUE WITHOUT CONSTANT:    57.321065205740112
 OBJECTIVE FUNCTION VALUE WITH CONSTANT:       299.92083797177372
 REPORTED OBJECTIVE FUNCTION DOES NOT CONTAIN CONSTANT

 TOTAL EFFECTIVE ETAS (NIND*NETA):                            36


 #TERE:
 Elapsed estimation  time in seconds:     0.07
 Elapsed covariance  time in seconds:     0.02
 Elapsed postprocess time in seconds:     0.01

 ********************                                   FIRST ORDER                                  ********************
 #OBJT:**************                       MINIMUM VALUE OF OBJECTIVE FUNCTION                      ********************
 #OBJV:********************************************       57.321       **************************************************

 ********************                                   FIRST ORDER                                  ********************
 ********************                             FINAL PARAMETER ESTIMATE                           ********************

 THETA - VECTOR OF FIXED EFFECTS PARAMETERS   *********
         TH 1      TH 2      TH 3
         3.17E+00  1.05E-01  3.83E+01

 OMEGA - COV MATRIX FOR RANDOM EFFECTS - ETAS  ********
         ETA1      ETA2      ETA3
 ETA1
+        1.20E+00
 ETA2
+        3.70E-01  2.51E-01
 ETA3
+        1.37E-01  4.34E-02  3.13E-02

 SIGMA - COV MATRIX FOR RANDOM EFFECTS - EPSILONS  ****
         EPS1      EPS2
 EPS1
+        1.21E-02
 EPS2
+        0.00E+00  5.43E-02

 OMEGA - CORR MATRIX FOR RANDOM EFFECTS - ETAS  *******
         ETA1      ETA2      ETA3
 ETA1
+        1.09E+00
 ETA2
+        6.75E-01  5.01E-01
 ETA3
+        7.09E-01  4.90E-01  1.77E-01

 SIGMA - CORR MATRIX FOR RANDOM EFFECTS - EPSILONS  ***
         EPS1      EPS2
 EPS1
+        1.10E-01
 EPS2
+        0.00E+00  2.33E-01

 ********************                                   FIRST ORDER                                  ********************
 ********************                            STANDARD ERROR OF ESTIMATE                          ********************

 THETA - VECTOR OF FIXED EFFECTS PARAMETERS   *********
         TH 1      TH 2      TH 3
         6.41E-01  2.31E-02  1.68E+00

 OMEGA - COV MATRIX FOR RANDOM EFFECTS - ETAS  ********
         ETA1      ETA2      ETA3
 ETA1
+        4.20E-01
 ETA2
+        3.40E-01  2.89E-01
 ETA3
+        8.21E-02  2.30E-02  1.98E-02

 SIGMA - COV MATRIX FOR RANDOM EFFECTS - EPSILONS  ****
         EPS1      EPS2
 EPS1
+        3.58E-03
 EPS2
+       .........  3.21E-02

 OMEGA - CORR MATRIX FOR RANDOM EFFECTS - ETAS  *******
         ETA1      ETA2      ETA3
 ETA1
+        1.92E-01
 ETA2
+        2.10E-01  2.89E-01
 ETA3
+        1.78E-01  1.99E-01  5.59E-02

 SIGMA - CORR MATRIX FOR RANDOM EFFECTS - EPSILONS  ***
         EPS1      EPS2
 EPS1
+        1.63E-02
 EPS2
+       .........  6.88E-02

 ********************                                   FIRST ORDER                                  ********************
 ********************                          COVARIANCE MATRIX OF ESTIMATE                         ********************

            TH 1      TH 2      TH 3      OM11      OM12      OM13      OM22      OM23      OM33      SG11      SG12      SG22
 TH 1
+        4.11E-01
 TH 2
+        5.74E-03  5.32E-04
 TH 3
+        3.39E-01  5.03E-03  2.84E+00
 OM11
+        2.06E-01  1.63E-03  3.37E-01  1.77E-01
 OM12
+        1.21E-01  7.11E-03  1.49E-01  5.75E-02  1.16E-01
 OM13
+        2.00E-03 -1.04E-03  3.48E-02  1.95E-02 -1.01E-02  6.75E-03
 OM22
+        6.69E-02  6.22E-03  5.72E-02  1.80E-02  9.39E-02 -1.31E-02  8.37E-02
 OM23
+        9.95E-04  6.27E-05  2.38E-02  4.21E-03  3.11E-03  8.56E-04  1.86E-03  5.30E-04
 OM33
+       -2.19E-03 -2.50E-04  1.28E-02  3.20E-03 -2.82E-03  1.50E-03 -3.27E-03  2.32E-04  3.92E-04
 SG11
+        1.05E-03  5.80E-05  1.81E-03  5.14E-04  9.76E-04 -7.52E-05  8.05E-04  2.78E-05 -2.05E-05  1.28E-05
 SG12
+       ......... ......... ......... ......... ......... ......... ......... ......... ......... ......... .........
 SG22
+       -4.97E-03 -4.79E-04 -9.94E-03 -1.01E-03 -3.86E-03  9.52E-04 -3.39E-03  2.20E-04  1.80E-04 -2.82E-05 .........  1.03E-03

 ********************                                   FIRST ORDER                                  ********************
 ********************                          CORRELATION MATRIX OF ESTIMATE                        ********************

            TH 1      TH 2      TH 3      OM11      OM12      OM13      OM22      OM23      OM33      SG11      SG12      SG22
 TH 1
+        6.41E-01
 TH 2
+        3.88E-01  2.31E-02
 TH 3
+        3.14E-01  1.29E-01  1.68E+00
 OM11
+        7.63E-01  1.68E-01  4.76E-01  4.20E-01
 OM12
+        5.57E-01  9.06E-01  2.60E-01  4.02E-01  3.40E-01
 OM13
+        3.80E-02 -5.49E-01  2.52E-01  5.64E-01 -3.61E-01  8.21E-02
 OM22
+        3.61E-01  9.32E-01  1.17E-01  1.48E-01  9.54E-01 -5.50E-01  2.89E-01
 OM23
+        6.74E-02  1.18E-01  6.14E-01  4.35E-01  3.97E-01  4.53E-01  2.80E-01  2.30E-02
 OM33
+       -1.73E-01 -5.48E-01  3.83E-01  3.85E-01 -4.20E-01  9.24E-01 -5.70E-01  5.09E-01  1.98E-02
 SG11
+        4.58E-01  7.03E-01  3.00E-01  3.42E-01  8.02E-01 -2.56E-01  7.78E-01  3.38E-01 -2.90E-01  3.58E-03
 SG12
+       ......... ......... ......... ......... ......... ......... ......... ......... ......... ......... .........
 SG22
+       -2.42E-01 -6.47E-01 -1.84E-01 -7.52E-02 -3.54E-01  3.61E-01 -3.66E-01  2.98E-01  2.84E-01 -2.46E-01 .........  3.21E-02
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 Elapsed finaloutput time in seconds:     0.05
 #CPUT: Total CPU Time in Seconds,        0.203
