2018-10-19
오후 06:08
$PROBLEM    THEOPHYLLINE ORAL
$INPUT      ID AMT=DROP TIME DV BWT
$DATA      THEO
$PRED
  DOSE = 320
  V    = THETA(1) * EXP(ETA(1))
  K    = THETA(2) * EXP(ETA(2))
  KA   = THETA(3) * EXP(ETA(3))
  F    = DOSE / V * KA / (KA - K) * (EXP(-K*TIME) - EXP(-KA*TIME))
  IPRED= F
  Y    = F + EPS(1)

  IF (ICALL.EQ.3) THEN
    WRITE (53,*) OMEGA(BLOCK)
    WRITE (54,*) SIGMA(BLOCK)
  ENDIF

$THETA  (0,50,500)
 (0,1,10)
 (0,5,50)
$OMEGA  BLOCK(3)
 0.2
 0.1 0.2
 0.1 0.1 0.2
$SIGMA  0.1
$ESTIMATION MAX=9999 METHOD=COND
$COVARIANCE UNCOND
$TABLE      ID TIME IPRED CPRED CPREDI CWRES G11 G21 G31 H11
            FILE=sdtabC02-1 NOPRINT ONEHEADER
$TABLE      ID ETA(1) ETA(2) ETA(3) FILE=patabC02-1 NOPRINT ONEHEADER
            NOAPPEND FIRSTONLY

NM-TRAN MESSAGES
 WARNINGS AND ERRORS (IF ANY) FOR PROBLEM    1
 (WARNING  2) NM-TRAN INFERS THAT THE DATA ARE POPULATION.
 (WARNING  13) WITH USER-WRITTEN PRED OR $PRED, NM-TRAN CANNOT APPEND THE
 MDV DATA ITEM.

1NONLINEAR MIXED EFFECTS MODEL PROGRAM (NONMEM) VERSION 7.4.3
 ORIGINALLY DEVELOPED BY STUART BEAL, LEWIS SHEINER, AND ALISON BOECKMANN
 CURRENT DEVELOPERS ARE ROBERT BAUER, ICON DEVELOPMENT SOLUTIONS,
 AND ALISON BOECKMANN. IMPLEMENTATION, EFFICIENCY, AND STANDARDIZATION
 PERFORMED BY NOUS INFOSYSTEMS.
 PROBLEM NO.:         1
 THEOPHYLLINE ORAL
 TOT. NO. OF OBS RECS:      132
 TOT. NO. OF INDIVIDUALS:       12
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 #TBLN:      1
 #METH: First Order Conditional Estimation
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
 #TERM:
0MINIMIZATION SUCCESSFUL
 NO. OF FUNCTION EVALUATIONS USED:      475
 NO. OF SIG. DIGITS IN FINAL EST.:  3.1
0PARAMETER ESTIMATE IS NEAR ITS BOUNDARY

 ETABAR IS THE ARITHMETIC MEAN OF THE ETA-ESTIMATES,
 AND THE P-VALUE IS GIVEN FOR THE NULL HYPOTHESIS THAT THE TRUE MEAN IS 0.

 ETABAR:        -2.2191E-03 -1.2953E-03 -8.1904E-03
 SE:             3.8471E-02  3.7960E-02  1.8012E-01
 N:                      12          12          12

 P VAL.:         9.5400E-01  9.7278E-01  9.6373E-01

 ETASHRINKSD(%)  1.0000E-10  1.0000E-10  6.2263E-01
 ETASHRINKVR(%)  1.0000E-10  1.0000E-10  1.2414E+00
 EBVSHRINKSD(%)  2.7001E+00  3.2597E+00  3.2701E+00
 EBVSHRINKVR(%)  5.3273E+00  6.4132E+00  6.4332E+00
 EPSSHRINKSD(%)  8.7339E+00
 EPSSHRINKVR(%)  1.6705E+01


 TOTAL DATA POINTS NORMALLY DISTRIBUTED (N):          132
 N*LOG(2PI) CONSTANT TO OBJECTIVE FUNCTION:    242.59977276603360
 OBJECTIVE FUNCTION VALUE WITHOUT CONSTANT:    103.49467394872190
 OBJECTIVE FUNCTION VALUE WITH CONSTANT:       346.09444671475546
 REPORTED OBJECTIVE FUNCTION DOES NOT CONTAIN CONSTANT

 TOTAL EFFECTIVE ETAS (NIND*NETA):                            36


 #TERE:
 Elapsed estimation  time in seconds:     0.44
0S MATRIX ALGORITHMICALLY SINGULAR
0S MATRIX IS OUTPUT
0INVERSE COVARIANCE MATRIX SET TO RS*RMAT, WHERE S* IS A PSEUDO INVERSE OF S
 Elapsed covariance  time in seconds:     0.13
 Elapsed postprocess time in seconds:     0.01

 ********************                        FIRST ORDER CONDITIONAL ESTIMATION                      ********************
 #OBJT:**************                       MINIMUM VALUE OF OBJECTIVE FUNCTION                      ********************
 #OBJV:********************************************      103.495       **************************************************

 ********************                        FIRST ORDER CONDITIONAL ESTIMATION                      ********************
 ********************                             FINAL PARAMETER ESTIMATE                           ********************

 THETA - VECTOR OF FIXED EFFECTS PARAMETERS   *********
         TH 1      TH 2      TH 3
         3.21E+01  8.77E-02  1.59E+00

 OMEGA - COV MATRIX FOR RANDOM EFFECTS - ETAS  ********
         ETA1      ETA2      ETA3
 ETA1
+        1.90E-02
 ETA2
+        1.36E-02  1.86E-02
 ETA3
+        5.65E-02 -7.80E-03  4.30E-01

 SIGMA - COV MATRIX FOR RANDOM EFFECTS - EPSILONS  ****
         EPS1
 EPS1
+        4.77E-01

 OMEGA - CORR MATRIX FOR RANDOM EFFECTS - ETAS  *******
         ETA1      ETA2      ETA3
 ETA1
+        1.38E-01
 ETA2
+        7.23E-01  1.36E-01
 ETA3
+        6.25E-01 -8.72E-02  6.56E-01

 SIGMA - CORR MATRIX FOR RANDOM EFFECTS - EPSILONS  ***
         EPS1
 EPS1
+        6.91E-01

 ********************                        FIRST ORDER CONDITIONAL ESTIMATION                      ********************
 ********************                            STANDARD ERROR OF ESTIMATE                          ********************

 THETA - VECTOR OF FIXED EFFECTS PARAMETERS   *********
         TH 1      TH 2      TH 3
         1.50E+00  4.28E-03  3.09E-01

 OMEGA - COV MATRIX FOR RANDOM EFFECTS - ETAS  ********
         ETA1      ETA2      ETA3
 ETA1
+        7.10E-03
 ETA2
+        6.83E-03  1.91E-02
 ETA3
+        3.31E-02  2.14E-02  2.17E-01

 SIGMA - COV MATRIX FOR RANDOM EFFECTS - EPSILONS  ****
         EPS1
 EPS1
+        1.24E-01

 OMEGA - CORR MATRIX FOR RANDOM EFFECTS - ETAS  *******
         ETA1      ETA2      ETA3
 ETA1
+        2.58E-02
 ETA2
+        2.07E-01  6.99E-02
 ETA3
+        2.15E-01  2.35E-01  1.66E-01

 SIGMA - CORR MATRIX FOR RANDOM EFFECTS - EPSILONS  ***
         EPS1
 EPS1
+        8.98E-02

 ********************                        FIRST ORDER CONDITIONAL ESTIMATION                      ********************
 ********************                          COVARIANCE MATRIX OF ESTIMATE                         ********************

            TH 1      TH 2      TH 3      OM11      OM12      OM13      OM22      OM23      OM33      SG11
 TH 1
+        2.26E+00
 TH 2
+        1.52E-03  1.84E-05
 TH 3
+        2.61E-01 -8.35E-05  9.54E-02
 OM11
+       -6.29E-04  1.36E-05 -1.63E-04  5.04E-05
 OM12
+        5.18E-04 -1.91E-05 -3.02E-04 -8.20E-06  4.67E-05
 OM13
+       -4.94E-03  9.16E-06  5.00E-03  1.16E-04 -6.78E-05  1.09E-03
 OM22
+       -3.20E-03 -6.48E-05  3.46E-04 -8.36E-05  9.67E-05 -1.13E-04  3.64E-04
 OM23
+       -8.42E-04 -9.80E-06  2.26E-04  5.24E-05  3.66E-05  1.73E-04 -7.34E-05  4.58E-04
 OM33
+        1.04E-01  8.38E-05  4.11E-02  5.03E-04 -3.14E-04  5.97E-03 -3.55E-04 -1.73E-04  4.72E-02
 SG11
+       -7.49E-02 -2.90E-05 -3.94E-03 -1.62E-04 -7.26E-05 -1.25E-03 -5.19E-05 -1.26E-04 -1.21E-02  1.54E-02

 ********************                        FIRST ORDER CONDITIONAL ESTIMATION                      ********************
 ********************                          CORRELATION MATRIX OF ESTIMATE                        ********************

            TH 1      TH 2      TH 3      OM11      OM12      OM13      OM22      OM23      OM33      SG11
 TH 1
+        1.50E+00
 TH 2
+        2.36E-01  4.28E-03
 TH 3
+        5.62E-01 -6.31E-02  3.09E-01
 OM11
+       -5.89E-02  4.47E-01 -7.43E-02  7.10E-03
 OM12
+        5.04E-02 -6.51E-01 -1.43E-01 -1.69E-01  6.83E-03
 OM13
+       -9.93E-02  6.47E-02  4.90E-01  4.93E-01 -3.00E-01  3.31E-02
 OM22
+       -1.11E-01 -7.93E-01  5.87E-02 -6.17E-01  7.42E-01 -1.80E-01  1.91E-02
 OM23
+       -2.62E-02 -1.07E-01  3.43E-02  3.45E-01  2.50E-01  2.44E-01 -1.80E-01  2.14E-02
 OM33
+        3.19E-01  9.00E-02  6.13E-01  3.26E-01 -2.11E-01  8.31E-01 -8.57E-02 -3.71E-02  2.17E-01
 SG11
+       -4.02E-01 -5.46E-02 -1.03E-01 -1.84E-01 -8.56E-02 -3.05E-01 -2.19E-02 -4.74E-02 -4.47E-01  1.24E-01
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 Elapsed finaloutput time in seconds:     0.05
 #CPUT: Total CPU Time in Seconds,        0.686
