2018-08-21
오후 02:14
$PROB THEOPHYLLINE ORAL
$INPUT ID AMT=DROP TIME DV BWT
$DATA THEO
$PRED
  DOSE = 320
  V    = THETA(1) * EXP(ETA(1))
  K    = THETA(2) * EXP(ETA(2))
  KA   = THETA(3) * EXP(ETA(3))
  F    = DOSE / V * KA / (KA - K) * (EXP(-K*TIME) - EXP(-KA*TIME))
  IPRED= F
  Y    = F + F * EPS(1) + EPS(2)

  CL   = V * K

$THETA (0, 50, 500) (0, 1, 10) (0, 5, 50)
$OMEGA BLOCK(3)
  0.2
  0.1  0.2
  0.1  0.1  0.2
$SIGMA 0.1  0.1
$EST MAX=9999 PRINT=5 METHOD=COND INTER
     NOTBT NOOBT NOSBT NOABORT MSFO=THIS.MSF
$COV UNCOND PRINT=ERS
$TAB ID TIME IPRED CWRES
     FILE=sdtabC07-1 NOPRINT ONEHEADER
$TAB ID V K KA CL ETA(1) ETA(2) ETA(3)
     FILE=patabC07-1 NOPRINT ONEHEADER NOAPPEND
$TAB ID BWT
     FILE=cotabC07-1 NOPRINT ONEHEADER NOAPPEND
$TAB ID
     FILE=catabC07-1 NOPRINT ONEHEADER NOAPPEND

NM-TRAN MESSAGES
 WARNINGS AND ERRORS (IF ANY) FOR PROBLEM    1
 (WARNING  2) NM-TRAN INFERS THAT THE DATA ARE POPULATION.
 (WARNING  13) WITH USER-WRITTEN PRED OR $PRED, NM-TRAN CANNOT APPEND THE
 MDV DATA ITEM.

1NONLINEAR MIXED EFFECTS MODEL PROGRAM (NONMEM) VERSION 7.4.1
 ORIGINALLY DEVELOPED BY STUART BEAL, LEWIS SHEINER, AND ALISON BOECKMANN
 CURRENT DEVELOPERS ARE ROBERT BAUER, ICON DEVELOPMENT SOLUTIONS,
 AND ALISON BOECKMANN. IMPLEMENTATION, EFFICIENCY, AND STANDARDIZATION
 PERFORMED BY NOUS INFOSYSTEMS.
 PROBLEM NO.:         1
 THEOPHYLLINE ORAL
 TOT. NO. OF OBS RECS:      132
 TOT. NO. OF INDIVIDUALS:       12
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 #TBLN:      1
 #METH: First Order Conditional Estimation with Interaction
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
 #TERM:
0MINIMIZATION SUCCESSFUL
 NO. OF FUNCTION EVALUATIONS USED:      405
 NO. OF SIG. DIGITS IN FINAL EST.:  3.2

 ETABAR IS THE ARITHMETIC MEAN OF THE ETA-ESTIMATES,
 AND THE P-VALUE IS GIVEN FOR THE NULL HYPOTHESIS THAT THE TRUE MEAN IS 0.

 ETABAR:        -2.2284E-03  1.4270E-03 -1.2102E-02
 SE:             3.7870E-02  3.7341E-02  1.7979E-01
 N:                      12          12          12

 P VAL.:         9.5308E-01  9.6952E-01  9.4633E-01

 ETASHRINKSD(%)  1.6181E+00  5.0222E+00  1.3290E+00
 ETASHRINKVR(%)  3.2100E+00  9.7923E+00  2.6403E+00
 EBVSHRINKSD(%)  5.2196E+00  8.9478E+00  3.6408E+00
 EBVSHRINKVR(%)  1.0167E+01  1.7095E+01  7.1490E+00
 EPSSHRINKSD(%)  7.9529E+00  9.0257E+00
 EPSSHRINKVR(%)  1.5273E+01  1.7237E+01


 TOTAL DATA POINTS NORMALLY DISTRIBUTED (N):          132
 N*LOG(2PI) CONSTANT TO OBJECTIVE FUNCTION:    242.59977276603360
 OBJECTIVE FUNCTION VALUE WITHOUT CONSTANT:    92.830869221307665
 OBJECTIVE FUNCTION VALUE WITH CONSTANT:       335.43064198734123
 REPORTED OBJECTIVE FUNCTION DOES NOT CONTAIN CONSTANT

 TOTAL EFFECTIVE ETAS (NIND*NETA):                            36


 #TERE:
 Elapsed estimation  time in seconds:     0.72
 Elapsed covariance  time in seconds:     0.25
 Elapsed postprocess time in seconds:     0.01

 ********************               FIRST ORDER CONDITIONAL ESTIMATION WITH INTERACTION              ********************
 #OBJT:**************                       MINIMUM VALUE OF OBJECTIVE FUNCTION                      ********************
 #OBJV:********************************************       92.831       **************************************************

 ********************               FIRST ORDER CONDITIONAL ESTIMATION WITH INTERACTION              ********************
 ********************                             FINAL PARAMETER ESTIMATE                           ********************

 THETA - VECTOR OF FIXED EFFECTS PARAMETERS   *********
         TH 1      TH 2      TH 3
         3.24E+01  8.73E-02  1.49E+00

 OMEGA - COV MATRIX FOR RANDOM EFFECTS - ETAS  ********
         ETA1      ETA2      ETA3
 ETA1
+        1.94E-02
 ETA2
+        1.21E-02  2.02E-02
 ETA3
+        5.69E-02 -6.47E-03  4.35E-01

 SIGMA - COV MATRIX FOR RANDOM EFFECTS - EPSILONS  ****
         EPS1      EPS2
 EPS1
+        1.70E-02
 EPS2
+        0.00E+00  8.29E-02

 OMEGA - CORR MATRIX FOR RANDOM EFFECTS - ETAS  *******
         ETA1      ETA2      ETA3
 ETA1
+        1.39E-01
 ETA2
+        6.10E-01  1.42E-01
 ETA3
+        6.20E-01 -6.90E-02  6.59E-01

 SIGMA - CORR MATRIX FOR RANDOM EFFECTS - EPSILONS  ***
         EPS1      EPS2
 EPS1
+        1.31E-01
 EPS2
+        0.00E+00  2.88E-01

 ********************               FIRST ORDER CONDITIONAL ESTIMATION WITH INTERACTION              ********************
 ********************                            STANDARD ERROR OF ESTIMATE                          ********************

 THETA - VECTOR OF FIXED EFFECTS PARAMETERS   *********
         TH 1      TH 2      TH 3
         1.68E+00  4.24E-03  3.02E-01

 OMEGA - COV MATRIX FOR RANDOM EFFECTS - ETAS  ********
         ETA1      ETA2      ETA3
 ETA1
+        8.49E-03
 ETA2
+        7.48E-03  2.07E-02
 ETA3
+        3.60E-02  2.21E-02  2.23E-01

 SIGMA - COV MATRIX FOR RANDOM EFFECTS - EPSILONS  ****
         EPS1      EPS2
 EPS1
+        1.21E-02
 EPS2
+       .........  1.18E-01

 OMEGA - CORR MATRIX FOR RANDOM EFFECTS - ETAS  *******
         ETA1      ETA2      ETA3
 ETA1
+        3.05E-02
 ETA2
+        3.64E-01  7.27E-02
 ETA3
+        2.45E-01  2.26E-01  1.69E-01

 SIGMA - CORR MATRIX FOR RANDOM EFFECTS - EPSILONS  ***
         EPS1      EPS2
 EPS1
+        4.64E-02
 EPS2
+       .........  2.04E-01

 ********************               FIRST ORDER CONDITIONAL ESTIMATION WITH INTERACTION              ********************
 ********************                          COVARIANCE MATRIX OF ESTIMATE                         ********************

            TH 1      TH 2      TH 3      OM11      OM12      OM13      OM22      OM23      OM33      SG11      SG12      SG22
 TH 1
+        2.84E+00
 TH 2
+        1.32E-03  1.80E-05
 TH 3
+        2.72E-01 -2.67E-04  9.12E-02
 OM11
+       -5.48E-04  1.34E-05 -3.41E-04  7.21E-05
 OM12
+        1.30E-03 -2.36E-05  1.53E-04 -2.60E-05  5.59E-05
 OM13
+       -6.09E-03  1.10E-05  5.56E-03  1.34E-04 -1.02E-04  1.30E-03
 OM22
+       -1.24E-02 -6.72E-05  1.83E-04 -5.92E-05  9.05E-05 -1.01E-04  4.27E-04
 OM23
+        3.50E-03 -1.52E-05  2.60E-04 -1.77E-05  8.09E-05 -9.34E-05 -9.41E-05  4.86E-04
 OM33
+        1.21E-01  7.90E-05  4.25E-02  5.45E-04 -4.15E-04  6.64E-03 -8.35E-04 -1.37E-03  4.96E-02
 SG11
+        5.49E-03  3.18E-05 -1.70E-04  5.87E-06 -3.57E-05 -5.52E-05 -2.01E-04  6.93E-05 -2.49E-04  1.46E-04
 SG12
+       ......... ......... ......... ......... ......... ......... ......... ......... ......... ......... .........
 SG22
+       -8.76E-02 -3.49E-04 -2.73E-03 -2.56E-04  4.02E-04 -3.73E-04  2.35E-03 -7.80E-04 -4.45E-03 -1.27E-03 .........  1.38E-02

 ********************               FIRST ORDER CONDITIONAL ESTIMATION WITH INTERACTION              ********************
 ********************                          CORRELATION MATRIX OF ESTIMATE                        ********************

            TH 1      TH 2      TH 3      OM11      OM12      OM13      OM22      OM23      OM33      SG11      SG12      SG22
 TH 1
+        1.68E+00
 TH 2
+        1.85E-01  4.24E-03
 TH 3
+        5.35E-01 -2.08E-01  3.02E-01
 OM11
+       -3.83E-02  3.71E-01 -1.33E-01  8.49E-03
 OM12
+        1.03E-01 -7.45E-01  6.79E-02 -4.09E-01  7.48E-03
 OM13
+       -1.00E-01  7.17E-02  5.11E-01  4.39E-01 -3.80E-01  3.60E-02
 OM22
+       -3.55E-01 -7.67E-01  2.94E-02 -3.37E-01  5.86E-01 -1.35E-01  2.07E-02
 OM23
+        9.41E-02 -1.62E-01  3.90E-02 -9.44E-02  4.91E-01 -1.18E-01 -2.06E-01  2.21E-02
 OM33
+        3.22E-01  8.36E-02  6.32E-01  2.88E-01 -2.49E-01  8.28E-01 -1.81E-01 -2.78E-01  2.23E-01
 SG11
+        2.69E-01  6.19E-01 -4.66E-02  5.72E-02 -3.94E-01 -1.27E-01 -8.04E-01  2.60E-01 -9.24E-02  1.21E-02
 SG12
+       ......... ......... ......... ......... ......... ......... ......... ......... ......... ......... .........
 SG22
+       -4.42E-01 -6.99E-01 -7.68E-02 -2.56E-01  4.57E-01 -8.79E-02  9.68E-01 -3.01E-01 -1.70E-01 -8.93E-01 .........  1.18E-01
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
 ********************               FIRST ORDER CONDITIONAL ESTIMATION WITH INTERACTION              ********************
 ********************                      EIGENVALUES OF COR MATRIX OF ESTIMATE                     ********************

             1         2         3         4         5         6         7         8         9        10        11
         3.60E-04  3.18E-03  2.60E-02  1.31E-01  2.28E-01  2.53E-01  6.74E-01  1.05E+00  1.96E+00  2.53E+00  4.14E+00
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 Elapsed finaloutput time in seconds:     0.09
 #CPUT: Total CPU Time in Seconds,        0.827
