2018-08-21
오후 02:14
$PROB THEOPHYLLINE ORAL P:ROOT F:BASE
$INPUT ID AMT TIME DV BWT
$DATA THEOPP
$SUBR ADVAN2 TRANS2
$PK
  TVCL  = THETA(1)
  TVV   = THETA(2)
  TVKA  = THETA(3)
  CL    = TVCL * EXP(ETA(1))
  V     = TVV  * EXP(ETA(2))
  KA    = TVKA * EXP(ETA(3))
  S2    = V
  K     = CL / V

$ERROR
  IPRED  = F
  W     = SQRT(THETA(4)**2 + THETA(5)**2 * IPRED**2)
  IRES  = DV - IPRED
  IWRES  = IRES / W
  Y     = IPRED + W * EPS(1)

$THETA
  (0, 0.1)
  (0, 1)
  (0, 10)
  0.1 FIX
  (0, 0.5)

$OMEGA BLOCK(3)
  0.2
  0.1  0.2
  0.1  0.1  0.2

$SIGMA 1 FIX
$EST MAXEVAL=9999 PRINT=5 METHOD=COND INTER
     NOTBT NOOBT NOSBT NOABORT MSFO=THIS.MSF
$COV UNCOND PRINT=E
$TAB ID TIME MDV IPRED IWRES CWRES
     FILE=sdtabC07-4 NOPRINT ONEHEADER
$TAB ID CL V KA K ETA(1) ETA(2) ETA(3)
     FILE=patabC07-4 NOPRINT ONEHEADER NOAPPEND
$TAB ID BWT
     FILE=cotabC07-4 NOPRINT ONEHEADER NOAPPEND
$TAB ID
     FILE=catabC07-4 NOPRINT ONEHEADER NOAPPEND

NM-TRAN MESSAGES
 WARNINGS AND ERRORS (IF ANY) FOR PROBLEM    1
 (WARNING  2) NM-TRAN INFERS THAT THE DATA ARE POPULATION.

1NONLINEAR MIXED EFFECTS MODEL PROGRAM (NONMEM) VERSION 7.4.1
 ORIGINALLY DEVELOPED BY STUART BEAL, LEWIS SHEINER, AND ALISON BOECKMANN
 CURRENT DEVELOPERS ARE ROBERT BAUER, ICON DEVELOPMENT SOLUTIONS,
 AND ALISON BOECKMANN. IMPLEMENTATION, EFFICIENCY, AND STANDARDIZATION
 PERFORMED BY NOUS INFOSYSTEMS.
 PROBLEM NO.:         1
 THEOPHYLLINE ORAL P:ROOT F:BASE
 TOT. NO. OF OBS RECS:      132
 TOT. NO. OF INDIVIDUALS:       12
 ONE COMPARTMENT MODEL WITH FIRST-ORDER ABSORPTION (ADVAN2)
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 #TBLN:      1
 #METH: First Order Conditional Estimation with Interaction
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
 #TERM:
0MINIMIZATION SUCCESSFUL
 NO. OF FUNCTION EVALUATIONS USED:      325
 NO. OF SIG. DIGITS IN FINAL EST.:  3.2

 ETABAR IS THE ARITHMETIC MEAN OF THE ETA-ESTIMATES,
 AND THE P-VALUE IS GIVEN FOR THE NULL HYPOTHESIS THAT THE TRUE MEAN IS 0.

 ETABAR:        -3.6319E-04 -2.0116E-05 -1.0725E-02
 SE:             6.9877E-02  3.3495E-02  1.8068E-01
 N:                      12          12          12

 P VAL.:         9.9585E-01  9.9952E-01  9.5266E-01

 ETASHRINKSD(%)  1.0000E-10  1.0000E-10  7.3692E-01
 ETASHRINKVR(%)  1.0000E-10  1.0000E-10  1.4684E+00
 EBVSHRINKSD(%)  3.1533E+00  3.0414E+00  3.1117E+00
 EBVSHRINKVR(%)  6.2071E+00  5.9903E+00  6.1266E+00
 EPSSHRINKSD(%)  1.0000E-10
 EPSSHRINKVR(%)  1.0000E-10


 TOTAL DATA POINTS NORMALLY DISTRIBUTED (N):          132
 N*LOG(2PI) CONSTANT TO OBJECTIVE FUNCTION:    242.59977276603360
 OBJECTIVE FUNCTION VALUE WITHOUT CONSTANT:    127.26262575986696
 OBJECTIVE FUNCTION VALUE WITH CONSTANT:       369.86239852590057
 REPORTED OBJECTIVE FUNCTION DOES NOT CONTAIN CONSTANT

 TOTAL EFFECTIVE ETAS (NIND*NETA):                            36


 #TERE:
 Elapsed estimation  time in seconds:     0.67
 Elapsed covariance  time in seconds:     0.25
 Elapsed postprocess time in seconds:     0.01

 ********************               FIRST ORDER CONDITIONAL ESTIMATION WITH INTERACTION              ********************
 #OBJT:**************                       MINIMUM VALUE OF OBJECTIVE FUNCTION                      ********************
 #OBJV:********************************************      127.263       **************************************************

 ********************               FIRST ORDER CONDITIONAL ESTIMATION WITH INTERACTION              ********************
 ********************                             FINAL PARAMETER ESTIMATE                           ********************

 THETA - VECTOR OF FIXED EFFECTS PARAMETERS   *********
         TH 1      TH 2      TH 3      TH 4      TH 5
         4.05E-02  4.66E-01  1.48E+00  1.00E-01  1.53E-01

 OMEGA - COV MATRIX FOR RANDOM EFFECTS - ETAS  ********
         ETA1      ETA2      ETA3
 ETA1
+        6.25E-02
 ETA2
+        2.98E-02  1.43E-02
 ETA3
+       -1.44E-02 -1.37E-02  4.34E-01

 SIGMA - COV MATRIX FOR RANDOM EFFECTS - EPSILONS  ****
         EPS1
 EPS1
+        1.00E+00

 OMEGA - CORR MATRIX FOR RANDOM EFFECTS - ETAS  *******
         ETA1      ETA2      ETA3
 ETA1
+        2.50E-01
 ETA2
+        9.96E-01  1.20E-01
 ETA3
+       -8.76E-02 -1.74E-01  6.59E-01

 SIGMA - CORR MATRIX FOR RANDOM EFFECTS - EPSILONS  ***
         EPS1
 EPS1
+        1.00E+00

 ********************               FIRST ORDER CONDITIONAL ESTIMATION WITH INTERACTION              ********************
 ********************                            STANDARD ERROR OF ESTIMATE                          ********************

 THETA - VECTOR OF FIXED EFFECTS PARAMETERS   *********
         TH 1      TH 2      TH 3      TH 4      TH 5
         3.15E-03  1.94E-02  3.11E-01 .........  1.78E-02

 OMEGA - COV MATRIX FOR RANDOM EFFECTS - ETAS  ********
         ETA1      ETA2      ETA3
 ETA1
+        3.66E-02
 ETA2
+        1.35E-02  6.18E-03
 ETA3
+        4.74E-02  3.34E-02  2.32E-01

 SIGMA - COV MATRIX FOR RANDOM EFFECTS - EPSILONS  ****
         EPS1
 EPS1
+       .........

 OMEGA - CORR MATRIX FOR RANDOM EFFECTS - ETAS  *******
         ETA1      ETA2      ETA3
 ETA1
+        7.33E-02
 ETA2
+        1.59E-02  2.58E-02
 ETA3
+        2.79E-01  4.09E-01  1.76E-01

 SIGMA - CORR MATRIX FOR RANDOM EFFECTS - EPSILONS  ***
         EPS1
 EPS1
+       .........

 ********************               FIRST ORDER CONDITIONAL ESTIMATION WITH INTERACTION              ********************
 ********************                          COVARIANCE MATRIX OF ESTIMATE                         ********************

            TH 1      TH 2      TH 3      TH 4      TH 5      OM11      OM12      OM13      OM22      OM23      OM33      SG11
 TH 1
+        9.90E-06
 TH 2
+        4.85E-05  3.77E-04
 TH 3
+       -1.01E-04 -1.41E-04  9.67E-02
 TH 4
+       ......... ......... ......... .........
 TH 5
+        1.53E-05  1.17E-06 -1.81E-03 .........  3.17E-04
 OM11
+       -8.33E-05 -2.34E-04  1.49E-03 ......... -2.05E-04  1.34E-03
 OM12
+       -2.10E-05 -1.91E-05  1.42E-03 ......... -1.09E-04  4.52E-04  1.82E-04
 OM13
+        4.03E-05  4.04E-04 -1.76E-03 ......... -1.96E-05  3.13E-05  7.91E-05  2.25E-03
 OM22
+       -1.90E-06  3.18E-05  1.06E-03 ......... -5.92E-05  1.30E-04  7.13E-05  5.63E-05  3.82E-05
 OM23
+        3.93E-05  2.70E-04 -2.67E-03 .........  5.15E-05 -4.81E-05  3.21E-05  1.49E-03  2.95E-05  1.12E-03
 OM33
+       -6.37E-05 -9.43E-04  4.45E-02 ......... -2.01E-03 -5.17E-04  4.07E-04 -5.56E-03  5.38E-04 -4.19E-03  5.40E-02
 SG11
+       ......... ......... ......... ......... ......... ......... ......... ......... ......... ......... ......... .........

 ********************               FIRST ORDER CONDITIONAL ESTIMATION WITH INTERACTION              ********************
 ********************                          CORRELATION MATRIX OF ESTIMATE                        ********************

            TH 1      TH 2      TH 3      TH 4      TH 5      OM11      OM12      OM13      OM22      OM23      OM33      SG11
 TH 1
+        3.15E-03
 TH 2
+        7.94E-01  1.94E-02
 TH 3
+       -1.03E-01 -2.34E-02  3.11E-01
 TH 4
+       ......... ......... ......... .........
 TH 5
+        2.74E-01  3.38E-03 -3.26E-01 .........  1.78E-02
 OM11
+       -7.23E-01 -3.29E-01  1.31E-01 ......... -3.14E-01  3.66E-02
 OM12
+       -4.95E-01 -7.30E-02  3.39E-01 ......... -4.55E-01  9.15E-01  1.35E-02
 OM13
+        2.70E-01  4.38E-01 -1.19E-01 ......... -2.32E-02  1.80E-02  1.24E-01  4.74E-02
 OM22
+       -9.79E-02  2.65E-01  5.50E-01 ......... -5.39E-01  5.75E-01  8.55E-01  1.92E-01  6.18E-03
 OM23
+        3.74E-01  4.17E-01 -2.57E-01 .........  8.66E-02 -3.93E-02  7.11E-02  9.37E-01  1.43E-01  3.34E-02
 OM33
+       -8.71E-02 -2.09E-01  6.16E-01 ......... -4.86E-01 -6.07E-02  1.30E-01 -5.04E-01  3.74E-01 -5.40E-01  2.32E-01
 SG11
+       ......... ......... ......... ......... ......... ......... ......... ......... ......... ......... ......... .........
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
 ********************               FIRST ORDER CONDITIONAL ESTIMATION WITH INTERACTION              ********************
 ********************                      EIGENVALUES OF COR MATRIX OF ESTIMATE                     ********************

             1         2         3         4         5         6         7         8         9        10
         2.19E-06  5.82E-03  3.29E-02  6.99E-02  2.75E-01  6.21E-01  7.01E-01  1.92E+00  2.71E+00  3.67E+00
 Elapsed finaloutput time in seconds:     0.08
 #CPUT: Total CPU Time in Seconds,        1.030
