2018-08-21
오후 02:14
$PROB THEOPHYLLINE ORAL
$INPUT ID AMT=DROP TIME DV BWT
$DATA THEO
$ABBR COMRES=6
$PRED
  DOSE = 320
  V    = THETA(1) * EXP(ETA(1))
  K    = THETA(2) * EXP(ETA(2))
  KA   = THETA(3) * EXP(ETA(3))
  F    = DOSE / V * KA / (KA - K) * (EXP(-K*TIME) - EXP(-KA*TIME))
  IPRED= F
  Y    = F + EPS(1)

  IF (ICALL.EQ.3) THEN
    WRITE (53,*) OMEGA(BLOCK)
    WRITE (54,*) SIGMA(BLOCK)
  ENDIF
"LAST
"  COM(1) = G(1,2)
"  COM(2) = G(2,2)
"  COM(3) = G(2,3)
"  COM(4) = G(3,2)
"  COM(5) = G(3,3)
"  COM(6) = G(3,4)

$THETA (0, 50, 500) (0, 1, 10) (0, 5, 50)
$OMEGA BLOCK(3)
  0.2
  0.1  0.2
  0.1  0.1  0.2
$SIGMA 0.1
$EST MAX=9999 METHOD=COND LAPL
$COV UNCOND
$TAB ID TIME IPRED CWRES G11 G21 G31 H11
     G12=COM(1) G22=COM(2) G23=COM(3) G32=COM(4) G33=COM(5) G34=COM(6)
     FILE=sdtabC03-1 NOPRINT ONEHEADER
$TAB ID ETA(1) ETA(2) ETA(3)
     FILE=patabC03-1 NOPRINT ONEHEADER NOAPPEND FIRSTONLY

NM-TRAN MESSAGES
 WARNINGS AND ERRORS (IF ANY) FOR PROBLEM    1
 (WARNING  2) NM-TRAN INFERS THAT THE DATA ARE POPULATION.
 (WARNING  13) WITH USER-WRITTEN PRED OR $PRED, NM-TRAN CANNOT APPEND THE
 MDV DATA ITEM.

1NONLINEAR MIXED EFFECTS MODEL PROGRAM (NONMEM) VERSION 7.4.1
 ORIGINALLY DEVELOPED BY STUART BEAL, LEWIS SHEINER, AND ALISON BOECKMANN
 CURRENT DEVELOPERS ARE ROBERT BAUER, ICON DEVELOPMENT SOLUTIONS,
 AND ALISON BOECKMANN. IMPLEMENTATION, EFFICIENCY, AND STANDARDIZATION
 PERFORMED BY NOUS INFOSYSTEMS.
 PROBLEM NO.:         1
 THEOPHYLLINE ORAL
 TOT. NO. OF OBS RECS:      132
 TOT. NO. OF INDIVIDUALS:       12
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 #TBLN:      1
 #METH: Laplacian Conditional Estimation
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
 #TERM:
0MINIMIZATION SUCCESSFUL
 NO. OF FUNCTION EVALUATIONS USED:      844
 NO. OF SIG. DIGITS IN FINAL EST.:  3.6
0PARAMETER ESTIMATE IS NEAR ITS BOUNDARY

 ETABAR IS THE ARITHMETIC MEAN OF THE ETA-ESTIMATES,
 AND THE P-VALUE IS GIVEN FOR THE NULL HYPOTHESIS THAT THE TRUE MEAN IS 0.

 ETABAR:        -1.9858E-03 -9.1611E-04 -9.0941E-03
 SE:             3.8103E-02  3.8372E-02  1.7981E-01
 N:                      12          12          12

 P VAL.:         9.5844E-01  9.8095E-01  9.5966E-01

 ETASHRINKSD(%)  1.0000E-10  1.0000E-10  3.2611E-01
 ETASHRINKVR(%)  1.0000E-10  1.0000E-10  6.5115E-01
 EBVSHRINKSD(%)  2.5880E+00  3.1729E+00  2.6926E+00
 EBVSHRINKVR(%)  5.1089E+00  6.2451E+00  5.3127E+00
 EPSSHRINKSD(%)  8.7728E+00
 EPSSHRINKVR(%)  1.6776E+01


 TOTAL DATA POINTS NORMALLY DISTRIBUTED (N):          132
 N*LOG(2PI) CONSTANT TO OBJECTIVE FUNCTION:    242.59977276603360
 OBJECTIVE FUNCTION VALUE WITHOUT CONSTANT:    105.13685954981106
 OBJECTIVE FUNCTION VALUE WITH CONSTANT:       347.73663231584464
 REPORTED OBJECTIVE FUNCTION DOES NOT CONTAIN CONSTANT

 TOTAL EFFECTIVE ETAS (NIND*NETA):                            36


 #TERE:
 Elapsed estimation  time in seconds:     0.96
0R MATRIX ALGORITHMICALLY SINGULAR
0COVARIANCE MATRIX UNOBTAINABLE
0R MATRIX IS OUTPUT
0T MATRIX - EQUAL TO RS*RMAT, WHERE S* IS THE INVERSE OF S - IS OUTPUT
 Elapsed covariance  time in seconds:     0.26
 Elapsed postprocess time in seconds:     0.01

 ********************                         LAPLACIAN CONDITIONAL ESTIMATION                       ********************
 #OBJT:**************                       MINIMUM VALUE OF OBJECTIVE FUNCTION                      ********************
 #OBJV:********************************************      105.137       **************************************************

 ********************                         LAPLACIAN CONDITIONAL ESTIMATION                       ********************
 ********************                             FINAL PARAMETER ESTIMATE                           ********************

 THETA - VECTOR OF FIXED EFFECTS PARAMETERS   *********
         TH 1      TH 2      TH 3
         3.20E+01  8.84E-02  1.58E+00

 OMEGA - COV MATRIX FOR RANDOM EFFECTS - ETAS  ********
         ETA1      ETA2      ETA3
 ETA1
+        1.86E-02
 ETA2
+        1.39E-02  1.89E-02
 ETA3
+        5.53E-02 -5.64E-03  4.26E-01

 SIGMA - COV MATRIX FOR RANDOM EFFECTS - EPSILONS  ****
         EPS1
 EPS1
+        4.77E-01

 OMEGA - CORR MATRIX FOR RANDOM EFFECTS - ETAS  *******
         ETA1      ETA2      ETA3
 ETA1
+        1.36E-01
 ETA2
+        7.42E-01  1.38E-01
 ETA3
+        6.22E-01 -6.27E-02  6.53E-01

 SIGMA - CORR MATRIX FOR RANDOM EFFECTS - EPSILONS  ***
         EPS1
 EPS1
+        6.91E-01
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 Elapsed finaloutput time in seconds:     0.07
 #CPUT: Total CPU Time in Seconds,        1.295
