2018-10-19
오후 05:56
$PROBLEM    THEOPHYLLINE ORAL P:ROOT F:BASE
$INPUT      ID AMT TIME DV BWT
$DATA      THEOPP
$SUBROUTINE ADVAN2 TRANS2
$PK
  TVCL  = THETA(1)
  TVV   = THETA(2)
  TVKA  = THETA(3)
  CL    = TVCL * EXP(ETA(1))
  V     = TVV  * EXP(ETA(2))
  KA    = TVKA * EXP(ETA(3))
  S2    = V
  K     = CL / V

$ERROR
  IPRED = F
  W     = SQRT(THETA(4)**2 + THETA(5)**2 * IPRED**2)
  IRES  = DV - IPRED
  IWRES  = IRES / W
  Y     = IPRED + W * EPS(1)

$THETA  (0,0.1)
 (0,1)
 (0,10)
 (0,1)
 0.01 FIX
$OMEGA  BLOCK(3)
 0.2
 0.1 0.2
 0.1 0.1 0.2
$SIGMA  1  FIX
$SIMULATION (1029882034) ONLYSIMULATION NSUBPROBLEMS=200
$TABLE      ID MDV TIME DV ONEHEADER NOPRINT NOAPPEND FILE=npctab.dta

NM-TRAN MESSAGES
 WARNINGS AND ERRORS (IF ANY) FOR PROBLEM    1
 (WARNING  2) NM-TRAN INFERS THAT THE DATA ARE POPULATION.

1NONLINEAR MIXED EFFECTS MODEL PROGRAM (NONMEM) VERSION 7.4.3
 ORIGINALLY DEVELOPED BY STUART BEAL, LEWIS SHEINER, AND ALISON BOECKMANN
 CURRENT DEVELOPERS ARE ROBERT BAUER, ICON DEVELOPMENT SOLUTIONS,
 AND ALISON BOECKMANN. IMPLEMENTATION, EFFICIENCY, AND STANDARDIZATION
 PERFORMED BY NOUS INFOSYSTEMS.
 PROBLEM NO.:         1
 THEOPHYLLINE ORAL P:ROOT F:BASE
 TOT. NO. OF OBS RECS:      132
 TOT. NO. OF INDIVIDUALS:       12
 ONE COMPARTMENT MODEL WITH FIRST-ORDER ABSORPTION (ADVAN2)
 PROBLEM NO.:           1      SUBPROBLEM NO.:           1
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 SIMULATION STEP PERFORMED
 Elapsed simulation  time in seconds:     0.00
 Elapsed finaloutput time in seconds:     0.01
 PROBLEM NO.:           1      SUBPROBLEM NO.:           2
 SIMULATION STEP PERFORMED
 Elapsed simulation  time in seconds:     0.00
 Elapsed finaloutput time in seconds:     0.01
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 #CPUT: Total CPU Time in Seconds,        5.179
