Mon 09/30/2013
06:27 PM
$PROB  THEOPHYLLINE   POPULATION DATA
$INPUT      ID DOSE=AMT TIME CP=DV WT
$DATA       THEOPP

$SUBROUTINES  ADVAN2

$PK
;THETA(1)=MEAN ABSORPTION RATE CONSTANT (1/HR)
;THETA(2)=MEAN ELIMINATION RATE CONSTANT (1/HR)
;THETA(3)=SLOPE OF CLEARANCE VS WEIGHT RELATIONSHIP (LITERS/HR/KG)
;SCALING PARAMETER=VOLUME/WT SINCE DOSE IS WEIGHT-ADJUSTED
   CALLFL=1
   KA=THETA(1)+ETA(1)
   K=THETA(2)+ETA(2)
   CL=THETA(3)+ETA(3)
   SC=CL/K

$THETA (0.0 FIXED)X4
$OMEGA (1.0E+06 FIXED)X4
$ETAS  3 .08 .04 0.2

$ERROR
   W1=SQRT(ABS(THETA(4)+ETA(4)))
   IPRED=F
   Y=F+W1*EPS(1)

$SIGMA  (1.0 FIXED)

$EST  METHOD=1 INTERACTION LAPLACE MAXEVAL=0 PRINT=5 NOHABORT FNLETA=0 MCETA=1
$TABLE          ID DOSE TIME DV IPRED W1 NOAPPEND NOPRINT FILE=INDESTM.TAB
$TABLE          ID KA K CL NOAPPEND FIRSTONLY NOPRINT FILE=INDESTM.PAR

NM-TRAN MESSAGES
 WARNINGS AND ERRORS (IF ANY) FOR PROBLEM    1
 (WARNING  2) NM-TRAN INFERS THAT THE DATA ARE POPULATION.
 (WARNING  66) WITH "LAPLACIAN" AND "INTERACTION", "NUMERICAL" AND "SLOW"
 ARE ALSO REQUIRED ON $ESTIM RECORD. NM-TRAN HAS SUPPLIED THESE OPTIONS.
 (WARNING  26) THE DERIVATIVE OF THE ABSOLUTE VALUE OF A RANDOM VARIABLE IS
 BEING COMPUTED. IF THE ABSOLUTE VALUE AFFECTS THE VALUE OF THE OBJECTIVE
 FUNCTION, THE USER SHOULD ENSURE THAT THE RANDOM VARIABLE IS ALWAYS
 POSITIVE OR ALWAYS NEGATIVE.

1NONLINEAR MIXED EFFECTS MODEL PROGRAM (NONMEM) VERSION 7.3beta7.0(P)
 ORIGINALLY DEVELOPED BY STUART BEAL, LEWIS SHEINER, AND ALISON BOECKMANN
 CURRENT DEVELOPERS ARE ROBERT BAUER, ICON DEVELOPMENT SOLUTIONS,
 AND ALISON BOECKMANN. IMPLEMENTATION, EFFICIENCY, AND STANDARDIZATION
 PERFORMED BY NOUS INFOSYSTEMS.
 PROBLEM NO.:         1
 THEOPHYLLINE   POPULATION DATA
 TOT. NO. OF OBS RECS:      132
 TOT. NO. OF INDIVIDUALS:     12
 ONE COMPARTMENT MODEL WITH FIRST-ORDER ABSORPTION (ADVAN2)
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 #TBLN:      1
 #METH: Laplacian Conditional Estimation with Interaction (Evaluation)
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
 ********************          LAPLACIAN CONDITIONAL ESTIMATION WITH INTERACTION (EVALUATION)        ********************
 #OBJT:**************                       MINIMUM VALUE OF OBJECTIVE FUNCTION                      ********************
 #OBJV:********************************************      -66.266       **************************************************

 ********************          LAPLACIAN CONDITIONAL ESTIMATION WITH INTERACTION (EVALUATION)        ********************
 ********************                             FINAL PARAMETER ESTIMATE                           ********************

 THETA - VECTOR OF FIXED EFFECTS PARAMETERS   *********
         TH 1      TH 2      TH 3      TH 4
         0.00E+00  0.00E+00  0.00E+00  0.00E+00

 OMEGA - COV MATRIX FOR RANDOM EFFECTS - ETAS  ********
            ETA1      ETA2      ETA3      ETA4
 ETA1
+        1.00E+06
 ETA2
+        0.00E+00  1.00E+06
 ETA3
+        0.00E+00  0.00E+00  1.00E+06
 ETA4
+        0.00E+00  0.00E+00  0.00E+00  1.00E+06

 SIGMA - COV MATRIX FOR RANDOM EFFECTS - EPSILONS  ****
            EPS1
 EPS1
+        1.00E+00

 OMEGA - CORR MATRIX FOR RANDOM EFFECTS - ETAS  *******
            ETA1      ETA2      ETA3      ETA4
 ETA1
+        1.00E+03
 ETA2
+        0.00E+00  1.00E+03
 ETA3
+        0.00E+00  0.00E+00  1.00E+03
 ETA4
+        0.00E+00  0.00E+00  0.00E+00  1.00E+03

 SIGMA - CORR MATRIX FOR RANDOM EFFECTS - EPSILONS  ***
            EPS1
 EPS1
+        1.00E+00
 #CPUT: Total CPU Time in Seconds,        0.078
