$PROB Emax model with hill=3
$INPUT ID DOSE DV
$DATA anneal.dat IGNORE=@
$PRED

 MU_1 = THETA(1)
 EMAX = EXP(MU_1+ETA(1))
 MU_2 = THETA(2)
 ED50 = EXP(MU_2+ETA(2))
 MU_3 = THETA(4)
 E0   = EXP(MU_3+ETA(3))

 MU_4=THETA(3)
 HILL = EXP(MU_4+ETA(4))

 IPRED = E0+EMAX*DOSE**HILL/(ED50**HILL+DOSE**HILL)
 Y     = IPRED + EPS(1)

$THETA  4.1 ; 1. Emax
$THETA  6.9 ; 2. ED50
$THETA  (-3.0,0.001,3.0) ; 3. Hill
$THETA  2.3 ; 4. E0

$OMEGA BLOCK(2) 0.1
                 0.01 0.1
$OMEGA 0.1
$OMEGA 0.0 FIXED

$SIGMA 1
$EST METHOD=CHAIN ISAMPLE=1 ISAMPEND=30 NSAMPLE=30 FILE=anneal2.chn
$ESTIMATION METH=SAEM INTER NBURN=4000 NITER=200 ISAMPLE=5 IACCEPT=0.3 CINTERVAL=25 CTYPE=3 NOABORT PRINT=100
$ESTIMATION METH=IMP INTER PRINT=1 NITER=0 ISAMPLE=10000 EONLY=1 MAPITER=0
$COV MATRIX=R UNCONDITIONAL
