$PROB Emax model with hill=3
$INPUT ID DOSE DV
$DATA anneal.dat IGNORE=@
$PRED

 MU_1 = THETA(1)
 EMAX = EXP(MU_1+ETA(1))
 MU_2 = THETA(2)
 ED50 = EXP(MU_2+ETA(2))
 MU_3 = THETA(4)
 E0   = EXP(MU_3+ETA(3))

 MU_4=THETA(3)
 HILL = EXP(MU_4+ETA(4))

 IPRED = E0+EMAX*DOSE**HILL/(ED50**HILL+DOSE**HILL)
 Y     = IPRED + EPS(1)

$THETA  4.1 ; 1. Emax
$THETA  6.9 ; 2. ED50
$THETA  (-3.0,0.001,3.0) ; 3. Hill
$THETA  2.3 ; 4. E0

$OMEGA BLOCK(2) 0.1
                 0.01 0.1
$OMEGA 0.1
$OMEGA 0.0 FIXED

$ANNEAL 4:0.3

$SIGMA 1
;$EST METHOD=CHAIN ISAMPLE=1 ISAMPEND=30 NSAMPLE=30 FILE=anneal4.chn
$ESTIMATION METH=IMPMAP INTER NITER=100 NBURN=60 ISAMPLE=1000 DF=4 CTYPE=3 NOABORT PRINT=1 CONSTRAIN=5 SIGL=8
$ESTIMATION METH=IMP INTER NITER=20 ISAMPLE=1000 DF=4 CONSTRAIN=0 SIGL=8 MAPITER=0
$COV MATRIX=R UNCONDITIONAL
