Mon 09/30/2013
02:09 PM
$PROB Emax model with hill=3
$INPUT ID DOSE DV
$DATA anneal.dat IGNORE=@
$PRED

 MU_1 = THETA(1)
 EMAX = EXP(MU_1+ETA(1))
 MU_2 = THETA(2)
 ED50 = EXP(MU_2+ETA(2))
 MU_3 = THETA(4)
 E0   = EXP(MU_3+ETA(3))

 MU_4=THETA(3)
 HILL = EXP(MU_4+ETA(4))

 IPRED = E0+EMAX*DOSE**HILL/(ED50**HILL+DOSE**HILL)
 Y     = IPRED + EPS(1)

$THETA  4.1 ; 1. Emax
$THETA  6.9 ; 2. ED50
$THETA  (-3.0,0.001,3.0) ; 3. Hill
$THETA  2.3 ; 4. E0

$OMEGA BLOCK(2) 0.1
                 0.01 0.1
$OMEGA 0.1
$OMEGA 0.0 FIXED

$SIGMA 1
$EST METHOD=CHAIN ISAMPLE=1 ISAMPEND=30 NSAMPLE=30 FILE=anneal5.chn
$ESTIMATION METH=IMP INTER NITER=50 ISAMPLE=1000 DF=4 CTYPE=3 NOABORT PRINT=1 SIGL=8
$ESTIMATION METH=IMP EONLY=1 INTER NITER=0 ISAMPLE=10000 DF=4 SIGL=8 MAPITER=0
$COV MATRIX=R UNCONDITIONAL

NM-TRAN MESSAGES
 WARNINGS AND ERRORS (IF ANY) FOR PROBLEM    1
 (WARNING  2) NM-TRAN INFERS THAT THE DATA ARE POPULATION.
 (WARNING  97) A RANDOM QUANTITY IS RAISED TO A POWER. IF THE RESULT AFFECTS
 THE VALUE OF THE OBJECTIVE FUNCTION, THE USER SHOULD ENSURE THAT THE
 RANDOM QUANTITY IS NEVER 0 WHEN THE POWER IS < 1.
 (WARNING  99) A RANDOM QUANTITY IS USED AS A POWER. IF THE RESULT AFFECTS
 THE VALUE OF THE OBJECTIVE FUNCTION, THE USER SHOULD ENSURE THAT THE
 QUANTITY RAISED TO THE POWER IS NOT 0.
 (WARNING  13) WITH USER-WRITTEN PRED OR $PRED, NM-TRAN CANNOT APPEND THE
 MDV DATA ITEM.

1NONLINEAR MIXED EFFECTS MODEL PROGRAM (NONMEM) VERSION 7.3beta7.0(P)
 ORIGINALLY DEVELOPED BY STUART BEAL, LEWIS SHEINER, AND ALISON BOECKMANN
 CURRENT DEVELOPERS ARE ROBERT BAUER, ICON DEVELOPMENT SOLUTIONS,
 AND ALISON BOECKMANN. IMPLEMENTATION, EFFICIENCY, AND STANDARDIZATION
 PERFORMED BY NOUS INFOSYSTEMS.
 PROBLEM NO.:         1
 Emax model with hill=3
 TOT. NO. OF OBS RECS:      200
 TOT. NO. OF INDIVIDUALS:    100
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 #TBLN:      1
 #METH: Chain Method Processing
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 #TBLN:      1
 #METH: Importance Sampling
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
 #TERM:
 OPTIMIZATION WAS NOT COMPLETED

 ETABAR IS THE ARITHMETIC MEAN OF THE ETA-ESTIMATES,
 AND THE P-VALUE IS GIVEN FOR THE NULL HYPOTHESIS THAT THE TRUE MEAN IS 0.

 ETABAR:        -2.2114E-03 -1.4061E-03  9.8145E-04  0.0000E+00
 SE:             5.1015E-02  2.9053E-02  3.8618E-02  0.0000E+00
 N:                     100         100         100           0

 P VAL.:         9.6542E-01  9.6140E-01  9.7972E-01  1.0000E+00

 ETAshrink(%):   3.1315E+01  4.4290E+01  2.1838E+01  0.0000E+00
 EBVshrink(%):   3.2789E+01  4.7145E+01  2.1512E+01  0.0000E+00
 EPSshrink(%):   2.2268E+01


 #TERE:
 Elapsed estimation time in seconds:    60.03

 Number of Negative Eigenvalues in Matrix=           1
 Most negative value=  -72.8428948963318
 Most positive value=   491.471601982748
 Forcing positive definiteness
 Root mean square deviation of matrix from original=   0.216317952549111

 Elapsed covariance time in seconds:     5.82

 ********************                               IMPORTANCE SAMPLING                              ********************
 #OBJT:**************                        FINAL VALUE OF OBJECTIVE FUNCTION                       ********************
 #OBJV:********************************************      860.888       **************************************************

 ********************                               IMPORTANCE SAMPLING                              ********************
 ********************                             FINAL PARAMETER ESTIMATE                           ********************

 THETA - VECTOR OF FIXED EFFECTS PARAMETERS   *********
         TH 1      TH 2      TH 3      TH 4
         3.00E+00  5.97E+00  1.47E+00  1.57E+00

 OMEGA - COV MATRIX FOR RANDOM EFFECTS - ETAS  ********
            ETA1      ETA2      ETA3      ETA4
 ETA1
+        5.57E-01
 ETA2
+        1.57E-01  2.75E-01
 ETA3
+        0.00E+00  0.00E+00  2.47E-01
 ETA4
+        0.00E+00  0.00E+00  0.00E+00  0.00E+00

 SIGMA - COV MATRIX FOR RANDOM EFFECTS - EPSILONS  ****
            EPS1
 EPS1
+        2.91E+00

 OMEGA - CORR MATRIX FOR RANDOM EFFECTS - ETAS  *******
            ETA1      ETA2      ETA3      ETA4
 ETA1
+        7.46E-01
 ETA2
+        4.02E-01  5.24E-01
 ETA3
+        0.00E+00  0.00E+00  4.97E-01
 ETA4
+        0.00E+00  0.00E+00  0.00E+00  0.00E+00

 SIGMA - CORR MATRIX FOR RANDOM EFFECTS - EPSILONS  ***
            EPS1
 EPS1
+        1.71E+00

 ********************                               IMPORTANCE SAMPLING                              ********************
 ********************                          STANDARD ERROR OF ESTIMATE (R)                        ********************

 THETA - VECTOR OF FIXED EFFECTS PARAMETERS   *********
         TH 1      TH 2      TH 3      TH 4
         1.21E-01  1.08E-01  1.18E-01  6.98E-02

 OMEGA - COV MATRIX FOR RANDOM EFFECTS - ETAS  ********
            ETA1      ETA2      ETA3      ETA4
 ETA1
+        1.33E-01
 ETA2
+        1.08E-01  1.20E-01
 ETA3
+        0.00E+00  0.00E+00  6.30E-02
 ETA4
+        0.00E+00  0.00E+00  0.00E+00  0.00E+00

 SIGMA - COV MATRIX FOR RANDOM EFFECTS - EPSILONS  ****
            EPS1
 EPS1
+        7.52E-01

 OMEGA - CORR MATRIX FOR RANDOM EFFECTS - ETAS  *******
            ETA1      ETA2      ETA3      ETA4
 ETA1
+        8.89E-02
 ETA2
+        2.09E-01  1.14E-01
 ETA3
+       ......... .........  6.35E-02
 ETA4
+       ......... ......... ......... .........

 SIGMA - CORR MATRIX FOR RANDOM EFFECTS - EPSILONS  ***
            EPS1
 EPS1
+        2.20E-01

 ********************                               IMPORTANCE SAMPLING                              ********************
 ********************                        COVARIANCE MATRIX OF ESTIMATE (R)                       ********************

            TH 1      TH 2      TH 3      TH 4      OM11      OM12      OM13      OM14      OM22      OM23      OM24      OM33
             OM34      OM44      SG11
 TH 1
+        1.46E-02
 TH 2
+        5.93E-03  1.17E-02
 TH 3
+        1.64E-03 -6.14E-04  1.40E-02
 TH 4
+       -2.35E-04  1.49E-03  7.74E-04  4.87E-03
 OM11
+       -3.67E-03 -4.05E-03 -5.92E-04  5.48E-04  1.76E-02
 OM12
+        1.85E-03 -4.36E-03  1.30E-03 -5.97E-04  6.09E-03  1.16E-02
 OM13
+       ......... ......... ......... ......... ......... ......... .........
 OM14
+       ......... ......... ......... ......... ......... ......... ......... .........
 OM22
+        4.02E-03 -1.13E-03  8.97E-04 -8.57E-04 -1.17E-03  8.02E-03  0.00E+00  0.00E+00  1.43E-02
 OM23
+       ......... ......... ......... ......... ......... ......... ......... ......... ......... .........
 OM24
+       ......... ......... ......... ......... ......... ......... ......... ......... ......... ......... .........
 OM33
+        6.48E-05 -2.14E-04 -1.31E-04 -1.39E-03 -3.34E-04 -1.60E-05  0.00E+00  0.00E+00 -5.00E-04  0.00E+00  0.00E+00  3.97E-03
 OM34
+       ......... ......... ......... ......... ......... ......... ......... ......... ......... ......... ......... .........
         .........
 OM44
+       ......... ......... ......... ......... ......... ......... ......... ......... ......... ......... ......... .........
         ......... .........
 SG11
+       -8.85E-03  7.60E-04 -4.76E-03  8.23E-03  7.43E-03 -8.07E-03  0.00E+00  0.00E+00 -2.35E-02  0.00E+00  0.00E+00 -1.42E-02
          0.00E+00  0.00E+00  5.65E-01

 ********************                               IMPORTANCE SAMPLING                              ********************
 ********************                        CORRELATION MATRIX OF ESTIMATE (R)                      ********************

            TH 1      TH 2      TH 3      TH 4      OM11      OM12      OM13      OM14      OM22      OM23      OM24      OM33
             OM34      OM44      SG11
 TH 1
+        1.21E-01
 TH 2
+        4.55E-01  1.08E-01
 TH 3
+        1.15E-01 -4.81E-02  1.18E-01
 TH 4
+       -2.79E-02  1.97E-01  9.39E-02  6.98E-02
 OM11
+       -2.29E-01 -2.82E-01 -3.78E-02  5.91E-02  1.33E-01
 OM12
+        1.42E-01 -3.74E-01  1.02E-01 -7.94E-02  4.26E-01  1.08E-01
 OM13
+       ......... ......... ......... ......... ......... ......... .........
 OM14
+       ......... ......... ......... ......... ......... ......... ......... .........
 OM22
+        2.78E-01 -8.77E-02  6.34E-02 -1.03E-01 -7.35E-02  6.23E-01  0.00E+00  0.00E+00  1.20E-01
 OM23
+       ......... ......... ......... ......... ......... ......... ......... ......... ......... .........
 OM24
+       ......... ......... ......... ......... ......... ......... ......... ......... ......... ......... .........
 OM33
+        8.51E-03 -3.14E-02 -1.76E-02 -3.16E-01 -4.00E-02 -2.37E-03  0.00E+00  0.00E+00 -6.62E-02  0.00E+00  0.00E+00  6.30E-02
 OM34
+       ......... ......... ......... ......... ......... ......... ......... ......... ......... ......... ......... .........
         .........
 OM44
+       ......... ......... ......... ......... ......... ......... ......... ......... ......... ......... ......... .........
         ......... .........
 SG11
+       -9.75E-02  9.36E-03 -5.36E-02  1.57E-01  7.44E-02 -9.98E-02  0.00E+00  0.00E+00 -2.61E-01  0.00E+00  0.00E+00 -2.99E-01
          0.00E+00  0.00E+00  7.52E-01
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 #TBLN:      2
 #METH: Objective Function Evaluation by Importance Sampling
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
 #TERM:
 EXPECTATION ONLY PROCESS COMPLETED

 ETABAR IS THE ARITHMETIC MEAN OF THE ETA-ESTIMATES,
 AND THE P-VALUE IS GIVEN FOR THE NULL HYPOTHESIS THAT THE TRUE MEAN IS 0.

 ETABAR:         1.8717E-03  2.9772E-03  3.1545E-03  0.0000E+00
 SE:             5.0303E-02  2.8450E-02  3.8569E-02  0.0000E+00
 N:                     100         100         100           0

 P VAL.:         9.7032E-01  9.1665E-01  9.3481E-01  1.0000E+00

 ETAshrink(%):   3.2274E+01  4.5447E+01  2.1936E+01  0.0000E+00
 EBVshrink(%):   3.2456E+01  4.7535E+01  2.2097E+01  0.0000E+00
 EPSshrink(%):   2.6047E+01


 #TERE:
 Elapsed estimation time in seconds:     0.00
 Elapsed covariance time in seconds:    59.27

 ********************               OBJECTIVE FUNCTION EVALUATION BY IMPORTANCE SAMPLING             ********************
 #OBJT:**************                        FINAL VALUE OF OBJECTIVE FUNCTION                       ********************
 #OBJV:********************************************      861.832       **************************************************

 ********************               OBJECTIVE FUNCTION EVALUATION BY IMPORTANCE SAMPLING             ********************
 ********************                             FINAL PARAMETER ESTIMATE                           ********************

 THETA - VECTOR OF FIXED EFFECTS PARAMETERS   *********
         TH 1      TH 2      TH 3      TH 4
         3.00E+00  5.97E+00  1.47E+00  1.57E+00

 OMEGA - COV MATRIX FOR RANDOM EFFECTS - ETAS  ********
            ETA1      ETA2      ETA3      ETA4
 ETA1
+        5.57E-01
 ETA2
+        1.57E-01  2.75E-01
 ETA3
+        0.00E+00  0.00E+00  2.47E-01
 ETA4
+        0.00E+00  0.00E+00  0.00E+00  0.00E+00

 SIGMA - COV MATRIX FOR RANDOM EFFECTS - EPSILONS  ****
            EPS1
 EPS1
+        2.91E+00

 OMEGA - CORR MATRIX FOR RANDOM EFFECTS - ETAS  *******
            ETA1      ETA2      ETA3      ETA4
 ETA1
+        7.46E-01
 ETA2
+        4.02E-01  5.24E-01
 ETA3
+        0.00E+00  0.00E+00  4.97E-01
 ETA4
+        0.00E+00  0.00E+00  0.00E+00  0.00E+00

 SIGMA - CORR MATRIX FOR RANDOM EFFECTS - EPSILONS  ***
            EPS1
 EPS1
+        1.71E+00

 ********************               OBJECTIVE FUNCTION EVALUATION BY IMPORTANCE SAMPLING             ********************
 ********************                          STANDARD ERROR OF ESTIMATE (R)                        ********************

 THETA - VECTOR OF FIXED EFFECTS PARAMETERS   *********
         TH 1      TH 2      TH 3      TH 4
         1.42E-01  1.19E-01  1.36E-01  7.13E-02

 OMEGA - COV MATRIX FOR RANDOM EFFECTS - ETAS  ********
            ETA1      ETA2      ETA3      ETA4
 ETA1
+        1.40E-01
 ETA2
+        1.12E-01  1.44E-01
 ETA3
+        0.00E+00  0.00E+00  6.64E-02
 ETA4
+        0.00E+00  0.00E+00  0.00E+00  0.00E+00

 SIGMA - COV MATRIX FOR RANDOM EFFECTS - EPSILONS  ****
            EPS1
 EPS1
+        7.91E-01

 OMEGA - CORR MATRIX FOR RANDOM EFFECTS - ETAS  *******
            ETA1      ETA2      ETA3      ETA4
 ETA1
+        9.39E-02
 ETA2
+        2.07E-01  1.37E-01
 ETA3
+       ......... .........  6.69E-02
 ETA4
+       ......... ......... ......... .........

 SIGMA - CORR MATRIX FOR RANDOM EFFECTS - EPSILONS  ***
            EPS1
 EPS1
+        2.32E-01

 ********************               OBJECTIVE FUNCTION EVALUATION BY IMPORTANCE SAMPLING             ********************
 ********************                        COVARIANCE MATRIX OF ESTIMATE (R)                       ********************

            TH 1      TH 2      TH 3      TH 4      OM11      OM12      OM13      OM14      OM22      OM23      OM24      OM33
             OM34      OM44      SG11
 TH 1
+        2.03E-02
 TH 2
+        1.04E-02  1.42E-02
 TH 3
+       -6.94E-03 -6.11E-03  1.84E-02
 TH 4
+       -1.09E-03  7.96E-04  1.83E-03  5.09E-03
 OM11
+       -4.71E-03 -4.27E-03  8.68E-04  7.70E-04  1.96E-02
 OM12
+        5.25E-03 -5.06E-04 -3.64E-03 -8.93E-04  5.37E-03  1.25E-02
 OM13
+       ......... ......... ......... ......... ......... ......... .........
 OM14
+       ......... ......... ......... ......... ......... ......... ......... .........
 OM22
+        1.07E-02  4.78E-03 -7.54E-03 -1.57E-03 -2.90E-03  1.08E-02  0.00E+00  0.00E+00  2.07E-02
 OM23
+       ......... ......... ......... ......... ......... ......... ......... ......... ......... .........
 OM24
+       ......... ......... ......... ......... ......... ......... ......... ......... ......... ......... .........
 OM33
+        1.13E-03  5.68E-04 -1.91E-03 -1.65E-03 -6.62E-04  7.53E-04  0.00E+00  0.00E+00  8.63E-04  0.00E+00  0.00E+00  4.41E-03
 OM34
+       ......... ......... ......... ......... ......... ......... ......... ......... ......... ......... ......... .........
         .........
 OM44
+       ......... ......... ......... ......... ......... ......... ......... ......... ......... ......... ......... .........
         ......... .........
 SG11
+       -2.25E-02 -1.12E-02  1.46E-02  1.05E-02  1.05E-02 -1.67E-02  0.00E+00  0.00E+00 -3.73E-02  0.00E+00  0.00E+00 -2.02E-02
          0.00E+00  0.00E+00  6.26E-01

 ********************               OBJECTIVE FUNCTION EVALUATION BY IMPORTANCE SAMPLING             ********************
 ********************                        CORRELATION MATRIX OF ESTIMATE (R)                      ********************

            TH 1      TH 2      TH 3      TH 4      OM11      OM12      OM13      OM14      OM22      OM23      OM24      OM33
             OM34      OM44      SG11
 TH 1
+        1.42E-01
 TH 2
+        6.15E-01  1.19E-01
 TH 3
+       -3.59E-01 -3.77E-01  1.36E-01
 TH 4
+       -1.07E-01  9.35E-02  1.89E-01  7.13E-02
 OM11
+       -2.36E-01 -2.55E-01  4.56E-02  7.70E-02  1.40E-01
 OM12
+        3.30E-01 -3.80E-02 -2.40E-01 -1.12E-01  3.43E-01  1.12E-01
 OM13
+       ......... ......... ......... ......... ......... ......... .........
 OM14
+       ......... ......... ......... ......... ......... ......... ......... .........
 OM22
+        5.21E-01  2.78E-01 -3.86E-01 -1.53E-01 -1.44E-01  6.75E-01  0.00E+00  0.00E+00  1.44E-01
 OM23
+       ......... ......... ......... ......... ......... ......... ......... ......... ......... .........
 OM24
+       ......... ......... ......... ......... ......... ......... ......... ......... ......... ......... .........
 OM33
+        1.19E-01  7.16E-02 -2.12E-01 -3.49E-01 -7.11E-02  1.02E-01  0.00E+00  0.00E+00  9.03E-02  0.00E+00  0.00E+00  6.64E-02
 OM34
+       ......... ......... ......... ......... ......... ......... ......... ......... ......... ......... ......... .........
         .........
 OM44
+       ......... ......... ......... ......... ......... ......... ......... ......... ......... ......... ......... .........
         ......... .........
 SG11
+       -1.99E-01 -1.19E-01  1.36E-01  1.87E-01  9.50E-02 -1.90E-01  0.00E+00  0.00E+00 -3.28E-01  0.00E+00  0.00E+00 -3.84E-01
          0.00E+00  0.00E+00  7.91E-01
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 #CPUT: Total CPU Time in Seconds,      124.972
