Mon 09/30/2013
02:13 PM
;Model Desc:  ar1est_01mod2.ctl
;Project Name: testprob.08.08.08
;Project ID: None

$PROB  ctlar1mod same as ar1est_01mod2.ctl uses new features
$ABBR declare T(NO)
$ABBR DECLARE DOWHILE J
$ABBR declare integer i
$INPUT CX ID DOSE=AMT TIME CP=DV WT MDV
$DATA       ar1sim01mod.dat IGNORE=@

$SUBROUTINES  ADVAN2

$PK
;THETA(1)=MEAN ABSORPTION RATE CONSTANT (1/HR)
;THETA(2)=MEAN ELIMINATION RATE CONSTANT (1/HR)
;THETA(3)=SLOPE OF CLEARANCE VS WEIGHT RELATIONSHIP (LITERS/HR/KG)
;SCALING PARAMETER=VOLUME/WT SINCE DOSE IS WEIGHT-ADJUSTED
   CALLFL=1
   KA=THETA(1)*DEXP(ETA(1))
   K=THETA(2)*DEXP(ETA(2))
   CL=THETA(3)*WT*DEXP(ETA(3))
   SC=CL/K/WT

$ERROR
 IF(NEWIND.NE.2) I=0
 IF(MDV.EQ.0)THEN
    I=I+1
    T(I)=TIME
    J=1
    DO WHILE (J<=I)
    CORRL2(J,1)=EXP(-THETA(4)*(TIME-T(J)))
    J=J+1
    ENDDO
 ENDIF
   Y=F+F*EPS(1)

$THETA
(.1,3,5)      ;[KA]
(.008,.08,.5) ;[KE]
(.004,.04,.9) ;[CL]
(0,.5,1)      ;[Ar_parameter]

$OMEGA
 .09      ;[P]
$OMEGA BLOCK(2)
 .09      ;[P]
 .04      ;[F]
 .09      ;[P]

$SIGMA
 .2       ;[P]

$EST
  NSIG=3
  METHOD=1
  INTERACTION
  MAXEVAL=9999
  PRINT=5
  NOTHETABOUNDTEST
  NOOMEGABOUNDTEST
  NOSIGMABOUNDTEST
  MSFO=ar1est_01mod2.msf

$COV MATRIX=S PRINT=E

$TABLE ID DOSE TIME CP WT
  NOPRINT
  ONEHEADER
  FILE=tabar1mod

NM-TRAN MESSAGES
 WARNINGS AND ERRORS (IF ANY) FOR PROBLEM    1
 (WARNING  2) NM-TRAN INFERS THAT THE DATA ARE POPULATION.
 (WARNING  43) THE $PK BLOCK REQUESTS "CALL ONCE PER INDIVIDUAL RECORD", BUT
 DATA ITEMS ARE USED IN THE $PK BLOCK. VALUES OF THESE DATA ITEMS
 SUBSEQUENT TO THOSE FROM THE FIRST EVENT RECORD WILL BE IGNORED.  IF THIS
 IS NOT APPROPRIATE, THE CALL DATA ITEM CAN BE USED TO OBTAIN ADDITIONAL
 CALLS, OR $PK'S CALLING PROTOCOL SHOULD BE CHANGED.

1NONLINEAR MIXED EFFECTS MODEL PROGRAM (NONMEM) VERSION 7.3beta7.0(P)
 ORIGINALLY DEVELOPED BY STUART BEAL, LEWIS SHEINER, AND ALISON BOECKMANN
 CURRENT DEVELOPERS ARE ROBERT BAUER, ICON DEVELOPMENT SOLUTIONS,
 AND ALISON BOECKMANN. IMPLEMENTATION, EFFICIENCY, AND STANDARDIZATION
 PERFORMED BY NOUS INFOSYSTEMS.
 PROBLEM NO.:         1
 ctlar1mod same as ar1est_01mod2.ctl uses new features
 TOT. NO. OF OBS RECS:      600
 TOT. NO. OF INDIVIDUALS:     60
 ONE COMPARTMENT MODEL WITH FIRST-ORDER ABSORPTION (ADVAN2)
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 #TBLN:      1
 #METH: First Order Conditional Estimation with Interaction
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
 #TERM:
0MINIMIZATION SUCCESSFUL
 NO. OF FUNCTION EVALUATIONS USED:      241
 NO. OF SIG. DIGITS IN FINAL EST.:  3.4

 ETABAR IS THE ARITHMETIC MEAN OF THE ETA-ESTIMATES,
 AND THE P-VALUE IS GIVEN FOR THE NULL HYPOTHESIS THAT THE TRUE MEAN IS 0.

 ETABAR:        -1.6803E-03  1.1775E-02  2.5705E-03
 SE:             3.4227E-02  3.2968E-02  3.1097E-02
 N:                      60          60          60

 P VAL.:         9.6085E-01  7.2096E-01  9.3412E-01

 ETAshrink(%):   6.3933E+00  9.1465E+00  1.1754E+01
 EBVshrink(%):   6.6256E+00  9.2929E+00  1.2478E+01
 EPSshrink(%):   1.0467E+01


 #TERE:
 Elapsed estimation time in seconds:    51.72
 Elapsed covariance time in seconds:     7.88

 ********************               FIRST ORDER CONDITIONAL ESTIMATION WITH INTERACTION              ********************
 #OBJT:**************                       MINIMUM VALUE OF OBJECTIVE FUNCTION                      ********************
 #OBJV:********************************************     -174.896       **************************************************

 ********************               FIRST ORDER CONDITIONAL ESTIMATION WITH INTERACTION              ********************
 ********************                             FINAL PARAMETER ESTIMATE                           ********************

 THETA - VECTOR OF FIXED EFFECTS PARAMETERS   *********
         TH 1      TH 2      TH 3      TH 4
         2.91E+00  8.19E-02  4.60E-02  4.12E-02

 OMEGA - COV MATRIX FOR RANDOM EFFECTS - ETAS  ********
            ETA1      ETA2      ETA3
 ETA1
+        8.16E-02
 ETA2
+        0.00E+00  8.03E-02
 ETA3
+        0.00E+00  2.98E-02  7.58E-02

 SIGMA - COV MATRIX FOR RANDOM EFFECTS - EPSILONS  ****
            EPS1
 EPS1
+        5.66E-02

 OMEGA - CORR MATRIX FOR RANDOM EFFECTS - ETAS  *******
            ETA1      ETA2      ETA3
 ETA1
+        2.86E-01
 ETA2
+        0.00E+00  2.83E-01
 ETA3
+        0.00E+00  3.82E-01  2.75E-01

 SIGMA - CORR MATRIX FOR RANDOM EFFECTS - EPSILONS  ***
            EPS1
 EPS1
+        2.38E-01

 ********************               FIRST ORDER CONDITIONAL ESTIMATION WITH INTERACTION              ********************
 ********************                            STANDARD ERROR OF ESTIMATE                          ********************

 THETA - VECTOR OF FIXED EFFECTS PARAMETERS   *********
         TH 1      TH 2      TH 3      TH 4
         1.21E-01  3.50E-03  2.42E-03  1.66E-02

 OMEGA - COV MATRIX FOR RANDOM EFFECTS - ETAS  ********
            ETA1      ETA2      ETA3
 ETA1
+        1.79E-02
 ETA2
+       .........  1.92E-02
 ETA3
+       .........  1.90E-02  2.34E-02

 SIGMA - COV MATRIX FOR RANDOM EFFECTS - EPSILONS  ****
            EPS1
 EPS1
+        2.25E-02

 OMEGA - CORR MATRIX FOR RANDOM EFFECTS - ETAS  *******
            ETA1      ETA2      ETA3
 ETA1
+        3.13E-02
 ETA2
+       .........  3.38E-02
 ETA3
+       .........  1.86E-01  4.25E-02

 SIGMA - CORR MATRIX FOR RANDOM EFFECTS - EPSILONS  ***
            EPS1
 EPS1
+        4.73E-02

 ********************               FIRST ORDER CONDITIONAL ESTIMATION WITH INTERACTION              ********************
 ********************                          COVARIANCE MATRIX OF ESTIMATE                         ********************

            TH 1      TH 2      TH 3      TH 4      OM11      OM12      OM13      OM22      OM23      OM33      SG11
 TH 1
+        1.47E-02
 TH 2
+       -1.15E-05  1.22E-05
 TH 3
+        2.37E-05  2.95E-06  5.84E-06
 TH 4
+       -2.57E-05 -1.39E-05 -2.32E-05  2.74E-04
 OM11
+       -3.89E-04  5.11E-06  6.68E-06 -5.42E-05  3.20E-04
 OM12
+       ......... ......... ......... ......... ......... .........
 OM13
+       ......... ......... ......... ......... ......... ......... .........
 OM22
+       -4.06E-04 -7.45E-06 -3.58E-06  7.70E-05  3.96E-06 ......... .........  3.68E-04
 OM23
+       -3.79E-04 -5.69E-06 -6.98E-06  1.07E-04 -3.39E-05 ......... .........  2.22E-04  3.60E-04
 OM33
+       -4.69E-04 -1.46E-05 -2.09E-05  2.26E-04 -6.83E-05 ......... .........  2.05E-04  2.95E-04  5.47E-04
 SG11
+        3.24E-05  1.39E-05  3.35E-05 -3.60E-04  7.09E-05 ......... ......... -6.33E-05 -1.11E-04 -2.64E-04  5.06E-04

 ********************               FIRST ORDER CONDITIONAL ESTIMATION WITH INTERACTION              ********************
 ********************                          CORRELATION MATRIX OF ESTIMATE                        ********************

            TH 1      TH 2      TH 3      TH 4      OM11      OM12      OM13      OM22      OM23      OM33      SG11
 TH 1
+        1.21E-01
 TH 2
+       -2.72E-02  3.50E-03
 TH 3
+        8.09E-02  3.49E-01  2.42E-03
 TH 4
+       -1.28E-02 -2.40E-01 -5.80E-01  1.66E-02
 OM11
+       -1.79E-01  8.16E-02  1.54E-01 -1.83E-01  1.79E-02
 OM12
+       ......... ......... ......... ......... ......... .........
 OM13
+       ......... ......... ......... ......... ......... ......... .........
 OM22
+       -1.75E-01 -1.11E-01 -7.72E-02  2.42E-01  1.15E-02 ......... .........  1.92E-02
 OM23
+       -1.65E-01 -8.57E-02 -1.52E-01  3.42E-01 -9.98E-02 ......... .........  6.11E-01  1.90E-02
 OM33
+       -1.65E-01 -1.78E-01 -3.70E-01  5.83E-01 -1.63E-01 ......... .........  4.57E-01  6.65E-01  2.34E-02
 SG11
+        1.19E-02  1.77E-01  6.16E-01 -9.66E-01  1.76E-01 ......... ......... -1.47E-01 -2.61E-01 -5.02E-01  2.25E-02
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
 ********************               FIRST ORDER CONDITIONAL ESTIMATION WITH INTERACTION              ********************
 ********************                      EIGENVALUES OF COR MATRIX OF ESTIMATE                     ********************

             1         2         3         4         5         6         7         8         9
         2.36E-02  2.65E-01  4.26E-01  4.49E-01  7.77E-01  9.41E-01  1.09E+00  1.60E+00  3.42E+00
 #CPUT: Total CPU Time in Seconds,       60.154
