Mon 09/30/2013
02:14 PM
;Model Desc:  ar1newsim.ctl: revision of ar1sim01mod.ctl high autocorr
;Project Name: testprob.08.08.08
;Project ID: None

$PROB  ar1sim01mod
$ABBR DECLARE T(NO)
$ABBR DECLARE DOWHILE J
$ABBR declare integer i
$INPUT CX ID DOSE=AMT TIME CP=DV WT MDV
$DATA THEOxlarge.csv IGNORE=C

$SUBROUTINES  ADVAN2

$PK
;THETA(1)=MEAN ABSORPTION RATE CONSTANT (1/HR)
;THETA(2)=MEAN ELIMINATION RATE CONSTANT (1/HR)
;THETA(3)=SLOPE OF CLEARANCE VS WEIGHT RELATIONSHIP (LITERS/HR/KG)
;SCALING PARAMETER=VOLUME/WT SINCE DOSE IS WEIGHT-ADJUSTED
   CALLFL=1
   KA=THETA(1)*DEXP(ETA(1))
   K=THETA(2)*DEXP(ETA(2))
   CL=THETA(3)*WT*DEXP(ETA(3))
   SC=CL/K/WT

$ERROR
IF (ICALL.EQ.4) THEN
IF(NEWIND.NE.2)I=0
IF(MDV.EQ.0)THEN
   I=I+1
   T(I)=TIME
   J=1
   DO WHILE (J <= I)
  CORRL2(J,1)=EXP(-THETA(4)*(TIME-T(J)))
   J=J+1
   ENDDO
ENDIF
CALL SIMEPS(EPS)
ENDIF
   Y=F+F*EPS(1)

$THETA
(.1,3,5)      ;[KA]
(.008,.08,.5) ;[KE]
(.004,.04,.9) ;[CL]
(0,.05,1)      ;[Ar-parameter]

$OMEGA
 .09      ;[P]
$OMEGA BLOCK(2)
 .09      ;[P]
 .04      ;[F]
 .09      ;[P]

$SIGMA
 .04         ;[P]

$SIM (4831923) ONLY

$TABLE CX ID DOSE TIME CP WT MDV
  NOPRINT
  ONEHEADER
  NOAPPEND
  FILE=ar1newsim.dat

NM-TRAN MESSAGES
 WARNINGS AND ERRORS (IF ANY) FOR PROBLEM    1
 (WARNING  2) NM-TRAN INFERS THAT THE DATA ARE POPULATION.
 (WARNING  43) THE $PK BLOCK REQUESTS "CALL ONCE PER INDIVIDUAL RECORD", BUT
 DATA ITEMS ARE USED IN THE $PK BLOCK. VALUES OF THESE DATA ITEMS
 SUBSEQUENT TO THOSE FROM THE FIRST EVENT RECORD WILL BE IGNORED.  IF THIS
 IS NOT APPROPRIATE, THE CALL DATA ITEM CAN BE USED TO OBTAIN ADDITIONAL
 CALLS, OR $PK'S CALLING PROTOCOL SHOULD BE CHANGED.
 (WARNING  116) A SIMULATION BLOCK ASSIGNS VALUES TO CORRL2 AND CALLS
 SIMEPS.  THE DEFAULT CALL TO SIMEPS WILL BE OMITTED.

1NONLINEAR MIXED EFFECTS MODEL PROGRAM (NONMEM) VERSION 7.3beta7.0(P)
 ORIGINALLY DEVELOPED BY STUART BEAL, LEWIS SHEINER, AND ALISON BOECKMANN
 CURRENT DEVELOPERS ARE ROBERT BAUER, ICON DEVELOPMENT SOLUTIONS,
 AND ALISON BOECKMANN. IMPLEMENTATION, EFFICIENCY, AND STANDARDIZATION
 PERFORMED BY NOUS INFOSYSTEMS.
 PROBLEM NO.:         1
 ar1sim01mod
 TOT. NO. OF OBS RECS:      600
 TOT. NO. OF INDIVIDUALS:     60
 ONE COMPARTMENT MODEL WITH FIRST-ORDER ABSORPTION (ADVAN2)
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 SIMULATION STEP PERFORMED
 #CPUT: Total CPU Time in Seconds,        0.140
