$PROBLEM  Parent drug and metabolite, using ADVAN6
$INPUT ID TIME AMT UVOL DV CMT MDV EVID L2
$DATA dextrometab.dat IGNORE=#
$SUBROUTINES ADVAN6 TRANS1 TOL=4
$MODEL
  COMP=(DEPOT)
  COMP=(PLASMA DEFOBS) ; PARENT IN PLASMA
  COMP=(DEXURIN INITIALOFF NODOSE)  ;PARENT IN URINE
  COMP=METAB    ;METABOLITE IN PLASMA
$PK
  K12=THETA(1)
  MU_1=LOG(THETA(2))
  V2=EXP(MU_1+ETA(1))
  MU_2=LOG(THETA(3))
  CLP=EXP(MU_2+ETA(2)) ; RENAL CL FOR PARENT
  CLB=THETA(4)         ; METABOLIC CL FOR METABOLIC
  CLMR=THETA(5)        ; RENAL CL FOR METABOLITE
  V4=1
  K24=CLB/V2
  K23=CLP/V2
  ; F0=CLP/(CLP+CLB) Omit F0 because parent and metab have different urine compts.
  K45=CLMR/V4
  S2=V2
  S4=V4
  S3=UVOL
  S5=UVOL
$ERROR (EVERY EVENT)
  ACMT=ABS(CMT) ; output compartment may have negative value of CMT
  IF(ACMT.EQ.2) Y=F*(1+EPS(1))
  IF(ACMT.EQ.3) Y=F*(1+EPS(2))
  IF(ACMT.EQ.4) Y=F*(1+EPS(3))
  IF(ACMT.EQ.5) Y=F*(1+EPS(4))
$DES
  DADT(1)=-K12*A(1)
  DADT(2)=K12*A(1)-K23*A(2)-K24*A(2)
  DADT(3)=K23*A(2)
  DADT(4)=K24*A(2)-K45*A(4)
$THETA
  (0.01,0.8,6) ;KA
  (0.01,43,1000);V2
  (0.0001,20,190);CLP
  (0.01,15,90);CLB
  (0.0001,5,90);CLMR
$OMEGA
  0.05  0.05
$SIGMA
  .01 .01 .01 .01
$SIM (111111) ONLYSIM
$TABLE ID TIME AMT UVOL DV SIMP=PRED CMT MDV EVID L2 NOAPPEND FILE=sim_metab_a6.tab
