Sat 04/22/2017
10:55 AM
$PROB  F_FLAG04est2a.ctl
$INPUT C ID DOSE=AMT TIME DV WT TYPE
$DATA example10l.csv IGNORE=@

$SUBROUTINES  ADVAN2 TRANS2

$PK
   CALLFL=1
   MU_1=THETA(1)
   KA=DEXP(MU_1+ETA(1))
   MU_2=THETA(2)
   V=DEXP(MU_2+ETA(2))
   MU_3=THETA(3)
   CL=DEXP(MU_3+ETA(3))
   SC=V/1000

$THETA  1.6 2.3 0.7 0.1 0.1

$OMEGA BLOCK (3)
0.5
0.01 0.5
0.01 0.01 0.5

; Because THETA(4) and THETA(5) have no inter-subject variability
; associated with them, the algorithm must use a more computationally
; expensive gradient evaluation for these two parameters

$SIGMA 0.1

$PRIOR NWPRI
; Priors to Omegas
$OMEGAP BLOCK (3)
0.09 FIX
0.0 0.09
0.0 0.0 0.09
$OMEGAPD (3 FIX)

$ERROR
; Put a limit on this, as it will be exponentiated, to avoid floating
; overflow
    EXPP=THETA(4)+F*THETA(5)
IF (TYPE.EQ.0) THEN
; PK Data
    F_FLAG=0
    Y=F+F*ERR(1) ; a prediction
 ELSE
; Categorical data
    F_FLAG=1
; Use protected exponent PEXP, to avoid numerical overflow
    A=PEXP(EXPP)
    B=1+A
    Y=DV*A/B+(1-DV)/B      ; a likelihood
 ENDIF

$EST METHOD=ITS INTER LAP NITER=1000 PRINT=5 SIGL=6 NSIG=2 NOABORT
     NOPRIOR=1 CTYPE=3 CITER=10 CALPHA=0.05 FILE=example10l.ext
; Because of categorical data, which can make conditional density highly
; non-normal, select a t-distribution with 4 degrees of freedom for
; importance sampling proposal density
$EST METHOD=IMP INTER LAP NITER=1000 PRINT=1 ISAMPLE=300 DF=4 IACCEPT=1.0
$EST METHOD=IMP EONLY=1 NITER=5 ISAMPLE=1000 PRINT=1 DF=4 IACCEPT=1.0
     MAPITER=0

$EST METHOD=SAEM EONLY=0 INTER LAP NBURN=2000 NITER=1000 PRINT=50
     DF=0 IACCEPT=0.4
$EST METHOD=IMP EONLY=1 NITER=5 ISAMPLE=1000 PRINT=1 DF=4
     IACCEPT=1.0 MAPITER=0

$EST METHOD=BAYES NBURN=3000 NSAMPLE=3000 PRINT=100
     FILE=example10l.txt DF=0 IACCEPT=0.4 NOPRIOR=0

$EST METHOD=COND LAP INTER MAXEVAL=9999 PRINT=1 FILE=example10l.ext
     NOPRIOR=1

$COV UNCONDITIONAL PRINT=E MATRIX=R SIGL=10
$TABLE ID DOSE WT TIME TYPE DV A NOPRINT FILE=example10l.tab

NM-TRAN MESSAGES
 WARNINGS AND ERRORS (IF ANY) FOR PROBLEM    1
 (WARNING  2) NM-TRAN INFERS THAT THE DATA ARE POPULATION.
 (WARNING  3) THERE MAY BE AN ERROR IN THE ABBREVIATED CODE. THE FOLLOWING
 ONE OR MORE RANDOM VARIABLES ARE DEFINED WITH "IF" STATEMENTS THAT DO NOT
 PROVIDE DEFINITIONS FOR BOTH THE "THEN" AND "ELSE" CASES. IF ALL
 CONDITIONS FAIL, THE VALUES OF THESE VARIABLES WILL BE ZERO.
   A B
 (WARNING  87) WITH "LAPLACIAN" AND "INTERACTION", "NUMERICAL" AND "SLOW"
 ARE ALSO REQUIRED ON $ESTIM RECORD, AND "SLOW" IS REQUIRED ON $COV
 RECORD. NM-TRAN HAS SUPPLIED THESE OPTIONS.
 (WARNING  87) WITH "LAPLACIAN" AND "INTERACTION", "NUMERICAL" AND "SLOW"
 ARE ALSO REQUIRED ON $ESTIM RECORD, AND "SLOW" IS REQUIRED ON $COV
 RECORD. NM-TRAN HAS SUPPLIED THESE OPTIONS.
 (WARNING  87) WITH "LAPLACIAN" AND "INTERACTION", "NUMERICAL" AND "SLOW"
 ARE ALSO REQUIRED ON $ESTIM RECORD, AND "SLOW" IS REQUIRED ON $COV
 RECORD. NM-TRAN HAS SUPPLIED THESE OPTIONS.
 (WARNING  87) WITH "LAPLACIAN" AND "INTERACTION", "NUMERICAL" AND "SLOW"
 ARE ALSO REQUIRED ON $ESTIM RECORD, AND "SLOW" IS REQUIRED ON $COV
 RECORD. NM-TRAN HAS SUPPLIED THESE OPTIONS.
 (WARNING  87) WITH "LAPLACIAN" AND "INTERACTION", "NUMERICAL" AND "SLOW"
 ARE ALSO REQUIRED ON $ESTIM RECORD, AND "SLOW" IS REQUIRED ON $COV
 RECORD. NM-TRAN HAS SUPPLIED THESE OPTIONS.
 (WARNING  87) WITH "LAPLACIAN" AND "INTERACTION", "NUMERICAL" AND "SLOW"
 ARE ALSO REQUIRED ON $ESTIM RECORD, AND "SLOW" IS REQUIRED ON $COV
 RECORD. NM-TRAN HAS SUPPLIED THESE OPTIONS.
 (WARNING  87) WITH "LAPLACIAN" AND "INTERACTION", "NUMERICAL" AND "SLOW"
 ARE ALSO REQUIRED ON $ESTIM RECORD, AND "SLOW" IS REQUIRED ON $COV
 RECORD. NM-TRAN HAS SUPPLIED THESE OPTIONS.

1NONLINEAR MIXED EFFECTS MODEL PROGRAM (NONMEM) VERSION 7.4.0 beta 2 (nm74b2)
 ORIGINALLY DEVELOPED BY STUART BEAL, LEWIS SHEINER, AND ALISON BOECKMANN
 CURRENT DEVELOPERS ARE ROBERT BAUER, ICON DEVELOPMENT SOLUTIONS,
 AND ALISON BOECKMANN. IMPLEMENTATION, EFFICIENCY, AND STANDARDIZATION
 PERFORMED BY NOUS INFOSYSTEMS.
 PROBLEM NO.:         1
 F_FLAG04est2a.ctl
 TOT. NO. OF OBS RECS:     4320
 TOT. NO. OF INDIVIDUALS:      288
 ONE COMPARTMENT MODEL WITH FIRST-ORDER ABSORPTION (ADVAN2)
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 #TBLN:      1
 #METH: Iterative Two Stage (No Prior)
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
 #TERM:
 OPTIMIZATION WAS COMPLETED

 ETABAR IS THE ARITHMETIC MEAN OF THE ETA-ESTIMATES,
 AND THE P-VALUE IS GIVEN FOR THE NULL HYPOTHESIS THAT THE TRUE MEAN IS 0.

 ETABAR:         8.4848E-09  1.4928E-08  1.1213E-08
 SE:             1.4383E-02  1.5606E-02  1.6943E-02
 N:                     288         288         288

 P VAL.:         1.0000E+00  1.0000E+00  1.0000E+00

 ETASHRINKSD(%)  1.6452E+01  2.8167E+00  1.6167E+00
 ETASHRINKVR(%)  3.0197E+01  5.5540E+00  3.2073E+00
 EBVSHRINKSD(%)  1.6452E+01  2.8167E+00  1.6167E+00
 EBVSHRINKVR(%)  3.0197E+01  5.5540E+00  3.2073E+00
 EPSSHRINKSD(%)  1.2873E+01
 EPSSHRINKVR(%)  2.4089E+01


 TOTAL DATA POINTS NORMALLY DISTRIBUTED (N):         2880
 N*LOG(2PI) CONSTANT TO OBJECTIVE FUNCTION:    5293.08595125891
 OBJECTIVE FUNCTION VALUE WITHOUT CONSTANT:    10041.4632424943
 OBJECTIVE FUNCTION VALUE WITH CONSTANT:       15334.5491937532
 REPORTED OBJECTIVE FUNCTION DOES NOT CONTAIN CONSTANT

 TOTAL EFFECTIVE ETAS (NIND*NETA):                           864


 #TERE:
 Elapsed estimation  time in seconds:    24.63
 Elapsed covariance  time in seconds:     0.67

 ********************                          ITERATIVE TWO STAGE (NO PRIOR)                        ********************
 #OBJT:**************                        FINAL VALUE OF OBJECTIVE FUNCTION                       ********************
 #OBJV:********************************************    10041.463       **************************************************

 ********************                          ITERATIVE TWO STAGE (NO PRIOR)                        ********************
 ********************                             FINAL PARAMETER ESTIMATE                           ********************

 THETA - VECTOR OF FIXED EFFECTS PARAMETERS   *********
         TH 1      TH 2      TH 3      TH 4      TH 5
         1.07E+00  3.39E+00  2.44E+00 -6.48E-01  8.06E-02

 OMEGA - COV MATRIX FOR RANDOM EFFECTS - ETAS  ********
         ETA1      ETA2      ETA3
 ETA1
+        8.56E-02
 ETA2
+        3.73E-03  7.45E-02
 ETA3
+        3.59E-02  2.99E-02  8.57E-02

 SIGMA - COV MATRIX FOR RANDOM EFFECTS - EPSILONS  ****
         EPS1
 EPS1
+        2.27E-02

 OMEGA - CORR MATRIX FOR RANDOM EFFECTS - ETAS  *******
         ETA1      ETA2      ETA3
 ETA1
+        2.93E-01
 ETA2
+        4.67E-02  2.73E-01
 ETA3
+        4.19E-01  3.75E-01  2.93E-01

 SIGMA - CORR MATRIX FOR RANDOM EFFECTS - EPSILONS  ***
         EPS1
 EPS1
+        1.51E-01

 ********************                          ITERATIVE TWO STAGE (NO PRIOR)                        ********************
 ********************                          STANDARD ERROR OF ESTIMATE (S)                        ********************

 THETA - VECTOR OF FIXED EFFECTS PARAMETERS   *********
         TH 1      TH 2      TH 3      TH 4      TH 5
         2.29E-02  1.67E-02  1.76E-02  9.97E-02  7.20E-03

 OMEGA - COV MATRIX FOR RANDOM EFFECTS - ETAS  ********
         ETA1      ETA2      ETA3
 ETA1
+        9.94E-03
 ETA2
+        6.31E-03  6.42E-03
 ETA3
+        7.19E-03  5.17E-03  7.27E-03

 SIGMA - COV MATRIX FOR RANDOM EFFECTS - EPSILONS  ****
         EPS1
 EPS1
+        7.73E-04

 OMEGA - CORR MATRIX FOR RANDOM EFFECTS - ETAS  *******
         ETA1      ETA2      ETA3
 ETA1
+        1.70E-02
 ETA2
+        7.83E-02  1.18E-02
 ETA3
+        6.12E-02  5.31E-02  1.24E-02

 SIGMA - CORR MATRIX FOR RANDOM EFFECTS - EPSILONS  ***
         EPS1
 EPS1
+        2.56E-03

 ********************                          ITERATIVE TWO STAGE (NO PRIOR)                        ********************
 ********************                        COVARIANCE MATRIX OF ESTIMATE (S)                       ********************

            TH 1      TH 2      TH 3      TH 4      TH 5      OM11      OM12      OM13      OM22      OM23      OM33      SG11
 TH 1
+        5.25E-04
 TH 2
+        3.38E-05  2.79E-04
 TH 3
+        1.35E-04  1.18E-04  3.11E-04
 TH 4
+       -3.18E-05 -9.05E-05 -9.62E-05  9.94E-03
 TH 5
+        8.05E-06  6.45E-06  5.62E-06 -4.92E-04  5.18E-05
 OM11
+        7.31E-05  2.96E-06 -1.99E-06  6.36E-05 -2.34E-06  9.88E-05
 OM12
+        1.39E-05  5.56E-06  6.11E-06 -9.16E-05  4.25E-06  1.21E-05  3.98E-05
 OM13
+        2.22E-05  4.26E-06  1.78E-06 -2.13E-05  8.52E-07  5.52E-05  1.82E-05  5.17E-05
 OM22
+        8.18E-06 -2.54E-06  9.79E-07  3.08E-06  1.76E-06  6.27E-06  4.40E-06  5.14E-06  4.12E-05
 OM23
+        5.30E-06  1.20E-06  2.05E-06 -3.01E-05  3.42E-06  5.23E-06  1.49E-05  9.61E-06  1.49E-05  2.67E-05
 OM33
+        2.48E-06  3.15E-06  4.35E-06 -5.95E-05  1.47E-06  6.37E-06  1.21E-05  1.99E-05  3.76E-06  1.79E-05  5.29E-05
 SG11
+        2.19E-07  9.73E-07  2.13E-07  7.06E-07  3.00E-07 -5.51E-08 -2.56E-07  1.71E-07 -6.57E-07 -6.40E-07  3.38E-07  5.97E-07

 ********************                          ITERATIVE TWO STAGE (NO PRIOR)                        ********************
 ********************                        CORRELATION MATRIX OF ESTIMATE (S)                      ********************

            TH 1      TH 2      TH 3      TH 4      TH 5      OM11      OM12      OM13      OM22      OM23      OM33      SG11
 TH 1
+        2.29E-02
 TH 2
+        8.82E-02  1.67E-02
 TH 3
+        3.34E-01  4.02E-01  1.76E-02
 TH 4
+       -1.39E-02 -5.44E-02 -5.47E-02  9.97E-02
 TH 5
+        4.88E-02  5.36E-02  4.43E-02 -6.86E-01  7.20E-03
 OM11
+        3.21E-01  1.78E-02 -1.13E-02  6.42E-02 -3.27E-02  9.94E-03
 OM12
+        9.60E-02  5.28E-02  5.49E-02 -1.46E-01  9.36E-02  1.93E-01  6.31E-03
 OM13
+        1.35E-01  3.54E-02  1.40E-02 -2.97E-02  1.65E-02  7.72E-01  4.01E-01  7.19E-03
 OM22
+        5.56E-02 -2.37E-02  8.65E-03  4.81E-03  3.82E-02  9.82E-02  1.09E-01  1.11E-01  6.42E-03
 OM23
+        4.48E-02  1.39E-02  2.25E-02 -5.83E-02  9.20E-02  1.02E-01  4.57E-01  2.59E-01  4.50E-01  5.17E-03
 OM33
+        1.49E-02  2.59E-02  3.39E-02 -8.21E-02  2.81E-02  8.81E-02  2.64E-01  3.81E-01  8.05E-02  4.77E-01  7.27E-03
 SG11
+        1.24E-02  7.54E-02  1.57E-02  9.17E-03  5.40E-02 -7.18E-03 -5.25E-02  3.08E-02 -1.32E-01 -1.60E-01  6.01E-02  7.73E-04
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
 ********************                          ITERATIVE TWO STAGE (NO PRIOR)                        ********************
 ********************                    EIGENVALUES OF COR MATRIX OF ESTIMATE (S)                   ********************

             1         2         3         4         5         6         7         8         9        10        11        12
         1.33E-01  2.74E-01  3.51E-01  5.04E-01  6.96E-01  8.06E-01  8.78E-01  1.12E+00  1.33E+00  1.58E+00  1.75E+00  2.58E+00
 #TBLN:      2
 #METH: Importance Sampling (No Prior)
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
 #TERM:
 OPTIMIZATION WAS COMPLETED

 ETABAR IS THE ARITHMETIC MEAN OF THE ETA-ESTIMATES,
 AND THE P-VALUE IS GIVEN FOR THE NULL HYPOTHESIS THAT THE TRUE MEAN IS 0.

 ETABAR:        -1.2761E-03 -4.4904E-04 -1.6775E-04
 SE:             1.4849E-02  1.5636E-02  1.6916E-02
 N:                     288         288         288

 P VAL.:         9.3151E-01  9.7709E-01  9.9209E-01

 ETASHRINKSD(%)  1.7185E+01  2.9145E+00  1.5770E+00
 ETASHRINKVR(%)  3.1416E+01  5.7440E+00  3.1290E+00
 EBVSHRINKSD(%)  1.7278E+01  2.8492E+00  1.6523E+00
 EBVSHRINKVR(%)  3.1571E+01  5.6172E+00  3.2774E+00
 EPSSHRINKSD(%)  1.3530E+01
 EPSSHRINKVR(%)  2.5229E+01


 TOTAL DATA POINTS NORMALLY DISTRIBUTED (N):         2880
 N*LOG(2PI) CONSTANT TO OBJECTIVE FUNCTION:    5293.08595125891
 OBJECTIVE FUNCTION VALUE WITHOUT CONSTANT:    10021.8553805188
 OBJECTIVE FUNCTION VALUE WITH CONSTANT:       15314.9413317777
 REPORTED OBJECTIVE FUNCTION DOES NOT CONTAIN CONSTANT

 TOTAL EFFECTIVE ETAS (NIND*NETA):                           864


 #TERE:
 Elapsed estimation  time in seconds:    51.00
 Elapsed covariance  time in seconds:    21.44

 ********************                          IMPORTANCE SAMPLING (NO PRIOR)                        ********************
 #OBJT:**************                        FINAL VALUE OF OBJECTIVE FUNCTION                       ********************
 #OBJV:********************************************    10021.855       **************************************************

 ********************                          IMPORTANCE SAMPLING (NO PRIOR)                        ********************
 ********************                             FINAL PARAMETER ESTIMATE                           ********************

 THETA - VECTOR OF FIXED EFFECTS PARAMETERS   *********
         TH 1      TH 2      TH 3      TH 4      TH 5
         1.12E+00  3.39E+00  2.44E+00 -6.47E-01  8.07E-02

 OMEGA - COV MATRIX FOR RANDOM EFFECTS - ETAS  ********
         ETA1      ETA2      ETA3
 ETA1
+        9.29E-02
 ETA2
+        3.99E-03  7.50E-02
 ETA3
+        3.77E-02  2.95E-02  8.54E-02

 SIGMA - COV MATRIX FOR RANDOM EFFECTS - EPSILONS  ****
         EPS1
 EPS1
+        2.28E-02

 OMEGA - CORR MATRIX FOR RANDOM EFFECTS - ETAS  *******
         ETA1      ETA2      ETA3
 ETA1
+        3.05E-01
 ETA2
+        4.79E-02  2.74E-01
 ETA3
+        4.24E-01  3.69E-01  2.92E-01

 SIGMA - CORR MATRIX FOR RANDOM EFFECTS - EPSILONS  ***
         EPS1
 EPS1
+        1.51E-01

 ********************                          IMPORTANCE SAMPLING (NO PRIOR)                        ********************
 ********************                          STANDARD ERROR OF ESTIMATE (R)                        ********************

 THETA - VECTOR OF FIXED EFFECTS PARAMETERS   *********
         TH 1      TH 2      TH 3      TH 4      TH 5
         2.24E-02  1.66E-02  1.75E-02  9.50E-02  6.16E-03

 OMEGA - COV MATRIX FOR RANDOM EFFECTS - ETAS  ********
         ETA1      ETA2      ETA3
 ETA1
+        1.14E-02
 ETA2
+        6.26E-03  6.65E-03
 ETA3
+        7.01E-03  5.31E-03  7.35E-03

 SIGMA - COV MATRIX FOR RANDOM EFFECTS - EPSILONS  ****
         EPS1
 EPS1
+        7.20E-04

 OMEGA - CORR MATRIX FOR RANDOM EFFECTS - ETAS  *******
         ETA1      ETA2      ETA3
 ETA1
+        1.88E-02
 ETA2
+        7.45E-02  1.21E-02
 ETA3
+        6.18E-02  5.29E-02  1.26E-02

 SIGMA - CORR MATRIX FOR RANDOM EFFECTS - EPSILONS  ***
         EPS1
 EPS1
+        2.38E-03

 ********************                          IMPORTANCE SAMPLING (NO PRIOR)                        ********************
 ********************                        COVARIANCE MATRIX OF ESTIMATE (R)                       ********************

            TH 1      TH 2      TH 3      TH 4      TH 5      OM11      OM12      OM13      OM22      OM23      OM33      SG11
 TH 1
+        5.02E-04
 TH 2
+        3.19E-05  2.77E-04
 TH 3
+        1.41E-04  1.15E-04  3.07E-04
 TH 4
+        1.71E-06 -1.38E-06 -6.93E-07  9.02E-03
 TH 5
+        1.78E-06  1.08E-06  8.80E-07 -3.61E-04  3.80E-05
 OM11
+        3.91E-05 -7.97E-07  1.71E-07  6.04E-07  9.17E-08  1.31E-04
 OM12
+        5.31E-06  1.44E-06  1.00E-06  8.76E-08  8.76E-09  8.62E-06  3.92E-05
 OM13
+        7.37E-06 -8.39E-07  5.49E-08  1.31E-06 -1.29E-07  4.16E-05  1.76E-05  4.91E-05
 OM22
+        2.24E-06  6.62E-07  1.25E-07 -1.03E-06  2.32E-07  7.48E-07  4.92E-06  2.18E-06  4.42E-05
 OM23
+       -4.17E-07 -1.13E-07  1.84E-07 -1.68E-07  7.03E-08  2.32E-06  1.23E-05  7.34E-06  1.83E-05  2.82E-05
 OM33
+       -1.47E-06  1.47E-07  3.56E-07  6.99E-08 -9.42E-09  1.08E-05  9.36E-06  2.46E-05  7.64E-06  2.02E-05  5.41E-05
 SG11
+        2.82E-07  4.45E-07  3.84E-07 -1.33E-08  3.25E-08 -6.67E-07 -9.21E-08 -4.93E-08 -9.14E-08 -7.31E-08 -5.41E-08  5.18E-07

 ********************                          IMPORTANCE SAMPLING (NO PRIOR)                        ********************
 ********************                        CORRELATION MATRIX OF ESTIMATE (R)                      ********************

            TH 1      TH 2      TH 3      TH 4      TH 5      OM11      OM12      OM13      OM22      OM23      OM33      SG11
 TH 1
+        2.24E-02
 TH 2
+        8.54E-02  1.66E-02
 TH 3
+        3.58E-01  3.95E-01  1.75E-02
 TH 4
+        8.03E-04 -8.76E-04 -4.16E-04  9.50E-02
 TH 5
+        1.29E-02  1.05E-02  8.15E-03 -6.16E-01  6.16E-03
 OM11
+        1.52E-01 -4.19E-03  8.50E-04  5.56E-04  1.30E-03  1.14E-02
 OM12
+        3.79E-02  1.38E-02  9.12E-03  1.47E-04  2.27E-04  1.20E-01  6.26E-03
 OM13
+        4.69E-02 -7.20E-03  4.47E-04  1.97E-03 -2.98E-03  5.19E-01  4.02E-01  7.01E-03
 OM22
+        1.50E-02  5.98E-03  1.07E-03 -1.64E-03  5.65E-03  9.83E-03  1.18E-01  4.69E-02  6.65E-03
 OM23
+       -3.50E-03 -1.27E-03  1.98E-03 -3.32E-04  2.15E-03  3.82E-02  3.68E-01  1.97E-01  5.19E-01  5.31E-03
 OM33
+       -8.95E-03  1.20E-03  2.76E-03  1.00E-04 -2.08E-04  1.29E-01  2.03E-01  4.78E-01  1.56E-01  5.17E-01  7.35E-03
 SG11
+        1.75E-02  3.72E-02  3.05E-02 -1.94E-04  7.32E-03 -8.09E-02 -2.04E-02 -9.78E-03 -1.91E-02 -1.91E-02 -1.02E-02  7.20E-04
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
 ********************                          IMPORTANCE SAMPLING (NO PRIOR)                        ********************
 ********************                    EIGENVALUES OF COR MATRIX OF ESTIMATE (R)                   ********************

             1         2         3         4         5         6         7         8         9        10        11        12
         2.29E-01  3.83E-01  4.03E-01  5.02E-01  7.68E-01  8.18E-01  9.29E-01  1.01E+00  1.39E+00  1.59E+00  1.62E+00  2.35E+00
 #TBLN:      3
 #METH: Objective Function Evaluation by Importance Sampling (No Prior)
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
 #TERM:
 EXPECTATION ONLY PROCESS COMPLETED

 ETABAR IS THE ARITHMETIC MEAN OF THE ETA-ESTIMATES,
 AND THE P-VALUE IS GIVEN FOR THE NULL HYPOTHESIS THAT THE TRUE MEAN IS 0.

 ETABAR:        -2.8917E-04 -2.7205E-04 -1.2474E-04
 SE:             1.4820E-02  1.5623E-02  1.6910E-02
 N:                     288         288         288

 P VAL.:         9.8443E-01  9.8611E-01  9.9411E-01

 ETASHRINKSD(%)  1.7346E+01  2.9960E+00  1.6104E+00
 ETASHRINKVR(%)  3.1682E+01  5.9022E+00  3.1949E+00
 EBVSHRINKSD(%)  1.7330E+01  2.8530E+00  1.6484E+00
 EBVSHRINKVR(%)  3.1656E+01  5.6246E+00  3.2696E+00
 EPSSHRINKSD(%)  1.3526E+01
 EPSSHRINKVR(%)  2.5223E+01


 TOTAL DATA POINTS NORMALLY DISTRIBUTED (N):         2880
 N*LOG(2PI) CONSTANT TO OBJECTIVE FUNCTION:    5293.08595125891
 OBJECTIVE FUNCTION VALUE WITHOUT CONSTANT:    10020.3774484068
 OBJECTIVE FUNCTION VALUE WITH CONSTANT:       15313.4633996657
 REPORTED OBJECTIVE FUNCTION DOES NOT CONTAIN CONSTANT

 TOTAL EFFECTIVE ETAS (NIND*NETA):                           864


 #TERE:
 Elapsed estimation  time in seconds:    13.33
 Elapsed covariance  time in seconds:    68.79

 ********************         OBJECTIVE FUNCTION EVALUATION BY IMPORTANCE SAMPLING (NO PRIOR)        ********************
 #OBJT:**************                        FINAL VALUE OF OBJECTIVE FUNCTION                       ********************
 #OBJV:********************************************    10020.377       **************************************************

 ********************         OBJECTIVE FUNCTION EVALUATION BY IMPORTANCE SAMPLING (NO PRIOR)        ********************
 ********************                             FINAL PARAMETER ESTIMATE                           ********************

 THETA - VECTOR OF FIXED EFFECTS PARAMETERS   *********
         TH 1      TH 2      TH 3      TH 4      TH 5
         1.12E+00  3.39E+00  2.44E+00 -6.47E-01  8.07E-02

 OMEGA - COV MATRIX FOR RANDOM EFFECTS - ETAS  ********
         ETA1      ETA2      ETA3
 ETA1
+        9.29E-02
 ETA2
+        3.99E-03  7.50E-02
 ETA3
+        3.77E-02  2.95E-02  8.54E-02

 SIGMA - COV MATRIX FOR RANDOM EFFECTS - EPSILONS  ****
         EPS1
 EPS1
+        2.28E-02

 OMEGA - CORR MATRIX FOR RANDOM EFFECTS - ETAS  *******
         ETA1      ETA2      ETA3
 ETA1
+        3.05E-01
 ETA2
+        4.79E-02  2.74E-01
 ETA3
+        4.24E-01  3.69E-01  2.92E-01

 SIGMA - CORR MATRIX FOR RANDOM EFFECTS - EPSILONS  ***
         EPS1
 EPS1
+        1.51E-01

 ********************         OBJECTIVE FUNCTION EVALUATION BY IMPORTANCE SAMPLING (NO PRIOR)        ********************
 ********************                          STANDARD ERROR OF ESTIMATE (R)                        ********************

 THETA - VECTOR OF FIXED EFFECTS PARAMETERS   *********
         TH 1      TH 2      TH 3      TH 4      TH 5
         2.24E-02  1.66E-02  1.75E-02  9.50E-02  6.16E-03

 OMEGA - COV MATRIX FOR RANDOM EFFECTS - ETAS  ********
         ETA1      ETA2      ETA3
 ETA1
+        1.17E-02
 ETA2
+        6.28E-03  6.66E-03
 ETA3
+        7.03E-03  5.33E-03  7.36E-03

 SIGMA - COV MATRIX FOR RANDOM EFFECTS - EPSILONS  ****
         EPS1
 EPS1
+        7.20E-04

 OMEGA - CORR MATRIX FOR RANDOM EFFECTS - ETAS  *******
         ETA1      ETA2      ETA3
 ETA1
+        1.91E-02
 ETA2
+        7.48E-02  1.22E-02
 ETA3
+        6.25E-02  5.30E-02  1.26E-02

 SIGMA - CORR MATRIX FOR RANDOM EFFECTS - EPSILONS  ***
         EPS1
 EPS1
+        2.39E-03

 ********************         OBJECTIVE FUNCTION EVALUATION BY IMPORTANCE SAMPLING (NO PRIOR)        ********************
 ********************                        COVARIANCE MATRIX OF ESTIMATE (R)                       ********************

            TH 1      TH 2      TH 3      TH 4      TH 5      OM11      OM12      OM13      OM22      OM23      OM33      SG11
 TH 1
+        5.03E-04
 TH 2
+        3.20E-05  2.77E-04
 TH 3
+        1.41E-04  1.15E-04  3.07E-04
 TH 4
+        2.03E-06 -1.21E-06 -5.93E-07  9.02E-03
 TH 5
+        1.76E-06  1.05E-06  8.64E-07 -3.61E-04  3.80E-05
 OM11
+        3.95E-05 -8.67E-07 -2.65E-07  3.21E-07  1.41E-07  1.36E-04
 OM12
+        5.13E-06  9.62E-07  7.71E-07  8.42E-08  1.19E-08  8.63E-06  3.95E-05
 OM13
+        7.24E-06 -1.11E-06 -5.28E-07  1.26E-06 -1.26E-07  4.14E-05  1.80E-05  4.95E-05
 OM22
+        2.26E-06  4.63E-07  7.81E-09 -8.78E-07  2.11E-07  8.64E-07  5.11E-06  2.33E-06  4.44E-05
 OM23
+       -4.72E-07 -2.37E-07  4.58E-08 -8.21E-08  5.73E-08  2.54E-06  1.23E-05  7.49E-06  1.85E-05  2.84E-05
 OM33
+       -1.59E-06  6.97E-08  2.73E-07  1.02E-07 -1.54E-08  1.09E-05  9.43E-06  2.46E-05  7.74E-06  2.03E-05  5.42E-05
 SG11
+        2.73E-07  4.36E-07  3.73E-07 -8.35E-09  3.06E-08 -7.28E-07 -8.62E-08 -4.75E-08 -9.56E-08 -8.10E-08 -6.08E-08  5.18E-07

 ********************         OBJECTIVE FUNCTION EVALUATION BY IMPORTANCE SAMPLING (NO PRIOR)        ********************
 ********************                        CORRELATION MATRIX OF ESTIMATE (R)                      ********************

            TH 1      TH 2      TH 3      TH 4      TH 5      OM11      OM12      OM13      OM22      OM23      OM33      SG11
 TH 1
+        2.24E-02
 TH 2
+        8.57E-02  1.66E-02
 TH 3
+        3.58E-01  3.95E-01  1.75E-02
 TH 4
+        9.54E-04 -7.63E-04 -3.56E-04  9.50E-02
 TH 5
+        1.27E-02  1.03E-02  8.00E-03 -6.16E-01  6.16E-03
 OM11
+        1.51E-01 -4.47E-03 -1.30E-03  2.90E-04  1.96E-03  1.17E-02
 OM12
+        3.64E-02  9.20E-03  7.00E-03  1.41E-04  3.06E-04  1.18E-01  6.28E-03
 OM13
+        4.59E-02 -9.49E-03 -4.28E-03  1.89E-03 -2.91E-03  5.05E-01  4.07E-01  7.03E-03
 OM22
+        1.51E-02  4.18E-03  6.68E-05 -1.39E-03  5.15E-03  1.11E-02  1.22E-01  4.98E-02  6.66E-03
 OM23
+       -3.95E-03 -2.68E-03  4.91E-04 -1.62E-04  1.74E-03  4.09E-02  3.69E-01  2.00E-01  5.21E-01  5.33E-03
 OM33
+       -9.65E-03  5.69E-04  2.11E-03  1.45E-04 -3.40E-04  1.27E-01  2.04E-01  4.76E-01  1.58E-01  5.18E-01  7.36E-03
 SG11
+        1.69E-02  3.64E-02  2.96E-02 -1.22E-04  6.90E-03 -8.67E-02 -1.91E-02 -9.38E-03 -1.99E-02 -2.11E-02 -1.15E-02  7.20E-04
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
 ********************         OBJECTIVE FUNCTION EVALUATION BY IMPORTANCE SAMPLING (NO PRIOR)        ********************
 ********************                    EIGENVALUES OF COR MATRIX OF ESTIMATE (R)                   ********************

             1         2         3         4         5         6         7         8         9        10        11        12
         2.31E-01  3.83E-01  4.09E-01  5.01E-01  7.67E-01  8.17E-01  9.28E-01  1.02E+00  1.38E+00  1.59E+00  1.62E+00  2.36E+00
 #TBLN:      4
 #METH: Stochastic Approximation Expectation-Maximization (No Prior)
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
 #TERM:
 STOCHASTIC PORTION WAS COMPLETED
 REDUCED STOCHASTIC PORTION WAS COMPLETED

 ETABAR IS THE ARITHMETIC MEAN OF THE ETA-ESTIMATES,
 AND THE P-VALUE IS GIVEN FOR THE NULL HYPOTHESIS THAT THE TRUE MEAN IS 0.

 ETABAR:        -3.9223E-06 -8.3919E-07 -9.4944E-07
 SE:             1.4862E-02  1.5622E-02  1.6913E-02
 N:                     288         288         288

 P VAL.:         9.9979E-01  9.9996E-01  9.9996E-01

 ETASHRINKSD(%)  1.7196E+01  2.8588E+00  1.6419E+00
 ETASHRINKVR(%)  3.1435E+01  5.6359E+00  3.2568E+00
 EBVSHRINKSD(%)  1.7194E+01  2.8587E+00  1.6418E+00
 EBVSHRINKVR(%)  3.1432E+01  5.6357E+00  3.2567E+00
 EPSSHRINKSD(%)  1.3526E+01
 EPSSHRINKVR(%)  2.5223E+01


 TOTAL DATA POINTS NORMALLY DISTRIBUTED (N):         2880
 N*LOG(2PI) CONSTANT TO OBJECTIVE FUNCTION:    5293.08595125891
 OBJECTIVE FUNCTION VALUE WITHOUT CONSTANT:    5486.46948653389
 OBJECTIVE FUNCTION VALUE WITH CONSTANT:       10779.5554377928
 REPORTED OBJECTIVE FUNCTION DOES NOT CONTAIN CONSTANT

 TOTAL EFFECTIVE ETAS (NIND*NETA):                           864
 NIND*NETA*LOG(2PI) CONSTANT TO OBJECTIVE FUNCTION:    1587.92578537767
 OBJECTIVE FUNCTION VALUE WITHOUT CONSTANT:    5486.46948653389
 OBJECTIVE FUNCTION VALUE WITH CONSTANT:       7074.39527191156
 REPORTED OBJECTIVE FUNCTION DOES NOT CONTAIN CONSTANT


 #TERE:
 Elapsed estimation  time in seconds:   141.91
 Elapsed covariance  time in seconds:     0.35

 ********************           STOCHASTIC APPROXIMATION EXPECTATION-MAXIMIZATION (NO PRIOR)         ********************
 #OBJT:**************                        FINAL VALUE OF LIKELIHOOD FUNCTION                      ********************
 #OBJV:********************************************     5486.469       **************************************************

 ********************           STOCHASTIC APPROXIMATION EXPECTATION-MAXIMIZATION (NO PRIOR)         ********************
 ********************                             FINAL PARAMETER ESTIMATE                           ********************

 THETA - VECTOR OF FIXED EFFECTS PARAMETERS   *********
         TH 1      TH 2      TH 3      TH 4      TH 5
         1.12E+00  3.39E+00  2.44E+00 -6.48E-01  8.07E-02

 OMEGA - COV MATRIX FOR RANDOM EFFECTS - ETAS  ********
         ETA1      ETA2      ETA3
 ETA1
+        9.31E-02
 ETA2
+        3.84E-03  7.47E-02
 ETA3
+        3.79E-02  2.95E-02  8.54E-02

 SIGMA - COV MATRIX FOR RANDOM EFFECTS - EPSILONS  ****
         EPS1
 EPS1
+        2.28E-02

 OMEGA - CORR MATRIX FOR RANDOM EFFECTS - ETAS  *******
         ETA1      ETA2      ETA3
 ETA1
+        3.05E-01
 ETA2
+        4.61E-02  2.73E-01
 ETA3
+        4.25E-01  3.69E-01  2.92E-01

 SIGMA - CORR MATRIX FOR RANDOM EFFECTS - EPSILONS  ***
         EPS1
 EPS1
+        1.51E-01

 ********************           STOCHASTIC APPROXIMATION EXPECTATION-MAXIMIZATION (NO PRIOR)         ********************
 ********************                          STANDARD ERROR OF ESTIMATE (S)                        ********************

 THETA - VECTOR OF FIXED EFFECTS PARAMETERS   *********
         TH 1      TH 2      TH 3      TH 4      TH 5
         2.42E-02  1.67E-02  1.76E-02  9.97E-02  7.20E-03

 OMEGA - COV MATRIX FOR RANDOM EFFECTS - ETAS  ********
         ETA1      ETA2      ETA3
 ETA1
+        1.11E-02
 ETA2
+        6.68E-03  6.44E-03
 ETA3
+        7.60E-03  5.17E-03  7.25E-03

 SIGMA - COV MATRIX FOR RANDOM EFFECTS - EPSILONS  ****
         EPS1
 EPS1
+        7.77E-04

 OMEGA - CORR MATRIX FOR RANDOM EFFECTS - ETAS  *******
         ETA1      ETA2      ETA3
 ETA1
+        1.82E-02
 ETA2
+        7.94E-02  1.18E-02
 ETA3
+        6.16E-02  5.33E-02  1.24E-02

 SIGMA - CORR MATRIX FOR RANDOM EFFECTS - EPSILONS  ***
         EPS1
 EPS1
+        2.57E-03

 ********************           STOCHASTIC APPROXIMATION EXPECTATION-MAXIMIZATION (NO PRIOR)         ********************
 ********************                        COVARIANCE MATRIX OF ESTIMATE (S)                       ********************

            TH 1      TH 2      TH 3      TH 4      TH 5      OM11      OM12      OM13      OM22      OM23      OM33      SG11
 TH 1
+        5.88E-04
 TH 2
+        3.53E-05  2.80E-04
 TH 3
+        1.40E-04  1.17E-04  3.10E-04
 TH 4
+       -2.39E-05 -9.10E-05 -9.88E-05  9.94E-03
 TH 5
+        8.30E-06  6.55E-06  5.71E-06 -4.93E-04  5.19E-05
 OM11
+        8.76E-05  3.05E-06 -4.32E-06  7.63E-05 -2.73E-06  1.23E-04
 OM12
+        1.56E-05  5.68E-06  6.19E-06 -9.76E-05  4.67E-06  1.40E-05  4.46E-05
 OM13
+        2.53E-05  4.21E-06  8.14E-07 -1.98E-05  8.18E-07  6.51E-05  2.01E-05  5.77E-05
 OM22
+        8.10E-06 -2.56E-06  6.51E-07  3.54E-06  1.77E-06  6.85E-06  4.41E-06  5.27E-06  4.14E-05
 OM23
+        4.80E-06  9.47E-07  1.79E-06 -3.01E-05  3.45E-06  5.56E-06  1.57E-05  9.89E-06  1.48E-05  2.67E-05
 OM33
+        2.23E-06  3.04E-06  4.84E-06 -6.03E-05  1.52E-06  7.05E-06  1.26E-05  2.10E-05  3.62E-06  1.77E-05  5.26E-05
 SG11
+        7.63E-07  1.02E-06  2.37E-07  7.29E-07  3.03E-07  6.97E-08 -2.64E-07  2.30E-07 -6.50E-07 -6.53E-07  3.30E-07  6.03E-07

 ********************           STOCHASTIC APPROXIMATION EXPECTATION-MAXIMIZATION (NO PRIOR)         ********************
 ********************                        CORRELATION MATRIX OF ESTIMATE (S)                      ********************

            TH 1      TH 2      TH 3      TH 4      TH 5      OM11      OM12      OM13      OM22      OM23      OM33      SG11
 TH 1
+        2.42E-02
 TH 2
+        8.69E-02  1.67E-02
 TH 3
+        3.28E-01  3.97E-01  1.76E-02
 TH 4
+       -9.88E-03 -5.46E-02 -5.63E-02  9.97E-02
 TH 5
+        4.75E-02  5.43E-02  4.50E-02 -6.86E-01  7.20E-03
 OM11
+        3.26E-01  1.65E-02 -2.21E-02  6.91E-02 -3.42E-02  1.11E-02
 OM12
+        9.63E-02  5.08E-02  5.26E-02 -1.46E-01  9.72E-02  1.89E-01  6.68E-03
 OM13
+        1.37E-01  3.32E-02  6.08E-03 -2.61E-02  1.49E-02  7.74E-01  3.96E-01  7.60E-03
 OM22
+        5.19E-02 -2.38E-02  5.74E-03  5.51E-03  3.81E-02  9.60E-02  1.03E-01  1.08E-01  6.44E-03
 OM23
+        3.83E-02  1.10E-02  1.97E-02 -5.85E-02  9.27E-02  9.71E-02  4.54E-01  2.52E-01  4.44E-01  5.17E-03
 OM33
+        1.27E-02  2.50E-02  3.79E-02 -8.33E-02  2.92E-02  8.77E-02  2.61E-01  3.81E-01  7.76E-02  4.73E-01  7.25E-03
 SG11
+        4.05E-02  7.86E-02  1.73E-02  9.41E-03  5.42E-02  8.09E-03 -5.09E-02  3.89E-02 -1.30E-01 -1.63E-01  5.86E-02  7.77E-04
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
 ********************           STOCHASTIC APPROXIMATION EXPECTATION-MAXIMIZATION (NO PRIOR)         ********************
 ********************                    EIGENVALUES OF COR MATRIX OF ESTIMATE (S)                   ********************

             1         2         3         4         5         6         7         8         9        10        11        12
         1.31E-01  2.75E-01  3.53E-01  5.05E-01  7.00E-01  8.08E-01  8.87E-01  1.10E+00  1.34E+00  1.59E+00  1.75E+00  2.56E+00
 #TBLN:      5
 #METH: Objective Function Evaluation by Importance Sampling (No Prior)
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
 #TERM:
 EXPECTATION ONLY PROCESS COMPLETED

 ETABAR IS THE ARITHMETIC MEAN OF THE ETA-ESTIMATES,
 AND THE P-VALUE IS GIVEN FOR THE NULL HYPOTHESIS THAT THE TRUE MEAN IS 0.

 ETABAR:        -2.6178E-04 -5.6556E-05 -5.6526E-06
 SE:             1.4830E-02  1.5620E-02  1.6911E-02
 N:                     288         288         288

 P VAL.:         9.8592E-01  9.9711E-01  9.9973E-01

 ETASHRINKSD(%)  1.7375E+01  2.8730E+00  1.6537E+00
 ETASHRINKVR(%)  3.1732E+01  5.6635E+00  3.2800E+00
 EBVSHRINKSD(%)  1.7280E+01  2.8599E+00  1.6460E+00
 EBVSHRINKVR(%)  3.1575E+01  5.6380E+00  3.2650E+00
 EPSSHRINKSD(%)  1.3506E+01
 EPSSHRINKVR(%)  2.5188E+01


 TOTAL DATA POINTS NORMALLY DISTRIBUTED (N):         2880
 N*LOG(2PI) CONSTANT TO OBJECTIVE FUNCTION:    5293.08595125891
 OBJECTIVE FUNCTION VALUE WITHOUT CONSTANT:    10020.3768847083
 OBJECTIVE FUNCTION VALUE WITH CONSTANT:       15313.4628359672
 REPORTED OBJECTIVE FUNCTION DOES NOT CONTAIN CONSTANT

 TOTAL EFFECTIVE ETAS (NIND*NETA):                           864


 #TERE:
 Elapsed estimation  time in seconds:    13.22
 Elapsed covariance  time in seconds:    68.83

 ********************         OBJECTIVE FUNCTION EVALUATION BY IMPORTANCE SAMPLING (NO PRIOR)        ********************
 #OBJT:**************                        FINAL VALUE OF OBJECTIVE FUNCTION                       ********************
 #OBJV:********************************************    10020.377       **************************************************

 ********************         OBJECTIVE FUNCTION EVALUATION BY IMPORTANCE SAMPLING (NO PRIOR)        ********************
 ********************                             FINAL PARAMETER ESTIMATE                           ********************

 THETA - VECTOR OF FIXED EFFECTS PARAMETERS   *********
         TH 1      TH 2      TH 3      TH 4      TH 5
         1.12E+00  3.39E+00  2.44E+00 -6.48E-01  8.07E-02

 OMEGA - COV MATRIX FOR RANDOM EFFECTS - ETAS  ********
         ETA1      ETA2      ETA3
 ETA1
+        9.31E-02
 ETA2
+        3.84E-03  7.47E-02
 ETA3
+        3.79E-02  2.95E-02  8.54E-02

 SIGMA - COV MATRIX FOR RANDOM EFFECTS - EPSILONS  ****
         EPS1
 EPS1
+        2.28E-02

 OMEGA - CORR MATRIX FOR RANDOM EFFECTS - ETAS  *******
         ETA1      ETA2      ETA3
 ETA1
+        3.05E-01
 ETA2
+        4.61E-02  2.73E-01
 ETA3
+        4.25E-01  3.69E-01  2.92E-01

 SIGMA - CORR MATRIX FOR RANDOM EFFECTS - EPSILONS  ***
         EPS1
 EPS1
+        1.51E-01

 ********************         OBJECTIVE FUNCTION EVALUATION BY IMPORTANCE SAMPLING (NO PRIOR)        ********************
 ********************                          STANDARD ERROR OF ESTIMATE (R)                        ********************

 THETA - VECTOR OF FIXED EFFECTS PARAMETERS   *********
         TH 1      TH 2      TH 3      TH 4      TH 5
         2.24E-02  1.66E-02  1.75E-02  9.50E-02  6.16E-03

 OMEGA - COV MATRIX FOR RANDOM EFFECTS - ETAS  ********
         ETA1      ETA2      ETA3
 ETA1
+        1.17E-02
 ETA2
+        6.27E-03  6.62E-03
 ETA3
+        7.05E-03  5.32E-03  7.37E-03

 SIGMA - COV MATRIX FOR RANDOM EFFECTS - EPSILONS  ****
         EPS1
 EPS1
+        7.19E-04

 OMEGA - CORR MATRIX FOR RANDOM EFFECTS - ETAS  *******
         ETA1      ETA2      ETA3
 ETA1
+        1.92E-02
 ETA2
+        7.47E-02  1.21E-02
 ETA3
+        6.24E-02  5.29E-02  1.26E-02

 SIGMA - CORR MATRIX FOR RANDOM EFFECTS - EPSILONS  ***
         EPS1
 EPS1
+        2.38E-03

 ********************         OBJECTIVE FUNCTION EVALUATION BY IMPORTANCE SAMPLING (NO PRIOR)        ********************
 ********************                        COVARIANCE MATRIX OF ESTIMATE (R)                       ********************

            TH 1      TH 2      TH 3      TH 4      TH 5      OM11      OM12      OM13      OM22      OM23      OM33      SG11
 TH 1
+        5.03E-04
 TH 2
+        3.14E-05  2.76E-04
 TH 3
+        1.41E-04  1.15E-04  3.07E-04
 TH 4
+        2.05E-06 -1.21E-06 -5.95E-07  9.02E-03
 TH 5
+        1.75E-06  1.05E-06  8.64E-07 -3.61E-04  3.80E-05
 OM11
+        3.95E-05 -8.89E-07 -2.86E-07  4.09E-07  1.25E-07  1.37E-04
 OM12
+        4.87E-06  9.35E-07  7.30E-07  9.48E-08  9.28E-09  8.25E-06  3.94E-05
 OM13
+        7.27E-06 -1.12E-06 -5.57E-07  1.28E-06 -1.29E-07  4.19E-05  1.80E-05  4.97E-05
 OM22
+        2.21E-06  3.31E-07 -4.51E-08 -8.43E-07  2.04E-07  8.32E-07  4.90E-06  2.26E-06  4.39E-05
 OM23
+       -5.10E-07 -2.96E-07 -3.73E-08 -6.97E-08  5.45E-08  2.49E-06  1.23E-05  7.45E-06  1.84E-05  2.83E-05
 OM33
+       -1.62E-06  3.98E-08  1.94E-07  1.37E-07 -2.22E-08  1.11E-05  9.52E-06  2.49E-05  7.71E-06  2.03E-05  5.44E-05
 SG11
+        2.75E-07  4.35E-07  3.72E-07 -8.87E-09  3.07E-08 -7.17E-07 -8.51E-08 -4.57E-08 -9.24E-08 -7.94E-08 -5.71E-08  5.17E-07

 ********************         OBJECTIVE FUNCTION EVALUATION BY IMPORTANCE SAMPLING (NO PRIOR)        ********************
 ********************                        CORRELATION MATRIX OF ESTIMATE (R)                      ********************

            TH 1      TH 2      TH 3      TH 4      TH 5      OM11      OM12      OM13      OM22      OM23      OM33      SG11
 TH 1
+        2.24E-02
 TH 2
+        8.43E-02  1.66E-02
 TH 3
+        3.60E-01  3.96E-01  1.75E-02
 TH 4
+        9.62E-04 -7.64E-04 -3.57E-04  9.50E-02
 TH 5
+        1.27E-02  1.03E-02  8.00E-03 -6.16E-01  6.16E-03
 OM11
+        1.51E-01 -4.58E-03 -1.40E-03  3.68E-04  1.74E-03  1.17E-02
 OM12
+        3.46E-02  8.97E-03  6.64E-03  1.59E-04  2.40E-04  1.12E-01  6.27E-03
 OM13
+        4.59E-02 -9.54E-03 -4.50E-03  1.91E-03 -2.97E-03  5.09E-01  4.06E-01  7.05E-03
 OM22
+        1.49E-02  3.01E-03 -3.89E-04 -1.34E-03  5.00E-03  1.08E-02  1.18E-01  4.83E-02  6.62E-03
 OM23
+       -4.27E-03 -3.35E-03 -4.00E-04 -1.38E-04  1.66E-03  4.01E-02  3.70E-01  1.99E-01  5.21E-01  5.32E-03
 OM33
+       -9.79E-03  3.25E-04  1.50E-03  1.96E-04 -4.90E-04  1.29E-01  2.06E-01  4.79E-01  1.58E-01  5.19E-01  7.37E-03
 SG11
+        1.71E-02  3.64E-02  2.95E-02 -1.30E-04  6.91E-03 -8.53E-02 -1.89E-02 -9.02E-03 -1.94E-02 -2.08E-02 -1.08E-02  7.19E-04
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
 ********************         OBJECTIVE FUNCTION EVALUATION BY IMPORTANCE SAMPLING (NO PRIOR)        ********************
 ********************                    EIGENVALUES OF COR MATRIX OF ESTIMATE (R)                   ********************

             1         2         3         4         5         6         7         8         9        10        11        12
         2.27E-01  3.83E-01  4.07E-01  5.00E-01  7.64E-01  8.21E-01  9.30E-01  1.02E+00  1.39E+00  1.59E+00  1.62E+00  2.36E+00
 #TBLN:      6
 #METH: MCMC Bayesian Analysis
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
 #TERM:
 STATISTICAL PORTION WAS COMPLETED

 TOTAL DATA POINTS NORMALLY DISTRIBUTED (N):         2880
 N*LOG(2PI) CONSTANT TO OBJECTIVE FUNCTION:    5293.08595125891
 OBJECTIVE FUNCTION VALUE WITHOUT CONSTANT:    5800.06213287476
 OBJECTIVE FUNCTION VALUE WITH CONSTANT:       11093.1480841337
 REPORTED OBJECTIVE FUNCTION DOES NOT CONTAIN CONSTANT

 TOTAL EFFECTIVE ETAS (NIND*NETA):                           864
 NIND*NETA*LOG(2PI) CONSTANT TO OBJECTIVE FUNCTION:    1587.92578537767
 OBJECTIVE FUNCTION VALUE WITHOUT CONSTANT:    5800.06213287476
 OBJECTIVE FUNCTION VALUE WITH CONSTANT:       7387.98791825243
 REPORTED OBJECTIVE FUNCTION DOES NOT CONTAIN CONSTANT

 PRIOR CONSTANT TO OBJECTIVE FUNCTION:    22.3596795730206
 OBJECTIVE FUNCTION VALUE WITHOUT CONSTANT:    5800.06213287476
 OBJECTIVE FUNCTION VALUE WITH CONSTANT:       5822.42181244778
 REPORTED OBJECTIVE FUNCTION DOES NOT CONTAIN CONSTANT


 #TERE:
 Elapsed estimation  time in seconds:   214.55
 Elapsed covariance  time in seconds:     0.00

 ********************                              MCMC BAYESIAN ANALYSIS                            ********************
 #OBJT:**************                       AVERAGE VALUE OF LIKELIHOOD FUNCTION                     ********************
 #OBJV:********************************************     5800.062       **************************************************
 #OBJS:********************************************       49.469 (STD) **************************************************

 ********************                              MCMC BAYESIAN ANALYSIS                            ********************
 ********************                             FINAL PARAMETER ESTIMATE                           ********************

 THETA - VECTOR OF FIXED EFFECTS PARAMETERS   *********
         TH 1      TH 2      TH 3      TH 4      TH 5
         1.12E+00  3.39E+00  2.44E+00 -6.52E-01  8.15E-02

 OMEGA - COV MATRIX FOR RANDOM EFFECTS - ETAS  ********
         ETA1      ETA2      ETA3
 ETA1
+        9.43E-02
 ETA2
+        4.05E-03  7.58E-02
 ETA3
+        3.73E-02  2.96E-02  8.67E-02

 SIGMA - COV MATRIX FOR RANDOM EFFECTS - EPSILONS  ****
         EPS1
 EPS1
+        2.28E-02

 OMEGA - CORR MATRIX FOR RANDOM EFFECTS - ETAS  *******
         ETA1      ETA2      ETA3
 ETA1
+        3.06E-01
 ETA2
+        4.73E-02  2.75E-01
 ETA3
+        4.13E-01  3.64E-01  2.94E-01

 SIGMA - CORR MATRIX FOR RANDOM EFFECTS - EPSILONS  ***
         EPS1
 EPS1
+        1.51E-01

 ********************                              MCMC BAYESIAN ANALYSIS                            ********************
 ********************                STANDARD ERROR OF ESTIMATE (From Sample Variance)               ********************

 THETA - VECTOR OF FIXED EFFECTS PARAMETERS   *********
         TH 1      TH 2      TH 3      TH 4      TH 5
         2.31E-02  1.66E-02  1.75E-02  9.44E-02  6.10E-03

 OMEGA - COV MATRIX FOR RANDOM EFFECTS - ETAS  ********
         ETA1      ETA2      ETA3
 ETA1
+        1.19E-02
 ETA2
+        6.27E-03  6.73E-03
 ETA3
+        7.01E-03  5.34E-03  7.44E-03

 SIGMA - COV MATRIX FOR RANDOM EFFECTS - EPSILONS  ****
         EPS1
 EPS1
+        7.02E-04

 OMEGA - CORR MATRIX FOR RANDOM EFFECTS - ETAS  *******
         ETA1      ETA2      ETA3
 ETA1
+        1.93E-02
 ETA2
+        7.33E-02  1.22E-02
 ETA3
+        6.22E-02  5.23E-02  1.26E-02

 SIGMA - CORR MATRIX FOR RANDOM EFFECTS - EPSILONS  ***
         EPS1
 EPS1
+        2.32E-03

 ********************                              MCMC BAYESIAN ANALYSIS                            ********************
 ********************               COVARIANCE MATRIX OF ESTIMATE (From Sample Variance)             ********************

            TH 1      TH 2      TH 3      TH 4      TH 5      OM11      OM12      OM13      OM22      OM23      OM33      SG11
 TH 1
+        5.36E-04
 TH 2
+        2.35E-05  2.75E-04
 TH 3
+        1.42E-04  1.11E-04  3.05E-04
 TH 4
+       -4.37E-05  2.00E-05 -4.18E-05  8.91E-03
 TH 5
+        1.01E-06  4.12E-07  2.08E-06 -3.56E-04  3.72E-05
 OM11
+        5.06E-05 -4.26E-06  5.60E-07  1.30E-05 -7.40E-07  1.42E-04
 OM12
+        9.41E-06  1.39E-06  7.71E-07 -4.21E-06  1.95E-07  8.81E-06  3.93E-05
 OM13
+        1.09E-05  1.66E-08  1.73E-06 -2.40E-07 -3.62E-08  4.05E-05  1.83E-05  4.92E-05
 OM22
+        2.34E-06 -4.85E-06 -9.40E-07  3.92E-06  6.72E-08  1.45E-06  5.48E-06  2.51E-06  4.52E-05
 OM23
+       -2.40E-06 -2.79E-06 -1.12E-06  1.70E-05 -3.13E-07  2.02E-06  1.18E-05  7.49E-06  1.83E-05  2.85E-05
 OM33
+       -2.63E-06 -2.76E-06 -8.53E-07  1.17E-05  3.38E-08  9.19E-06  9.18E-06  2.38E-05  8.05E-06  2.08E-05  5.54E-05
 SG11
+        7.10E-07  3.39E-07  1.75E-07  2.02E-07 -1.41E-08 -8.22E-07 -1.25E-07 -3.80E-08 -8.54E-08  4.60E-08  9.97E-08  4.93E-07

 ********************                              MCMC BAYESIAN ANALYSIS                            ********************
 ********************              CORRELATION MATRIX OF ESTIMATE (From Sample Variance)             ********************

            TH 1      TH 2      TH 3      TH 4      TH 5      OM11      OM12      OM13      OM22      OM23      OM33      SG11
 TH 1
+        2.31E-02
 TH 2
+        6.13E-02  1.66E-02
 TH 3
+        3.51E-01  3.84E-01  1.75E-02
 TH 4
+       -2.00E-02  1.28E-02 -2.54E-02  9.44E-02
 TH 5
+        7.16E-03  4.07E-03  1.95E-02 -6.19E-01  6.10E-03
 OM11
+        1.84E-01 -2.16E-02  2.69E-03  1.16E-02 -1.02E-02  1.19E-02
 OM12
+        6.48E-02  1.34E-02  7.03E-03 -7.11E-03  5.09E-03  1.18E-01  6.27E-03
 OM13
+        6.71E-02  1.43E-04  1.41E-02 -3.62E-04 -8.46E-04  4.85E-01  4.17E-01  7.01E-03
 OM22
+        1.50E-02 -4.34E-02 -8.00E-03  6.18E-03  1.64E-03  1.81E-02  1.30E-01  5.31E-02  6.73E-03
 OM23
+       -1.94E-02 -3.14E-02 -1.20E-02  3.36E-02 -9.62E-03  3.18E-02  3.54E-01  2.00E-01  5.09E-01  5.34E-03
 OM33
+       -1.53E-02 -2.23E-02 -6.56E-03  1.67E-02  7.44E-04  1.04E-01  1.97E-01  4.56E-01  1.61E-01  5.22E-01  7.44E-03
 SG11
+        4.37E-02  2.91E-02  1.42E-02  3.05E-03 -3.29E-03 -9.83E-02 -2.85E-02 -7.72E-03 -1.81E-02  1.23E-02  1.91E-02  7.02E-04
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
 ********************                              MCMC BAYESIAN ANALYSIS                            ********************
 ********************           EIGENVALUES OF COR MATRIX OF ESTIMATE (From Sample Variance)         ********************

             1         2         3         4         5         6         7         8         9        10        11        12
         2.42E-01  3.79E-01  4.15E-01  5.02E-01  7.51E-01  8.13E-01  9.75E-01  1.02E+00  1.35E+00  1.58E+00  1.64E+00  2.33E+00
 #TBLN:      7
 #METH: Laplacian Conditional Estimation with Interaction (No Prior)
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
 #TERM:
0MINIMIZATION SUCCESSFUL
 NO. OF FUNCTION EVALUATIONS USED:      441
 NO. OF SIG. DIGITS IN FINAL EST.:  3.4

 ETABAR IS THE ARITHMETIC MEAN OF THE ETA-ESTIMATES,
 AND THE P-VALUE IS GIVEN FOR THE NULL HYPOTHESIS THAT THE TRUE MEAN IS 0.

 ETABAR:        -2.9143E-02  1.4796E-03  4.4648E-03
 SE:             1.4524E-02  1.5630E-02  1.6920E-02
 N:                     288         288         288

 P VAL.:         4.4799E-02  9.2458E-01  7.9188E-01

 ETASHRINKSD(%)  1.6141E+01  2.6415E+00  1.4116E+00
 ETASHRINKVR(%)  2.9677E+01  5.2133E+00  2.8033E+00
 EBVSHRINKSD(%)  1.6832E+01  2.8233E+00  1.6302E+00
 EBVSHRINKVR(%)  3.0831E+01  5.5668E+00  3.2338E+00
 EPSSHRINKSD(%)  1.2987E+01
 EPSSHRINKVR(%)  2.4287E+01


 TOTAL DATA POINTS NORMALLY DISTRIBUTED (N):         2880
 N*LOG(2PI) CONSTANT TO OBJECTIVE FUNCTION:    5293.08595125891
 OBJECTIVE FUNCTION VALUE WITHOUT CONSTANT:    10035.0680056770
 OBJECTIVE FUNCTION VALUE WITH CONSTANT:       15328.1539569360
 REPORTED OBJECTIVE FUNCTION DOES NOT CONTAIN CONSTANT

 TOTAL EFFECTIVE ETAS (NIND*NETA):                           864


 #TERE:
 Elapsed estimation  time in seconds:    52.72
 Elapsed covariance  time in seconds:    34.66
 Elapsed postprocess time in seconds:     0.29

 ********************           LAPLACIAN CONDITIONAL ESTIMATION WITH INTERACTION (NO PRIOR)         ********************
 #OBJT:**************                       MINIMUM VALUE OF OBJECTIVE FUNCTION                      ********************
 #OBJV:********************************************    10035.068       **************************************************

 ********************           LAPLACIAN CONDITIONAL ESTIMATION WITH INTERACTION (NO PRIOR)         ********************
 ********************                             FINAL PARAMETER ESTIMATE                           ********************

 THETA - VECTOR OF FIXED EFFECTS PARAMETERS   *********
         TH 1      TH 2      TH 3      TH 4      TH 5
         1.12E+00  3.39E+00  2.44E+00 -6.48E-01  8.08E-02

 OMEGA - COV MATRIX FOR RANDOM EFFECTS - ETAS  ********
         ETA1      ETA2      ETA3
 ETA1
+        8.67E-02
 ETA2
+        3.99E-03  7.45E-02
 ETA3
+        3.78E-02  2.94E-02  8.51E-02

 SIGMA - COV MATRIX FOR RANDOM EFFECTS - EPSILONS  ****
         EPS1
 EPS1
+        2.28E-02

 OMEGA - CORR MATRIX FOR RANDOM EFFECTS - ETAS  *******
         ETA1      ETA2      ETA3
 ETA1
+        2.94E-01
 ETA2
+        4.97E-02  2.73E-01
 ETA3
+        4.40E-01  3.70E-01  2.92E-01

 SIGMA - CORR MATRIX FOR RANDOM EFFECTS - EPSILONS  ***
         EPS1
 EPS1
+        1.51E-01

 ********************           LAPLACIAN CONDITIONAL ESTIMATION WITH INTERACTION (NO PRIOR)         ********************
 ********************                            STANDARD ERROR OF ESTIMATE                          ********************

 THETA - VECTOR OF FIXED EFFECTS PARAMETERS   *********
         TH 1      TH 2      TH 3      TH 4      TH 5
         2.18E-02  1.66E-02  1.75E-02  9.50E-02  6.17E-03

 OMEGA - COV MATRIX FOR RANDOM EFFECTS - ETAS  ********
         ETA1      ETA2      ETA3
 ETA1
+        1.08E-02
 ETA2
+        6.05E-03  6.61E-03
 ETA3
+        6.88E-03  5.31E-03  7.33E-03

 SIGMA - COV MATRIX FOR RANDOM EFFECTS - EPSILONS  ****
         EPS1
 EPS1
+        7.22E-04

 OMEGA - CORR MATRIX FOR RANDOM EFFECTS - ETAS  *******
         ETA1      ETA2      ETA3
 ETA1
+        1.84E-02
 ETA2
+        7.48E-02  1.21E-02
 ETA3
+        6.22E-02  5.30E-02  1.26E-02

 SIGMA - CORR MATRIX FOR RANDOM EFFECTS - EPSILONS  ***
         EPS1
 EPS1
+        2.39E-03

 ********************           LAPLACIAN CONDITIONAL ESTIMATION WITH INTERACTION (NO PRIOR)         ********************
 ********************                          COVARIANCE MATRIX OF ESTIMATE                         ********************

            TH 1      TH 2      TH 3      TH 4      TH 5      OM11      OM12      OM13      OM22      OM23      OM33      SG11
 TH 1
+        4.77E-04
 TH 2
+        3.19E-05  2.75E-04
 TH 3
+        1.41E-04  1.15E-04  3.06E-04
 TH 4
+        1.50E-06 -1.36E-06 -8.49E-07  9.02E-03
 TH 5
+        1.75E-06  1.06E-06  8.82E-07 -3.61E-04  3.81E-05
 OM11
+        3.22E-05 -1.14E-06 -5.99E-07 -1.06E-06  1.10E-07  1.17E-04
 OM12
+        4.69E-06  7.20E-07  5.63E-07  1.41E-06 -5.48E-09  7.86E-06  3.67E-05
 OM13
+        7.17E-06 -1.22E-06 -7.48E-07  1.78E-06 -1.39E-07  3.95E-05  1.70E-05  4.74E-05
 OM22
+        2.22E-06  3.56E-07  5.54E-09 -9.85E-07  1.88E-07  7.36E-07  5.46E-06  2.50E-06  4.37E-05
 OM23
+       -5.59E-07 -3.06E-07 -5.34E-08  7.22E-08  4.74E-08  2.42E-06  1.23E-05  7.56E-06  1.84E-05  2.82E-05
 OM33
+       -1.81E-06  8.43E-09  1.43E-07 -9.98E-08 -1.82E-08  1.05E-05  8.92E-06  2.43E-05  7.72E-06  2.01E-05  5.37E-05
 SG11
+        2.85E-07  4.41E-07  3.78E-07 -2.59E-08  3.29E-08 -7.83E-07 -8.47E-08 -3.66E-08 -9.17E-08 -7.56E-08 -6.27E-08  5.21E-07

 ********************           LAPLACIAN CONDITIONAL ESTIMATION WITH INTERACTION (NO PRIOR)         ********************
 ********************                          CORRELATION MATRIX OF ESTIMATE                        ********************

            TH 1      TH 2      TH 3      TH 4      TH 5      OM11      OM12      OM13      OM22      OM23      OM33      SG11
 TH 1
+        2.18E-02
 TH 2
+        8.80E-02  1.66E-02
 TH 3
+        3.69E-01  3.96E-01  1.75E-02
 TH 4
+        7.23E-04 -8.63E-04 -5.11E-04  9.50E-02
 TH 5
+        1.30E-02  1.04E-02  8.16E-03 -6.16E-01  6.17E-03
 OM11
+        1.36E-01 -6.37E-03 -3.17E-03 -1.03E-03  1.65E-03  1.08E-02
 OM12
+        3.55E-02  7.16E-03  5.32E-03  2.45E-03 -1.47E-04  1.20E-01  6.05E-03
 OM13
+        4.77E-02 -1.07E-02 -6.21E-03  2.72E-03 -3.28E-03  5.31E-01  4.07E-01  6.88E-03
 OM22
+        1.54E-02  3.24E-03  4.79E-05 -1.57E-03  4.59E-03  1.03E-02  1.36E-01  5.49E-02  6.61E-03
 OM23
+       -4.82E-03 -3.48E-03 -5.75E-04  1.43E-04  1.45E-03  4.21E-02  3.83E-01  2.07E-01  5.24E-01  5.31E-03
 OM33
+       -1.13E-02  6.93E-05  1.12E-03 -1.43E-04 -4.03E-04  1.33E-01  2.01E-01  4.82E-01  1.59E-01  5.17E-01  7.33E-03
 SG11
+        1.81E-02  3.68E-02  2.99E-02 -3.77E-04  7.39E-03 -1.00E-01 -1.94E-02 -7.36E-03 -1.92E-02 -1.97E-02 -1.19E-02  7.22E-04
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
 ********************           LAPLACIAN CONDITIONAL ESTIMATION WITH INTERACTION (NO PRIOR)         ********************
 ********************                      EIGENVALUES OF COR MATRIX OF ESTIMATE                     ********************

             1         2         3         4         5         6         7         8         9        10        11        12
         2.21E-01  3.83E-01  3.96E-01  4.95E-01  7.66E-01  8.14E-01  9.21E-01  1.01E+00  1.39E+00  1.59E+00  1.62E+00  2.38E+00
 Elapsed finaloutput time in seconds:     0.75
 #CPUT: Total CPU Time in Seconds,      692.379
