Fri 01/08/2010
03:00 PM
;Model Desc: Population Mixture Problem in 1 Compartment model, with Volume and rate constant parameters
;            and their inter-subject variances modeled from two sub-populations
;Project Name: nm7examples
;Project ID: NO PROJECT DESCRIPTION

$PROB RUN# example3 (from ad1tr1m2s)
$INPUT C SET ID JID TIME CONC=DV DOSE=AMT RATE EVID MDV CMT VC1 K101 VC2 K102 SIGZ PROB
$DATA example3.csv IGNORE=C

$SUBROUTINES ADVAN1 TRANS1

; The mixture model uses THETA(5) as the mixture proportion parameter, defining the proportion
; of subjects in sub-population 1 (P(1), and in sub-population 2 (P(2)
$MIX
P(1)=THETA(5)
P(2)=1.0-THETA(5)
NSPOP=2

; Prior information setup for OMEGAS only
$PRIOR NWPRI NTHETA=5, NETA=4, NTHP=0, NETP=4, NPEXP=1

$PK
;  The MUs should always be unconditionally defined, that is, they should never be
; defined in IF?THEN blocks
; THETA(1) models the Volume of sub-population 1
MU_1=THETA(1)
; THETA(2) models the clearance of sub-population 1
MU_2=THETA(2)
; THETA(3) models the Volume of sub-population 2
MU_3=THETA(3)
; THETA(4) models the clearance of sub-population 2
MU_4=THETA(4)
VCM=DEXP(MU_1+ETA(1))
K10M=DEXP(MU_2+ETA(2))
VCF=DEXP(MU_3+ETA(3))
K10F=DEXP(MU_4+ETA(4))
Q=1
IF(MIXNUM.EQ.2) Q=0
V=Q*VCM+(1.0-Q)*VCF
K=Q*K10M+(1.0-Q)*K10F
S1=V

$ERROR
Y = F + F*EPS(1)

; Initial THETAs
$THETA
(-1000.0  4.3 1000.0) ;[MU_1]
(-1000.0 -2.9 1000.0) ;[MU_2]
(-1000.0 4.3 1000.0)  ;[MU_3]
(-1000.0 -0.67 1000.0) ;[MU_4]
(0.0001 0.667 0.9999)   ;[P(1)]

;Initial OMEGA block 1, for sub-population 1
$OMEGA BLOCK(2)
 .04 ;[p]
 .01 ; [f]
.027; [p]

;Initial OMEGA block 2, for sub-population 2
$OMEGA BLOCK(2)
 .05; [p]
 .01; [f]
.06; [p]

; Degrees of Freedom defined for Priors. One for each OMEGA block defining each sub-popluation
$THETA (2 FIX) (2 FIX)

; Prior OMEGA block 1.  Note that because the OMEGA is separated into blocks, so their priors
; should have the same block design.
$OMEGA BLOCK(2)
 0.05 FIX
 0.0 0.05

; Prior OMEGA block 2
$OMEGA BLOCK(2)
0.05 FIX
0.0 0.05

$SIGMA
0.01 ;[p]

$EST METHOD=ITS INTERACTION NITER=20 PRINT=1 NOABORT SIGL=8 FILE=example3.ext CTYPE=3 CITER=5
     CALPHA=0.05 NOPRIOR=1
$EST NBURN=500 NITER=500 METHOD=SAEM INTERACTION PRINT=10 SIGL=6 ISAMPLE=2
$EST METHOD=IMP INTERACTION NITER=5 ISAMPLE=1000 PRINT=1 NOABORT SIGL=6 EONLY=1
$EST METHOD=BAYES INTERACTION NBURN=2000 NITER=1000 PRINT=10  FILE=example3.txt SIGL=8 NOPRIOR=0
$EST MAXEVAL=9999 NSIG=2 SIGL=8 PRINT=1 FILE=example3.ext METHOD=CONDITIONAL INTERACTION NOABORT
     NOPRIOR=1
$COV MATRIX=R UNCONDITIONAL

NM-TRAN MESSAGES
 WARNINGS AND ERRORS (IF ANY) FOR PROBLEM    1
 (WARNING  2) NM-TRAN INFERS THAT THE DATA ARE POPULATION.

1NONLINEAR MIXED EFFECTS MODEL PROGRAM (NONMEM) VERSION 7.1.1g
 ORIGINALLY DEVELOPED BY STUART BEAL, LEWIS SHEINER, AND ALISON BOECKMANN
 CURRENT DEVELOPERS ARE ROBERT BAUER, ICON DEVELOPMENT SOLUTIONS,
 AND ALISON BOECKMANN. IMPLEMENTATION, EFFICIENCY, AND STANDARDIZATION
 PERFORMED BY NOUS INFOSYSTEMS.
 PROBLEM NO.:         1
 RUN# example3 (from ad1tr1m2s)
 TOT. NO. OF OBS RECS:     2400
 TOT. NO. OF INDIVIDUALS:    300
 ONE COMPARTMENT MODEL (ADVAN1)
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 #METH: Iterative Two Stage (No Prior)
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 Elapsed estimation time in seconds:    17.55

 #TERM:
 OPTIMIZATION COMPLETED


 ETABAR IS THE ARITHMETIC MEAN OF THE ETA-ESTIMATES,
 AND SE IS THE ASSOCIATED STANDARD ERROR.

 SUBMODEL    1

 ETABAR:        -1.0208E-05  2.9792E-05  0.0000E+00  0.0000E+00
 SE:             1.4906E-02  1.1374E-02  0.0000E+00  0.0000E+00

 ETAshrink(%):   2.9135E+00  1.8611E+01  1.0000E+02  1.0000E+02
 EPSshrink(%):   1.1651E+01


 SUBMODEL    2

 ETABAR:         0.0000E+00  0.0000E+00 -4.9688E-04  1.0473E-04
 SE:             0.0000E+00  0.0000E+00  2.1746E-02  2.4430E-02

 ETAshrink(%):   1.0000E+02  1.0000E+02 -4.0551E-01 -2.3919E+01
 EPSshrink(%):   1.4249E+01


 #TERE:

 Number of Negative Eigenvalues in Matrix=           3
 Most negative value=  -101498754674.685
 Most positive value=   357547.558645549
 Forcing positive definiteness
 Root mean square deviation of matrix from original=   7.438681191585191E-017

 Elapsed covariance time in seconds:     0.30

 ********************                          ITERATIVE TWO STAGE (NO PRIOR)                        ********************
 #OBJT:**************                        FINAL VALUE OF OBJECTIVE FUNCTION                       ********************
 #OBJV:********************************************    -9939.989       **************************************************

 ********************                          ITERATIVE TWO STAGE (NO PRIOR)                        ********************
 ********************                             FINAL PARAMETER ESTIMATE                           ********************

 THETA - VECTOR OF FIXED EFFECTS PARAMETERS   *********
         TH 1      TH 2      TH 3      TH 4      TH 5
         4.24E+00 -2.29E+00  4.26E+00 -6.75E-01  6.67E-01

 OMEGA - COV MATRIX FOR RANDOM EFFECTS - ETAS  ********
            ETA1      ETA2      ETA3      ETA4
 ETA1
+        4.74E-02
 ETA2
+       -9.62E-03  3.93E-02
 ETA3
+        0.00E+00  0.00E+00  4.74E-02
 ETA4
+        0.00E+00  0.00E+00 -9.62E-03  3.93E-02

 SIGMA - COV MATRIX FOR RANDOM EFFECTS - EPSILONS  ****
            EPS1
 EPS1
+        1.02E-02

 ********************                          ITERATIVE TWO STAGE (NO PRIOR)                        ********************
 ********************                          STANDARD ERROR OF ESTIMATE (S)                        ********************

 THETA - VECTOR OF FIXED EFFECTS PARAMETERS   *********
         TH 1      TH 2      TH 3      TH 4      TH 5
         1.60E-02  1.74E-02  2.18E-02  1.61E-02  2.81E-02

 OMEGA - COV MATRIX FOR RANDOM EFFECTS - ETAS  ********
            ETA1      ETA2      ETA3      ETA4
 ETA1
+        4.78E-03
 ETA2
+        1.04E-08  3.38E-03
 ETA3
+        0.00E+00  0.00E+00  4.78E-03
 ETA4
+        0.00E+00  0.00E+00  1.04E-08  3.38E-03

 SIGMA - COV MATRIX FOR RANDOM EFFECTS - EPSILONS  ****
            EPS1
 EPS1
+        3.41E-04

 ********************                          ITERATIVE TWO STAGE (NO PRIOR)                        ********************
 ********************                        COVARIANCE MATRIX OF ESTIMATE (S)                       ********************

            TH 1      TH 2      TH 3      TH 4      TH 5      OM11      OM12      OM13      OM14      OM22      OM23      OM24
             OM33      OM34      OM44      SG11
 TH 1
+        2.55E-04
 TH 2
+       -6.39E-05  3.04E-04
 TH 3
+        4.54E-07 -3.76E-08  4.76E-04
 TH 4
+       -8.54E-07 -1.86E-07 -8.89E-05  2.60E-04
 TH 5
+        5.35E-06 -6.01E-06 -4.83E-06 -3.90E-06  7.89E-04
 OM11
+       -4.65E-06  2.19E-06 -1.61E-06  1.39E-06  7.35E-07  2.29E-05
 OM12
+        1.96E-06  3.79E-06  1.21E-06 -1.01E-06 -2.75E-06 -7.63E-06 -1.09E-16
 OM13
+       ......... ......... ......... ......... ......... ......... ......... .........
 OM14
+       ......... ......... ......... ......... ......... ......... ......... ......... .........
 OM22
+        2.06E-06 -4.33E-06 -1.47E-06 -1.30E-06  2.00E-05  9.54E-07 -3.81E-06  0.00E+00  0.00E+00  1.14E-05
 OM23
+       ......... ......... ......... ......... ......... ......... ......... ......... ......... ......... .........
 OM24
+       ......... ......... ......... ......... ......... ......... ......... ......... ......... ......... ......... .........
 OM33
+       -4.65E-06  2.19E-06 -1.61E-06  1.39E-06  7.35E-07  2.29E-05 -7.63E-06  0.00E+00  0.00E+00  9.54E-07  0.00E+00  0.00E+00
          2.29E-05
 OM34
+        1.96E-06  3.79E-06  1.21E-06 -1.01E-06 -2.75E-06 -7.63E-06 -1.09E-16  0.00E+00  0.00E+00 -3.81E-06  0.00E+00  0.00E+00
         -7.63E-06 -1.09E-16
 OM44
+        2.06E-06 -4.33E-06 -1.47E-06 -1.30E-06  2.00E-05  9.54E-07 -3.81E-06  0.00E+00  0.00E+00  1.14E-05  0.00E+00  0.00E+00
          9.54E-07 -3.81E-06  1.14E-05
 SG11
+        9.34E-08 -3.39E-07  2.43E-07  1.32E-07 -5.22E-07  8.64E-08 -5.27E-08  0.00E+00  0.00E+00 -4.84E-08  0.00E+00  0.00E+00
          8.64E-08 -5.27E-08 -4.84E-08  1.17E-07

 ********************                          ITERATIVE TWO STAGE (NO PRIOR)                        ********************
 ********************                        CORRELATION MATRIX OF ESTIMATE (S)                      ********************

            TH 1      TH 2      TH 3      TH 4      TH 5      OM11      OM12      OM13      OM14      OM22      OM23      OM24
             OM33      OM34      OM44      SG11
 TH 1
+        1.00E+00
 TH 2
+       -2.30E-01  1.00E+00
 TH 3
+        1.30E-03 -9.89E-05  1.00E+00
 TH 4
+       -3.31E-03 -6.61E-04 -2.53E-01  1.00E+00
 TH 5
+        1.19E-02 -1.23E-02 -7.89E-03 -8.60E-03  1.00E+00
 OM11
+       -6.08E-02  2.63E-02 -1.55E-02  1.80E-02  5.47E-03  1.00E+00
 OM12
+        1.17E+04  2.09E+04  5.34E+03 -6.01E+03 -9.40E+03 -1.53E+05 -1.00E+00
 OM13
+       ......... ......... ......... ......... ......... ......... ......... .........
 OM14
+       ......... ......... ......... ......... ......... ......... ......... ......... .........
 OM22
+        3.82E-02 -7.35E-02 -1.99E-02 -2.37E-02  2.10E-01  5.89E-02 -1.08E+05  0.00E+00  0.00E+00  1.00E+00
 OM23
+       ......... ......... ......... ......... ......... ......... ......... ......... ......... ......... .........
 OM24
+       ......... ......... ......... ......... ......... ......... ......... ......... ......... ......... ......... .........
 OM33
+       -6.08E-02  2.63E-02 -1.55E-02  1.80E-02  5.47E-03  1.00E+00 -1.53E+05  0.00E+00  0.00E+00  5.89E-02  0.00E+00  0.00E+00
          1.00E+00
 OM34
+        1.17E+04  2.09E+04  5.34E+03 -6.01E+03 -9.40E+03 -1.53E+05 -1.00E+00  0.00E+00  0.00E+00 -1.08E+05  0.00E+00  0.00E+00
         -1.53E+05 -1.00E+00
 OM44
+        3.82E-02 -7.35E-02 -1.99E-02 -2.37E-02  2.10E-01  5.89E-02 -1.08E+05  0.00E+00  0.00E+00  1.00E+00  0.00E+00  0.00E+00
          5.89E-02 -1.08E+05  1.00E+00
 SG11
+        1.71E-02 -5.70E-02  3.27E-02  2.40E-02 -5.45E-02  5.29E-02 -1.48E+04  0.00E+00  0.00E+00 -4.19E-02  0.00E+00  0.00E+00
          5.29E-02 -1.48E+04 -4.19E-02  1.00E+00
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 #METH: Stochastic Approximation Expectation-Maximization (No Prior)
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 Elapsed estimation time in seconds:   313.92

 #TERM:
 STOCHASTIC PORTION COMPLETED
 REDUCED STOCHASTIC PORTION COMPLETED

 ETABAR IS THE ARITHMETIC MEAN OF THE ETA-ESTIMATES,
 AND SE IS THE ASSOCIATED STANDARD ERROR.

 SUBMODEL    1

 ETABAR:        -4.4967E-03  6.9676E-03  1.3529E-03  9.5962E-03
 SE:             1.5189E-02  1.1737E-02  1.0985E-02  9.6514E-03

 ETAshrink(%):   1.3668E+00  1.6593E+01  2.8668E+01  3.1413E+01
 EPSshrink(%):   4.9476E+00


 SUBMODEL    2

 ETABAR:         1.1413E-02 -6.0610E-03  4.8536E-03 -2.5399E-03
 SE:             1.3613E-02  1.2963E-02  2.1848E-02  2.4404E-02

 ETAshrink(%):   3.7337E+01  3.4697E+01 -5.7030E-01 -2.2940E+01
 EPSshrink(%):   8.9799E+00


 #TERE:

 ********************           STOCHASTIC APPROXIMATION EXPECTATION-MAXIMIZATION (NO PRIOR)         ********************
 #OBJT:**************                        FINAL VALUE OF LIKELIHOOD FUNCTION                      ********************
 #OBJV:********************************************   -15107.374       **************************************************

 ********************           STOCHASTIC APPROXIMATION EXPECTATION-MAXIMIZATION (NO PRIOR)         ********************
 ********************                             FINAL PARAMETER ESTIMATE                           ********************

 THETA - VECTOR OF FIXED EFFECTS PARAMETERS   *********
         TH 1      TH 2      TH 3      TH 4      TH 5
         4.24E+00 -2.31E+00  4.25E+00 -6.74E-01  6.67E-01

 OMEGA - COV MATRIX FOR RANDOM EFFECTS - ETAS  ********
            ETA1      ETA2      ETA3      ETA4
 ETA1
+        4.77E-02
 ETA2
+       -9.89E-03  3.98E-02
 ETA3
+        0.00E+00  0.00E+00  4.77E-02
 ETA4
+        0.00E+00  0.00E+00 -9.89E-03  3.98E-02

 SIGMA - COV MATRIX FOR RANDOM EFFECTS - EPSILONS  ****
            EPS1
 EPS1
+        1.02E-02
 #METH: Objective Function Evaluation by Importance Sampling (No Prior)
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 Elapsed estimation time in seconds:    83.32

 #TERM:
 OPTIMIZATION NOT TESTED


 ETABAR IS THE ARITHMETIC MEAN OF THE ETA-ESTIMATES,
 AND SE IS THE ASSOCIATED STANDARD ERROR.

 SUBMODEL    1

 ETABAR:        -3.5973E-03  3.8168E-03 -4.0250E-04 -5.7758E-04
 SE:             1.4919E-02  1.1471E-02  5.1319E-04  4.6618E-04

 ETAshrink(%):   3.1225E+00  1.8484E+01  9.6668E+01  9.6687E+01
 EPSshrink(%):   1.1969E+01


 SUBMODEL    2

 ETABAR:        -1.2546E-03  6.6057E-04  7.5115E-03 -2.7140E-03
 SE:             6.7996E-04  6.1855E-04  2.1754E-02  2.4455E-02

 ETAshrink(%):   9.6870E+01  9.6884E+01 -1.3895E-01 -2.3197E+01
 EPSshrink(%):   1.4620E+01


 #TERE:

 Number of Negative Eigenvalues in Matrix=           3
 Most negative value=  -25103.2955632401
 Most positive value=   353192.714815374
 Forcing positive definiteness
 Root mean square deviation of matrix from original=   0.134530191084046

 Elapsed covariance time in seconds:   127.55

 ********************         OBJECTIVE FUNCTION EVALUATION BY IMPORTANCE SAMPLING (NO PRIOR)        ********************
 #OBJT:**************                        FINAL VALUE OF OBJECTIVE FUNCTION                       ********************
 #OBJV:********************************************    -9945.887       **************************************************

 ********************         OBJECTIVE FUNCTION EVALUATION BY IMPORTANCE SAMPLING (NO PRIOR)        ********************
 ********************                             FINAL PARAMETER ESTIMATE                           ********************

 THETA - VECTOR OF FIXED EFFECTS PARAMETERS   *********
         TH 1      TH 2      TH 3      TH 4      TH 5
         4.24E+00 -2.31E+00  4.25E+00 -6.74E-01  6.67E-01

 OMEGA - COV MATRIX FOR RANDOM EFFECTS - ETAS  ********
            ETA1      ETA2      ETA3      ETA4
 ETA1
+        4.77E-02
 ETA2
+       -9.89E-03  3.98E-02
 ETA3
+        0.00E+00  0.00E+00  4.77E-02
 ETA4
+        0.00E+00  0.00E+00 -9.89E-03  3.98E-02

 SIGMA - COV MATRIX FOR RANDOM EFFECTS - EPSILONS  ****
            EPS1
 EPS1
+        1.02E-02

 ********************         OBJECTIVE FUNCTION EVALUATION BY IMPORTANCE SAMPLING (NO PRIOR)        ********************
 ********************                          STANDARD ERROR OF ESTIMATE (R)                        ********************

 THETA - VECTOR OF FIXED EFFECTS PARAMETERS   *********
         TH 1      TH 2      TH 3      TH 4      TH 5
         1.57E-02  1.47E-02  2.23E-02  1.99E-02  2.83E-02

 OMEGA - COV MATRIX FOR RANDOM EFFECTS - ETAS  ********
            ETA1      ETA2      ETA3      ETA4
 ETA1
+        2.76E-03
 ETA2
+        3.65E-09  3.91E-03
 ETA3
+        0.00E+00  0.00E+00  2.76E-03
 ETA4
+        0.00E+00  0.00E+00  3.65E-09  3.91E-03

 SIGMA - COV MATRIX FOR RANDOM EFFECTS - EPSILONS  ****
            EPS1
 EPS1
+        3.41E-04

 ********************         OBJECTIVE FUNCTION EVALUATION BY IMPORTANCE SAMPLING (NO PRIOR)        ********************
 ********************                        COVARIANCE MATRIX OF ESTIMATE (R)                       ********************

            TH 1      TH 2      TH 3      TH 4      TH 5      OM11      OM12      OM13      OM14      OM22      OM23      OM24
             OM33      OM34      OM44      SG11
 TH 1
+        2.48E-04
 TH 2
+       -5.72E-05  2.16E-04
 TH 3
+       -2.91E-07 -2.26E-08  4.96E-04
 TH 4
+        1.78E-07  6.72E-09 -1.01E-04  3.96E-04
 TH 5
+        3.68E-06 -8.96E-06  2.00E-05 -4.43E-06  8.03E-04
 OM11
+        1.27E-06 -2.47E-07 -2.57E-06  6.96E-07  1.74E-06 -7.63E-06
 OM12
+       -8.29E-07  1.02E-06  8.28E-07 -1.01E-06 -1.90E-06 -7.63E-06 -1.33E-17
 OM13
+       ......... ......... ......... ......... ......... ......... ......... .........
 OM14
+       ......... ......... ......... ......... ......... ......... ......... ......... .........
 OM22
+        6.90E-07 -2.56E-06  7.71E-07  4.36E-07  2.60E-05  3.81E-06 -3.81E-06  0.00E+00  0.00E+00 -1.53E-05
 OM23
+       ......... ......... ......... ......... ......... ......... ......... ......... ......... ......... .........
 OM24
+       ......... ......... ......... ......... ......... ......... ......... ......... ......... ......... ......... .........
 OM33
+        1.27E-06 -2.47E-07 -2.57E-06  6.96E-07  1.74E-06 -7.63E-06 -7.63E-06  0.00E+00  0.00E+00  3.81E-06  0.00E+00  0.00E+00
         -7.63E-06
 OM34
+       -8.29E-07  1.02E-06  8.28E-07 -1.01E-06 -1.90E-06 -7.63E-06 -1.33E-17  0.00E+00  0.00E+00 -3.81E-06  0.00E+00  0.00E+00
         -7.63E-06 -1.33E-17
 OM44
+        6.90E-07 -2.56E-06  7.71E-07  4.36E-07  2.60E-05  3.81E-06 -3.81E-06  0.00E+00  0.00E+00 -1.53E-05  0.00E+00  0.00E+00
          3.81E-06 -3.81E-06 -1.53E-05
 SG11
+        9.88E-08 -4.78E-08  8.42E-08 -2.56E-09 -4.50E-07 -2.69E-08  8.21E-09  0.00E+00  0.00E+00 -2.54E-08  0.00E+00  0.00E+00
         -2.69E-08  8.21E-09 -2.54E-08  1.16E-07

 ********************         OBJECTIVE FUNCTION EVALUATION BY IMPORTANCE SAMPLING (NO PRIOR)        ********************
 ********************                        CORRELATION MATRIX OF ESTIMATE (R)                      ********************

            TH 1      TH 2      TH 3      TH 4      TH 5      OM11      OM12      OM13      OM14      OM22      OM23      OM24
             OM33      OM34      OM44      SG11
 TH 1
+        1.00E+00
 TH 2
+       -2.47E-01  1.00E+00
 TH 3
+       -8.28E-04 -6.92E-05  1.00E+00
 TH 4
+        5.69E-04  2.30E-05 -2.27E-01  1.00E+00
 TH 5
+        8.24E-03 -2.15E-02  3.16E-02 -7.86E-03  1.00E+00
 OM11
+        2.91E-02 -6.09E-03 -4.18E-02  1.27E-02  2.23E-02 -1.00E+00
 OM12
+       -1.44E+04  1.90E+04  1.02E+04 -1.39E+04 -1.83E+04 -7.57E+05 -1.00E+00
 OM13
+       ......... ......... ......... ......... ......... ......... ......... .........
 OM14
+       ......... ......... ......... ......... ......... ......... ......... ......... .........
 OM22
+        1.12E-02 -4.46E-02  8.85E-03  5.61E-03  2.35E-01  3.54E-01 -2.68E+05  0.00E+00  0.00E+00 -1.00E+00
 OM23
+       ......... ......... ......... ......... ......... ......... ......... ......... ......... ......... .........
 OM24
+       ......... ......... ......... ......... ......... ......... ......... ......... ......... ......... ......... .........
 OM33
+        2.91E-02 -6.09E-03 -4.18E-02  1.27E-02  2.23E-02 -1.00E+00 -7.57E+05  0.00E+00  0.00E+00  3.54E-01  0.00E+00  0.00E+00
         -1.00E+00
 OM34
+       -1.44E+04  1.90E+04  1.02E+04 -1.39E+04 -1.83E+04 -7.57E+05 -1.00E+00  0.00E+00  0.00E+00 -2.68E+05  0.00E+00  0.00E+00
         -7.57E+05 -1.00E+00
 OM44
+        1.12E-02 -4.46E-02  8.85E-03  5.61E-03  2.35E-01  3.54E-01 -2.68E+05  0.00E+00  0.00E+00 -1.00E+00  0.00E+00  0.00E+00
          3.54E-01 -2.68E+05 -1.00E+00
 SG11
+        1.84E-02 -9.54E-03  1.11E-02 -3.78E-04 -4.66E-02 -2.85E-02  6.60E+03  0.00E+00  0.00E+00 -1.91E-02  0.00E+00  0.00E+00
         -2.85E-02  6.60E+03 -1.91E-02  1.00E+00
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 #METH: MCMC Bayesian Analysis
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 Elapsed estimation time in seconds:   338.52

 #TERM:
 BURN-IN COMPLETED
 STATISTICAL PORTION COMPLETED

 #TERE:
 Elapsed covariance time in seconds:     0.00

 ********************                              MCMC BAYESIAN ANALYSIS                            ********************
 #OBJT:**************                       AVERAGE VALUE OF LIKELIHOOD FUNCTION                     ********************
 #OBJV:********************************************   -14672.616       **************************************************
 #OBJS:********************************************       66.812 (STD) **************************************************

 ********************                              MCMC BAYESIAN ANALYSIS                            ********************
 ********************                             FINAL PARAMETER ESTIMATE                           ********************

 THETA - VECTOR OF FIXED EFFECTS PARAMETERS   *********
         TH 1      TH 2      TH 3      TH 4      TH 5
         4.24E+00 -2.30E+00  4.26E+00 -6.77E-01  6.65E-01

 OMEGA - COV MATRIX FOR RANDOM EFFECTS - ETAS  ********
            ETA1      ETA2      ETA3      ETA4
 ETA1
+        4.90E-02
 ETA2
+       -9.93E-03  4.17E-02
 ETA3
+        0.00E+00  0.00E+00  4.90E-02
 ETA4
+        0.00E+00  0.00E+00 -9.93E-03  4.17E-02

 SIGMA - COV MATRIX FOR RANDOM EFFECTS - EPSILONS  ****
            EPS1
 EPS1
+        1.03E-02

 ********************                              MCMC BAYESIAN ANALYSIS                            ********************
 ********************                STANDARD ERROR OF ESTIMATE (From Sample Variance)               ********************

 THETA - VECTOR OF FIXED EFFECTS PARAMETERS   *********
         TH 1      TH 2      TH 3      TH 4      TH 5
         1.69E-02  1.53E-02  2.32E-02  2.04E-02  2.76E-02

 OMEGA - COV MATRIX FOR RANDOM EFFECTS - ETAS  ********
            ETA1      ETA2      ETA3      ETA4
 ETA1
+        4.15E-03
 ETA2
+        2.76E-03  3.65E-03
 ETA3
+        0.00E+00  0.00E+00  4.15E-03
 ETA4
+        0.00E+00  0.00E+00  2.76E-03  3.65E-03

 SIGMA - COV MATRIX FOR RANDOM EFFECTS - EPSILONS  ****
            EPS1
 EPS1
+        3.34E-04

 ********************                              MCMC BAYESIAN ANALYSIS                            ********************
 ********************               COVARIANCE MATRIX OF ESTIMATE (From Sample Variance)             ********************

            TH 1      TH 2      TH 3      TH 4      TH 5      OM11      OM12      OM13      OM14      OM22      OM23      OM24
             OM33      OM34      OM44      SG11
 TH 1
+        2.87E-04
 TH 2
+       -6.58E-05  2.35E-04
 TH 3
+       -9.41E-06  3.26E-05  5.40E-04
 TH 4
+       -1.89E-05  7.85E-07 -1.31E-04  4.16E-04
 TH 5
+        3.33E-05  1.10E-05  2.84E-05 -1.11E-05  7.60E-04
 OM11
+        8.38E-07 -1.61E-06  1.32E-06  3.59E-06  1.36E-05  1.72E-05
 OM12
+        2.29E-06 -4.04E-07 -3.44E-06 -2.44E-06 -5.21E-06 -4.30E-06  7.60E-06
 OM13
+       ......... ......... ......... ......... ......... ......... ......... .........
 OM14
+       ......... ......... ......... ......... ......... ......... ......... ......... .........
 OM22
+       -9.77E-07  9.84E-07 -6.05E-06  2.47E-06  4.58E-06  1.24E-06 -2.43E-06  0.00E+00  0.00E+00  1.33E-05
 OM23
+       ......... ......... ......... ......... ......... ......... ......... ......... ......... ......... .........
 OM24
+       ......... ......... ......... ......... ......... ......... ......... ......... ......... ......... ......... .........
 OM33
+        8.38E-07 -1.61E-06  1.32E-06  3.59E-06  1.36E-05  1.72E-05 -4.30E-06  0.00E+00  0.00E+00  1.24E-06  0.00E+00  0.00E+00
          1.72E-05
 OM34
+        2.29E-06 -4.04E-07 -3.44E-06 -2.44E-06 -5.21E-06 -4.30E-06  7.60E-06  0.00E+00  0.00E+00 -2.43E-06  0.00E+00  0.00E+00
         -4.30E-06  7.60E-06
 OM44
+       -9.77E-07  9.84E-07 -6.05E-06  2.47E-06  4.58E-06  1.24E-06 -2.43E-06  0.00E+00  0.00E+00  1.33E-05  0.00E+00  0.00E+00
          1.24E-06 -2.43E-06  1.33E-05
 SG11
+       -4.76E-08 -2.36E-07 -6.12E-07  4.30E-07  1.21E-08 -5.05E-08  3.71E-09  0.00E+00  0.00E+00  4.01E-08  0.00E+00  0.00E+00
         -5.05E-08  3.71E-09  4.01E-08  1.12E-07

 ********************                              MCMC BAYESIAN ANALYSIS                            ********************
 ********************              CORRELATION MATRIX OF ESTIMATE (From Sample Variance)             ********************

            TH 1      TH 2      TH 3      TH 4      TH 5      OM11      OM12      OM13      OM14      OM22      OM23      OM24
             OM33      OM34      OM44      SG11
 TH 1
+        1.00E+00
 TH 2
+       -2.54E-01  1.00E+00
 TH 3
+       -2.39E-02  9.16E-02  1.00E+00
 TH 4
+       -5.47E-02  2.51E-03 -2.77E-01  1.00E+00
 TH 5
+        7.13E-02  2.60E-02  4.43E-02 -1.98E-02  1.00E+00
 OM11
+        1.19E-02 -2.54E-02  1.37E-02  4.25E-02  1.19E-01  1.00E+00
 OM12
+        4.90E-02 -9.56E-03 -5.37E-02 -4.33E-02 -6.85E-02 -3.76E-01  1.00E+00
 OM13
+       ......... ......... ......... ......... ......... ......... ......... .........
 OM14
+       ......... ......... ......... ......... ......... ......... ......... ......... .........
 OM22
+       -1.58E-02  1.76E-02 -7.14E-02  3.32E-02  4.55E-02  8.22E-02 -2.41E-01  0.00E+00  0.00E+00  1.00E+00
 OM23
+       ......... ......... ......... ......... ......... ......... ......... ......... ......... ......... .........
 OM24
+       ......... ......... ......... ......... ......... ......... ......... ......... ......... ......... ......... .........
 OM33
+        1.19E-02 -2.54E-02  1.37E-02  4.25E-02  1.19E-01  1.00E+00 -3.76E-01  0.00E+00  0.00E+00  8.22E-02  0.00E+00  0.00E+00
          1.00E+00
 OM34
+        4.90E-02 -9.56E-03 -5.37E-02 -4.33E-02 -6.85E-02 -3.76E-01  1.00E+00  0.00E+00  0.00E+00 -2.41E-01  0.00E+00  0.00E+00
         -3.76E-01  1.00E+00
 OM44
+       -1.58E-02  1.76E-02 -7.14E-02  3.32E-02  4.55E-02  8.22E-02 -2.41E-01  0.00E+00  0.00E+00  1.00E+00  0.00E+00  0.00E+00
          8.22E-02 -2.41E-01  1.00E+00
 SG11
+       -8.40E-03 -4.61E-02 -7.89E-02  6.30E-02  1.31E-03 -3.64E-02  4.03E-03  0.00E+00  0.00E+00  3.29E-02  0.00E+00  0.00E+00
         -3.64E-02  4.03E-03  3.29E-02  1.00E+00
 #METH: First Order Conditional Estimation with Interaction (No Prior)
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 Elapsed estimation time in seconds:  1824.47

 #TERM:
0MINIMIZATION SUCCESSFUL
 HOWEVER, PROBLEMS OCCURRED WITH THE MINIMIZATION.
 REGARD THE RESULTS OF THE ESTIMATION STEP CAREFULLY, AND ACCEPT THEM ONLY
 AFTER CHECKING THAT THE COVARIANCE STEP PRODUCES REASONABLE OUTPUT.
 NO. OF FUNCTION EVALUATIONS USED:     3530
 NO. OF SIG. DIGITS IN FINAL EST.:  2.1

 ETABAR IS THE ARITHMETIC MEAN OF THE ETA-ESTIMATES,
 AND SE IS THE ASSOCIATED STANDARD ERROR.

 SUBMODEL    1

 ETABAR:        -1.1745E-03  2.4915E-03  0.0000E+00  0.0000E+00
 SE:             1.4890E-02  1.1050E-02  0.0000E+00  0.0000E+00

 ETAshrink(%):   1.7677E+00  5.0757E+00  1.0000E+02  1.0000E+02
 EPSshrink(%):   1.1419E+01


 SUBMODEL    2

 ETABAR:         0.0000E+00  0.0000E+00 -2.7513E-04  1.3787E-04
 SE:             0.0000E+00  0.0000E+00  2.1779E-02  2.4454E-02

 ETAshrink(%):   1.0000E+02  1.0000E+02  1.4263E+00 -3.6760E-01
 EPSshrink(%):   1.4368E+01


 #TERE:
 Elapsed covariance time in seconds:    82.66

 ********************          FIRST ORDER CONDITIONAL ESTIMATION WITH INTERACTION (NO PRIOR)        ********************
 #OBJT:**************                       MINIMUM VALUE OF OBJECTIVE FUNCTION                      ********************
 #OBJV:********************************************    -9961.746       **************************************************

 ********************          FIRST ORDER CONDITIONAL ESTIMATION WITH INTERACTION (NO PRIOR)        ********************
 ********************                             FINAL PARAMETER ESTIMATE                           ********************

 THETA - VECTOR OF FIXED EFFECTS PARAMETERS   *********
         TH 1      TH 2      TH 3      TH 4      TH 5
         4.24E+00 -2.30E+00  4.26E+00 -6.75E-01  6.67E-01

 OMEGA - COV MATRIX FOR RANDOM EFFECTS - ETAS  ********
            ETA1      ETA2      ETA3      ETA4
 ETA1
+        4.62E-02
 ETA2
+       -8.58E-03  2.72E-02
 ETA3
+        0.00E+00  0.00E+00  4.93E-02
 ETA4
+        0.00E+00  0.00E+00 -1.10E-02  6.00E-02

 SIGMA - COV MATRIX FOR RANDOM EFFECTS - EPSILONS  ****
            EPS1
 EPS1
+        1.02E-02

 ********************          FIRST ORDER CONDITIONAL ESTIMATION WITH INTERACTION (NO PRIOR)        ********************
 ********************                            STANDARD ERROR OF ESTIMATE                          ********************

 THETA - VECTOR OF FIXED EFFECTS PARAMETERS   *********
         TH 1      TH 2      TH 3      TH 4      TH 5
         1.55E-02  1.24E-02  2.26E-02  2.45E-02  2.72E-02

 OMEGA - COV MATRIX FOR RANDOM EFFECTS - ETAS  ********
            ETA1      ETA2      ETA3      ETA4
 ETA1
+        4.81E-03
 ETA2
+        2.79E-03  3.02E-03
 ETA3
+       ......... .........  7.25E-03
 ETA4
+       ......... .........  5.67E-03  8.51E-03

 SIGMA - COV MATRIX FOR RANDOM EFFECTS - EPSILONS  ****
            EPS1
 EPS1
+        3.43E-04

 ********************          FIRST ORDER CONDITIONAL ESTIMATION WITH INTERACTION (NO PRIOR)        ********************
 ********************                          COVARIANCE MATRIX OF ESTIMATE                         ********************

            TH 1      TH 2      TH 3      TH 4      TH 5      OM11      OM12      OM13      OM14      OM22      OM23      OM24
             OM33      OM34      OM44      SG11
 TH 1
+        2.41E-04
 TH 2
+       -5.04E-05  1.53E-04
 TH 3
+        1.46E-07 -1.20E-07  5.13E-04
 TH 4
+       -4.48E-07  1.46E-06 -1.13E-04  6.03E-04
 TH 5
+       -5.28E-08  1.64E-07 -2.97E-08  1.98E-07  7.41E-04
 OM11
+        1.36E-07 -1.76E-07 -1.81E-08 -7.61E-09 -4.55E-10  2.32E-05
 OM12
+       -9.87E-08  3.42E-07  1.47E-08 -1.04E-08 -7.28E-11 -4.83E-06  7.79E-06
 OM13
+       ......... ......... ......... ......... ......... ......... ......... .........
 OM14
+       ......... ......... ......... ......... ......... ......... ......... ......... .........
 OM22
+        1.00E-07 -6.13E-07 -3.89E-08  6.46E-08  1.91E-09  9.94E-07 -3.00E-06 ......... .........  9.12E-06
 OM23
+       ......... ......... ......... ......... ......... ......... ......... ......... ......... ......... .........
 OM24
+       ......... ......... ......... ......... ......... ......... ......... ......... ......... ......... ......... .........
 OM33
+       -2.60E-08  1.32E-08  2.46E-07 -9.07E-08  4.56E-10  3.72E-09 -2.55E-09 ......... .........  5.71E-09 ......... .........
          5.26E-05
 OM34
+        2.66E-08 -6.79E-08 -3.05E-08  1.27E-07 -3.10E-09 -6.23E-10  7.00E-10 ......... ......... -1.78E-09 ......... .........
         -1.16E-05  3.21E-05
 OM44
+        1.81E-07 -5.69E-07  4.01E-07 -7.27E-07 -2.51E-08  1.93E-09  5.58E-12 ......... ......... -6.16E-09 ......... .........
          2.59E-06 -1.36E-05  7.24E-05
 SG11
+        1.19E-07  3.66E-09  1.13E-07  1.53E-09 -6.25E-13 -2.08E-08  1.44E-08 ......... ......... -3.02E-08 ......... .........
         -2.19E-08  3.47E-09 -1.89E-09  1.18E-07

 ********************          FIRST ORDER CONDITIONAL ESTIMATION WITH INTERACTION (NO PRIOR)        ********************
 ********************                          CORRELATION MATRIX OF ESTIMATE                        ********************

            TH 1      TH 2      TH 3      TH 4      TH 5      OM11      OM12      OM13      OM14      OM22      OM23      OM24
             OM33      OM34      OM44      SG11
 TH 1
+        1.00E+00
 TH 2
+       -2.63E-01  1.00E+00
 TH 3
+        4.14E-04 -4.30E-04  1.00E+00
 TH 4
+       -1.17E-03  4.81E-03 -2.04E-01  1.00E+00
 TH 5
+       -1.25E-04  4.88E-04 -4.81E-05  2.96E-04  1.00E+00
 OM11
+        1.82E-03 -2.95E-03 -1.66E-04 -6.44E-05 -3.48E-06  1.00E+00
 OM12
+       -2.28E-03  9.91E-03  2.33E-04 -1.52E-04 -9.59E-07 -3.60E-01  1.00E+00
 OM13
+       ......... ......... ......... ......... ......... ......... ......... .........
 OM14
+       ......... ......... ......... ......... ......... ......... ......... ......... .........
 OM22
+        2.14E-03 -1.64E-02 -5.69E-04  8.72E-04  2.33E-05  6.84E-02 -3.56E-01 ......... .........  1.00E+00
 OM23
+       ......... ......... ......... ......... ......... ......... ......... ......... ......... ......... .........
 OM24
+       ......... ......... ......... ......... ......... ......... ......... ......... ......... ......... ......... .........
 OM33
+       -2.31E-04  1.47E-04  1.50E-03 -5.10E-04  2.31E-06  1.06E-04 -1.26E-04 ......... .........  2.61E-04 ......... .........
          1.00E+00
 OM34
+        3.03E-04 -9.70E-04 -2.37E-04  9.11E-04 -2.01E-05 -2.28E-05  4.42E-05 ......... ......... -1.04E-04 ......... .........
         -2.83E-01  1.00E+00
 OM44
+        1.37E-03 -5.41E-03  2.08E-03 -3.48E-03 -1.08E-04  4.70E-05  2.35E-07 ......... ......... -2.40E-04 ......... .........
          4.19E-02 -2.83E-01  1.00E+00
 SG11
+        2.24E-02  8.63E-04  1.45E-02  1.81E-04 -6.70E-08 -1.26E-02  1.50E-02 ......... ......... -2.92E-02 ......... .........
         -8.79E-03  1.78E-03 -6.49E-04  1.00E+00
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