Sat 04/22/2017
09:27 AM
;Model Desc: Population Mixture Problem in 1 Compartment model,
; with Volume and rate constant parameters and their inter-subject
; variances modeled from two sub-populations
;Project Name: nm7examples
;Project ID: NO PROJECT DESCRIPTION

$PROB RUN# example3 (from ad1tr1m2s)
$INPUT C SET ID JID TIME CONC=DV DOSE=AMT RATE EVID MDV CMT VC1 K101
   VC2 K102 SIGZ PROB
$DATA example3.csv IGNORE=C

$SUBROUTINES ADVAN1 TRANS1

; The mixture model uses THETA(5) as the mixture proportion parameter,
; defining the proportion of subjects in sub-population 1 (P(1),
; and in sub-population 2 (P(2)

$MIX
P(1)=THETA(5)
P(2)=1.0-THETA(5)
NSPOP=2

$PK
;  The MUs should always be unconditionally defined, that is,
;  they should never be defined in IF/THEN blocks
; THETA(1) models the Volume of sub-population 1
MU_1=THETA(1)
; THETA(2) models the clearance of sub-population 1
MU_2=THETA(2)
; THETA(3) models the Volume of sub-population 2
MU_3=THETA(3)
; THETA(4) models the clearance of sub-population 2
MU_4=THETA(4)
VCM=DEXP(MU_1+ETA(1))
K10M=DEXP(MU_2+ETA(2))
VCF=DEXP(MU_3+ETA(3))
K10F=DEXP(MU_4+ETA(4))
Q=1
IF(MIXNUM.EQ.2) Q=0
V=Q*VCM+(1.0-Q)*VCF
K=Q*K10M+(1.0-Q)*K10F
S1=V

$ERROR
Y = F + F*EPS(1)

; Initial THETAs
$THETA
(-1000.0  4.3 1000.0) ;[MU_1]
(-1000.0 -2.9 1000.0) ;[MU_2]
(-1000.0 4.3 1000.0)  ;[MU_3]
(-1000.0 -0.67 1000.0) ;[MU_4]
(0.0001 0.667 0.9999)   ;[P(1)]

;Initial OMEGA block 1, for sub-population 1
$OMEGA BLOCK(2)
 .04 ;[p]
 .01 ; [f]
 .027; [p]

;Initial OMEGA block 2, for sub-population 2
$OMEGA BLOCK(2)
 .05; [p]
 .01; [f]
 .06; [p]

$SIGMA
0.01 ;[p]

; Prior information setup for OMEGAS only
$PRIOR NWPRI

; Prior OMEGA block 1.  Note that because the OMEGA is separated
; into blocks, so their priors should have the same block design.

$OMEGAP BLOCK(2)
 0.05 FIX
 0.0 0.05

; Prior OMEGA block 2

$OMEGAP BLOCK(2)
0.05 FIX
0.0 0.05

; Degrees of Freedom defined for Priors.
; One for each OMEGA block defining each sub-popluation
$OMEGAPD (2 FIX) (2 FIX)

$EST METHOD=ITS INTERACTION NITER=20 PRINT=1 NOABORT SIGL=8
     FILE=example3.ext CTYPE=3 CITER=10
     CALPHA=0.05 NOPRIOR=1

$EST NBURN=500 NITER=500 METHOD=SAEM INTERACTION PRINT=10 SIGL=6
     ISAMPLE=2

$EST METHOD=IMP INTERACTION NITER=5 ISAMPLE=1000 PRINT=1 NOABORT
     SIGL=6 EONLY=1 MAPITER=0

$EST METHOD=BAYES INTERACTION NBURN=2000 NITER=1000 PRINT=10
     FILE=example3.txt SIGL=8 NOPRIOR=0

$EST MAXEVAL=9999 NSIG=3 SIGL=12 PRINT=1 FILE=example3.ext
     METHOD=CONDITIONAL INTERACTION NOABORT
     NOPRIOR=1

$COV MATRIX=R UNCONDITIONAL

NM-TRAN MESSAGES
 WARNINGS AND ERRORS (IF ANY) FOR PROBLEM    1
 (WARNING  2) NM-TRAN INFERS THAT THE DATA ARE POPULATION.

1NONLINEAR MIXED EFFECTS MODEL PROGRAM (NONMEM) VERSION 7.4.0 beta 2 (nm74b2)
 ORIGINALLY DEVELOPED BY STUART BEAL, LEWIS SHEINER, AND ALISON BOECKMANN
 CURRENT DEVELOPERS ARE ROBERT BAUER, ICON DEVELOPMENT SOLUTIONS,
 AND ALISON BOECKMANN. IMPLEMENTATION, EFFICIENCY, AND STANDARDIZATION
 PERFORMED BY NOUS INFOSYSTEMS.
 PROBLEM NO.:         1
 RUN# example3 (from ad1tr1m2s)
 TOT. NO. OF OBS RECS:     2400
 TOT. NO. OF INDIVIDUALS:      300
 ONE COMPARTMENT MODEL (ADVAN1)
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 #TBLN:      1
 #METH: Iterative Two Stage (No Prior)
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
 #TERM:
 OPTIMIZATION WAS NOT COMPLETED

 ETABAR IS THE ARITHMETIC MEAN OF THE ETA-ESTIMATES,
 AND SE IS THE ASSOCIATED STANDARD ERROR.

 SUBMODEL    1

 ETABAR:        -2.5047E-07  1.5195E-06  0.0000E+00  0.0000E+00
 SE:             1.4891E-02  1.1044E-02  0.0000E+00  0.0000E+00
 N:                     200         200         200         200

 ETASHRINKSD(%)  1.9092E+00  5.0008E+00  1.0000E+02  1.0000E+02
 ETASHRINKVR(%)  3.7820E+00  9.7516E+00  1.0000E+02  1.0000E+02
 EBVSHRINKSD(%)  1.9912E+00  5.0815E+00  1.0000E+02  1.0000E+02
 EBVSHRINKVR(%)  3.9427E+00  9.9047E+00  1.0000E+02  1.0000E+02
 EPSSHRINKSD(%)  1.1410E+01
 EPSSHRINKVR(%)  2.1518E+01


 SUBMODEL    2

 ETABAR:         0.0000E+00  0.0000E+00 -1.0424E-05  2.6611E-05
 SE:             0.0000E+00  0.0000E+00  2.1782E-02  2.4454E-02
 N:                     100         100         100         100

 ETASHRINKSD(%)  1.0000E+02  1.0000E+02  1.5795E+00  1.0000E-10
 ETASHRINKVR(%)  1.0000E+02  1.0000E+02  3.1340E+00  1.0000E-10
 EBVSHRINKSD(%)  1.0000E+02  1.0000E+02  1.9072E+00  1.0440E-01
 EBVSHRINKVR(%)  1.0000E+02  1.0000E+02  3.7780E+00  2.0869E-01
 EPSSHRINKSD(%)  1.4366E+01
 EPSSHRINKVR(%)  2.6669E+01


 TOTAL DATA POINTS NORMALLY DISTRIBUTED (N):         2400
 N*LOG(2PI) CONSTANT TO OBJECTIVE FUNCTION:    4410.90495938243
 OBJECTIVE FUNCTION VALUE WITHOUT CONSTANT:   -9961.69637049949
 OBJECTIVE FUNCTION VALUE WITH CONSTANT:      -5550.79141111706
 REPORTED OBJECTIVE FUNCTION DOES NOT CONTAIN CONSTANT

 TOTAL EFFECTIVE ETAS (NIND*NETA):                          1200


 #TERE:
 Elapsed estimation  time in seconds:     8.47
 Elapsed covariance  time in seconds:     0.84

 ********************                          ITERATIVE TWO STAGE (NO PRIOR)                        ********************
 #OBJT:**************                        FINAL VALUE OF OBJECTIVE FUNCTION                       ********************
 #OBJV:********************************************    -9961.696       **************************************************

 ********************                          ITERATIVE TWO STAGE (NO PRIOR)                        ********************
 ********************                             FINAL PARAMETER ESTIMATE                           ********************

 THETA - VECTOR OF FIXED EFFECTS PARAMETERS   *********
         TH 1      TH 2      TH 3      TH 4      TH 5
         4.24E+00 -2.29E+00  4.26E+00 -6.75E-01  6.67E-01

 OMEGA - COV MATRIX FOR RANDOM EFFECTS - ETAS  ********
         ETA1      ETA2      ETA3      ETA4
 ETA1
+        4.63E-02
 ETA2
+       -8.56E-03  2.72E-02
 ETA3
+        0.00E+00  0.00E+00  4.95E-02
 ETA4
+        0.00E+00  0.00E+00 -1.10E-02  6.02E-02

 SIGMA - COV MATRIX FOR RANDOM EFFECTS - EPSILONS  ****
         EPS1
 EPS1
+        1.02E-02

 OMEGA - CORR MATRIX FOR RANDOM EFFECTS - ETAS  *******
         ETA1      ETA2      ETA3      ETA4
 ETA1
+        2.15E-01
 ETA2
+       -2.41E-01  1.65E-01
 ETA3
+        0.00E+00  0.00E+00  2.22E-01
 ETA4
+        0.00E+00  0.00E+00 -2.02E-01  2.45E-01

 SIGMA - CORR MATRIX FOR RANDOM EFFECTS - EPSILONS  ***
         EPS1
 EPS1
+        1.01E-01

 ********************                          ITERATIVE TWO STAGE (NO PRIOR)                        ********************
 ********************                          STANDARD ERROR OF ESTIMATE (S)                        ********************

 THETA - VECTOR OF FIXED EFFECTS PARAMETERS   *********
         TH 1      TH 2      TH 3      TH 4      TH 5
         1.57E-02  1.26E-02  2.27E-02  2.46E-02  2.72E-02

 OMEGA - COV MATRIX FOR RANDOM EFFECTS - ETAS  ********
         ETA1      ETA2      ETA3      ETA4
 ETA1
+        5.41E-03
 ETA2
+        2.73E-03  2.51E-03
 ETA3
+        0.00E+00  0.00E+00  7.40E-03
 ETA4
+        0.00E+00  0.00E+00  5.80E-03  8.90E-03

 SIGMA - COV MATRIX FOR RANDOM EFFECTS - EPSILONS  ****
         EPS1
 EPS1
+        3.43E-04

 OMEGA - CORR MATRIX FOR RANDOM EFFECTS - ETAS  *******
         ETA1      ETA2      ETA3      ETA4
 ETA1
+        1.26E-02
 ETA2
+        6.75E-02  7.61E-03
 ETA3
+       ......... .........  1.66E-02
 ETA4
+       ......... .........  9.69E-02  1.81E-02

 SIGMA - CORR MATRIX FOR RANDOM EFFECTS - EPSILONS  ***
         EPS1
 EPS1
+        1.70E-03

 ********************                          ITERATIVE TWO STAGE (NO PRIOR)                        ********************
 ********************                        COVARIANCE MATRIX OF ESTIMATE (S)                       ********************

            TH 1      TH 2      TH 3      TH 4      TH 5      OM11      OM12      OM13      OM14      OM22      OM23      OM24
             OM33      OM34      OM44      SG11
 TH 1
+        2.48E-04
 TH 2
+       -5.26E-05  1.58E-04
 TH 3
+        1.71E-07 -4.40E-07  5.18E-04
 TH 4
+        1.44E-07 -3.56E-07 -1.13E-04  6.07E-04
 TH 5
+       -2.70E-07  7.07E-07 -9.20E-07 -6.72E-07  7.42E-04
 OM11
+       -8.31E-06  3.04E-06  3.16E-07  2.63E-07 -5.01E-07  2.93E-05
 OM12
+        3.48E-06  3.41E-06 -9.09E-08 -7.65E-08  1.43E-07 -7.69E-06  7.46E-06
 OM13
+       ......... ......... ......... ......... ......... ......... ......... .........
 OM14
+       ......... ......... ......... ......... ......... ......... ......... ......... .........
 OM22
+        3.17E-06 -5.21E-06 -4.79E-08 -3.49E-08  7.98E-08  1.02E-07 -2.28E-06  0.00E+00  0.00E+00  6.30E-06
 OM23
+       ......... ......... ......... ......... ......... ......... ......... ......... ......... ......... .........
 OM24
+       ......... ......... ......... ......... ......... ......... ......... ......... ......... ......... ......... .........
 OM33
+       -1.33E-08  3.57E-08 -5.67E-06  4.20E-06  7.12E-08 -2.54E-08  7.29E-09  0.00E+00  0.00E+00  4.09E-09  0.00E+00  0.00E+00
          5.48E-05
 OM34
+       -5.19E-08  1.35E-07  4.22E-06 -4.38E-06  2.45E-07 -9.72E-08  2.80E-08  0.00E+00  0.00E+00  1.48E-08  0.00E+00  0.00E+00
         -1.48E-05  3.36E-05
 OM44
+       -1.09E-07  2.65E-07 -5.92E-06 -7.12E-06  4.97E-07 -1.98E-07  5.75E-08  0.00E+00  0.00E+00  2.52E-08  0.00E+00  0.00E+00
          3.57E-06 -2.06E-05  7.92E-05
 SG11
+        7.80E-08 -2.02E-07  2.59E-07  2.18E-07 -4.09E-07  1.44E-07 -4.13E-08  0.00E+00  0.00E+00 -2.22E-08  0.00E+00  0.00E+00
         -2.06E-08 -7.94E-08 -1.64E-07  1.18E-07

 ********************                          ITERATIVE TWO STAGE (NO PRIOR)                        ********************
 ********************                        CORRELATION MATRIX OF ESTIMATE (S)                      ********************

            TH 1      TH 2      TH 3      TH 4      TH 5      OM11      OM12      OM13      OM14      OM22      OM23      OM24
             OM33      OM34      OM44      SG11
 TH 1
+        1.57E-02
 TH 2
+       -2.66E-01  1.26E-02
 TH 3
+        4.77E-04 -1.54E-03  2.27E-02
 TH 4
+        3.72E-04 -1.15E-03 -2.02E-01  2.46E-02
 TH 5
+       -6.31E-04  2.07E-03 -1.49E-03 -1.00E-03  2.72E-02
 OM11
+       -9.75E-02  4.47E-02  2.57E-03  1.97E-03 -3.40E-03  5.41E-03
 OM12
+        8.10E-02  9.94E-02 -1.46E-03 -1.14E-03  1.92E-03 -5.20E-01  2.73E-03
 OM13
+       ......... ......... ......... ......... ......... ......... ......... .........
 OM14
+       ......... ......... ......... ......... ......... ......... ......... ......... .........
 OM22
+        8.02E-02 -1.65E-01 -8.39E-04 -5.64E-04  1.17E-03  7.47E-03 -3.33E-01  0.00E+00  0.00E+00  2.51E-03
 OM23
+       ......... ......... ......... ......... ......... ......... ......... ......... ......... ......... .........
 OM24
+       ......... ......... ......... ......... ......... ......... ......... ......... ......... ......... ......... .........
 OM33
+       -1.14E-04  3.85E-04 -3.37E-02  2.30E-02  3.53E-04 -6.33E-04  3.61E-04  0.00E+00  0.00E+00  2.20E-04  0.00E+00  0.00E+00
          7.40E-03
 OM34
+       -5.70E-04  1.86E-03  3.20E-02 -3.06E-02  1.55E-03 -3.10E-03  1.77E-03  0.00E+00  0.00E+00  1.01E-03  0.00E+00  0.00E+00
         -3.45E-01  5.80E-03
 OM44
+       -7.79E-04  2.37E-03 -2.92E-02 -3.24E-02  2.05E-03 -4.10E-03  2.37E-03  0.00E+00  0.00E+00  1.13E-03  0.00E+00  0.00E+00
          5.43E-02 -3.98E-01  8.90E-03
 SG11
+        1.44E-02 -4.68E-02  3.32E-02  2.57E-02 -4.38E-02  7.75E-02 -4.40E-02  0.00E+00  0.00E+00 -2.58E-02  0.00E+00  0.00E+00
         -8.09E-03 -3.99E-02 -5.36E-02  3.43E-04
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 #TBLN:      2
 #METH: Stochastic Approximation Expectation-Maximization (No Prior)
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
 #TERM:
 STOCHASTIC PORTION WAS COMPLETED
 REDUCED STOCHASTIC PORTION WAS COMPLETED

 ETABAR IS THE ARITHMETIC MEAN OF THE ETA-ESTIMATES,
 AND SE IS THE ASSOCIATED STANDARD ERROR.

 SUBMODEL    1

 ETABAR:         7.1828E-04 -4.7651E-04 -1.2154E-03  2.4972E-03
 SE:             1.4883E-02  1.1107E-02  5.0408E-04  5.4390E-04
 N:                     200         200         200         200

 ETASHRINKSD(%)  1.7793E+00  4.8847E+00  9.6805E+01  9.6820E+01
 ETASHRINKVR(%)  3.5270E+00  9.5309E+00  9.9898E+01  9.9899E+01
 EBVSHRINKSD(%)  1.9937E+00  5.1737E+00  1.0000E+02  8.8285E+01
 EBVSHRINKVR(%)  3.9476E+00  1.0080E+01  1.0000E+02  9.8628E+01
 EPSSHRINKSD(%)  1.1592E+01
 EPSSHRINKVR(%)  2.1841E+01


 SUBMODEL    2

 ETABAR:        -1.4368E-03  9.6958E-04  2.4538E-03 -4.9734E-03
 SE:             6.4966E-04  5.5820E-04  2.1810E-02  2.4478E-02
 N:                     100         100         100         100

 ETASHRINKSD(%)  9.6961E+01  9.6611E+01  1.9989E+00  1.0000E-10
 ETASHRINKVR(%)  9.9908E+01  9.9885E+01  3.9579E+00  1.0000E-10
 EBVSHRINKSD(%)  9.2034E+01  9.0544E+01  1.8923E+00  1.1058E-01
 EBVSHRINKVR(%)  9.9365E+01  9.9106E+01  3.7488E+00  2.2104E-01
 EPSSHRINKSD(%)  1.4601E+01
 EPSSHRINKVR(%)  2.7070E+01


 TOTAL DATA POINTS NORMALLY DISTRIBUTED (N):         2400
 N*LOG(2PI) CONSTANT TO OBJECTIVE FUNCTION:    4410.90495938243
 OBJECTIVE FUNCTION VALUE WITHOUT CONSTANT:   -15091.8960344244
 OBJECTIVE FUNCTION VALUE WITH CONSTANT:      -10680.9910750420
 REPORTED OBJECTIVE FUNCTION DOES NOT CONTAIN CONSTANT

 TOTAL EFFECTIVE ETAS (NIND*NETA):                          1200
 NIND*NETA*LOG(2PI) CONSTANT TO OBJECTIVE FUNCTION:    2205.45247969121
 OBJECTIVE FUNCTION VALUE WITHOUT CONSTANT:   -15091.8960344244
 OBJECTIVE FUNCTION VALUE WITH CONSTANT:      -12886.4435547332
 REPORTED OBJECTIVE FUNCTION DOES NOT CONTAIN CONSTANT


 #TERE:
 Elapsed estimation  time in seconds:    78.86
 Elapsed covariance  time in seconds:     0.64

 ********************           STOCHASTIC APPROXIMATION EXPECTATION-MAXIMIZATION (NO PRIOR)         ********************
 #OBJT:**************                        FINAL VALUE OF LIKELIHOOD FUNCTION                      ********************
 #OBJV:********************************************   -15091.896       **************************************************

 ********************           STOCHASTIC APPROXIMATION EXPECTATION-MAXIMIZATION (NO PRIOR)         ********************
 ********************                             FINAL PARAMETER ESTIMATE                           ********************

 THETA - VECTOR OF FIXED EFFECTS PARAMETERS   *********
         TH 1      TH 2      TH 3      TH 4      TH 5
         4.24E+00 -2.30E+00  4.26E+00 -6.71E-01  6.67E-01

 OMEGA - COV MATRIX FOR RANDOM EFFECTS - ETAS  ********
         ETA1      ETA2      ETA3      ETA4
 ETA1
+        4.62E-02
 ETA2
+       -8.58E-03  2.74E-02
 ETA3
+        0.00E+00  0.00E+00  5.00E-02
 ETA4
+        0.00E+00  0.00E+00 -1.06E-02  5.88E-02

 SIGMA - COV MATRIX FOR RANDOM EFFECTS - EPSILONS  ****
         EPS1
 EPS1
+        1.02E-02

 OMEGA - CORR MATRIX FOR RANDOM EFFECTS - ETAS  *******
         ETA1      ETA2      ETA3      ETA4
 ETA1
+        2.15E-01
 ETA2
+       -2.41E-01  1.66E-01
 ETA3
+        0.00E+00  0.00E+00  2.24E-01
 ETA4
+        0.00E+00  0.00E+00 -1.96E-01  2.43E-01

 SIGMA - CORR MATRIX FOR RANDOM EFFECTS - EPSILONS  ***
         EPS1
 EPS1
+        1.01E-01

 ********************           STOCHASTIC APPROXIMATION EXPECTATION-MAXIMIZATION (NO PRIOR)         ********************
 ********************                          STANDARD ERROR OF ESTIMATE (S)                        ********************

 THETA - VECTOR OF FIXED EFFECTS PARAMETERS   *********
         TH 1      TH 2      TH 3      TH 4      TH 5
         1.57E-02  1.26E-02  2.30E-02  2.40E-02  2.73E-02

 OMEGA - COV MATRIX FOR RANDOM EFFECTS - ETAS  ********
         ETA1      ETA2      ETA3      ETA4
 ETA1
+        5.38E-03
 ETA2
+        2.73E-03  2.54E-03
 ETA3
+        0.00E+00  0.00E+00  7.53E-03
 ETA4
+        0.00E+00  0.00E+00  5.69E-03  8.48E-03

 SIGMA - COV MATRIX FOR RANDOM EFFECTS - EPSILONS  ****
         EPS1
 EPS1
+        3.43E-04

 OMEGA - CORR MATRIX FOR RANDOM EFFECTS - ETAS  *******
         ETA1      ETA2      ETA3      ETA4
 ETA1
+        1.25E-02
 ETA2
+        6.74E-02  7.68E-03
 ETA3
+       ......... .........  1.68E-02
 ETA4
+       ......... .........  9.63E-02  1.75E-02

 SIGMA - CORR MATRIX FOR RANDOM EFFECTS - EPSILONS  ***
         EPS1
 EPS1
+        1.70E-03

 ********************           STOCHASTIC APPROXIMATION EXPECTATION-MAXIMIZATION (NO PRIOR)         ********************
 ********************                        COVARIANCE MATRIX OF ESTIMATE (S)                       ********************

            TH 1      TH 2      TH 3      TH 4      TH 5      OM11      OM12      OM13      OM14      OM22      OM23      OM24
             OM33      OM34      OM44      SG11
 TH 1
+        2.46E-04
 TH 2
+       -5.28E-05  1.59E-04
 TH 3
+       -6.69E-07 -1.45E-06  5.28E-04
 TH 4
+       -1.89E-06 -9.13E-07 -1.06E-04  5.78E-04
 TH 5
+       -2.89E-06  2.97E-06  7.18E-06 -1.71E-05  7.43E-04
 OM11
+       -8.83E-06  3.17E-06  9.60E-07  1.95E-07 -8.67E-07  2.89E-05
 OM12
+        3.72E-06  3.22E-06 -3.46E-07 -2.12E-07  2.80E-07 -7.66E-06  7.48E-06
 OM13
+       ......... ......... ......... ......... ......... ......... ......... .........
 OM14
+       ......... ......... ......... ......... ......... ......... ......... ......... .........
 OM22
+        3.12E-06 -5.34E-06  1.93E-07 -5.40E-08 -2.70E-07  1.00E-07 -2.30E-06  0.00E+00  0.00E+00  6.46E-06
 OM23
+       ......... ......... ......... ......... ......... ......... ......... ......... ......... ......... .........
 OM24
+       ......... ......... ......... ......... ......... ......... ......... ......... ......... ......... ......... .........
 OM33
+       -2.72E-07 -7.21E-08 -8.39E-06  4.62E-06 -1.64E-06 -9.81E-08 -6.01E-08  0.00E+00  0.00E+00  4.31E-08  0.00E+00  0.00E+00
          5.68E-05
 OM34
+        2.28E-07  4.24E-07  6.88E-06 -6.61E-06 -1.21E-06 -1.42E-07  2.62E-08  0.00E+00  0.00E+00  6.02E-08  0.00E+00  0.00E+00
         -1.42E-05  3.24E-05
 OM44
+       -1.62E-07 -3.48E-08 -7.02E-06 -4.71E-07  5.72E-06 -1.25E-07  6.77E-08  0.00E+00  0.00E+00  4.47E-08  0.00E+00  0.00E+00
          3.07E-06 -1.86E-05  7.19E-05
 SG11
+        7.18E-08 -2.57E-07  2.37E-07  2.19E-07 -4.38E-07  1.41E-07 -3.92E-08  0.00E+00  0.00E+00 -2.50E-08  0.00E+00  0.00E+00
         -1.18E-08 -8.95E-08 -1.50E-07  1.17E-07

 ********************           STOCHASTIC APPROXIMATION EXPECTATION-MAXIMIZATION (NO PRIOR)         ********************
 ********************                        CORRELATION MATRIX OF ESTIMATE (S)                      ********************

            TH 1      TH 2      TH 3      TH 4      TH 5      OM11      OM12      OM13      OM14      OM22      OM23      OM24
             OM33      OM34      OM44      SG11
 TH 1
+        1.57E-02
 TH 2
+       -2.67E-01  1.26E-02
 TH 3
+       -1.86E-03 -5.02E-03  2.30E-02
 TH 4
+       -5.02E-03 -3.02E-03 -1.92E-01  2.40E-02
 TH 5
+       -6.76E-03  8.64E-03  1.15E-02 -2.61E-02  2.73E-02
 OM11
+       -1.05E-01  4.68E-02  7.77E-03  1.51E-03 -5.91E-03  5.38E-03
 OM12
+        8.67E-02  9.33E-02 -5.51E-03 -3.22E-03  3.76E-03 -5.21E-01  2.73E-03
 OM13
+       ......... ......... ......... ......... ......... ......... ......... .........
 OM14
+       ......... ......... ......... ......... ......... ......... ......... ......... .........
 OM22
+        7.81E-02 -1.67E-01  3.31E-03 -8.83E-04 -3.89E-03  7.35E-03 -3.31E-01  0.00E+00  0.00E+00  2.54E-03
 OM23
+       ......... ......... ......... ......... ......... ......... ......... ......... ......... ......... .........
 OM24
+       ......... ......... ......... ......... ......... ......... ......... ......... ......... ......... ......... .........
 OM33
+       -2.30E-03 -7.60E-04 -4.85E-02  2.55E-02 -7.97E-03 -2.42E-03 -2.92E-03  0.00E+00  0.00E+00  2.25E-03  0.00E+00  0.00E+00
          7.53E-03
 OM34
+        2.55E-03  5.91E-03  5.26E-02 -4.83E-02 -7.78E-03 -4.63E-03  1.68E-03  0.00E+00  0.00E+00  4.16E-03  0.00E+00  0.00E+00
         -3.32E-01  5.69E-03
 OM44
+       -1.22E-03 -3.26E-04 -3.60E-02 -2.31E-03  2.48E-02 -2.74E-03  2.92E-03  0.00E+00  0.00E+00  2.08E-03  0.00E+00  0.00E+00
          4.81E-02 -3.85E-01  8.48E-03
 SG11
+        1.34E-02 -5.95E-02  3.00E-02  2.66E-02 -4.69E-02  7.67E-02 -4.18E-02  0.00E+00  0.00E+00 -2.87E-02  0.00E+00  0.00E+00
         -4.57E-03 -4.59E-02 -5.18E-02  3.43E-04
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 #TBLN:      3
 #METH: Objective Function Evaluation by Importance Sampling (No Prior)
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
 #TERM:
 EXPECTATION ONLY PROCESS COMPLETED

 ETABAR IS THE ARITHMETIC MEAN OF THE ETA-ESTIMATES,
 AND SE IS THE ASSOCIATED STANDARD ERROR.

 SUBMODEL    1

 ETABAR:         4.9116E-04 -4.2899E-04 -3.8681E-05  1.1481E-04
 SE:             1.4888E-02  1.1089E-02  4.6952E-04  5.1076E-04
 N:                     200         200         200         200

 ETASHRINKSD(%)  1.7505E+00  5.0355E+00  9.7024E+01  9.7014E+01
 ETASHRINKVR(%)  3.4703E+00  9.8174E+00  9.9911E+01  9.9911E+01
 EBVSHRINKSD(%)  2.0154E+00  5.2001E+00  9.3625E+01  1.0000E+02
 EBVSHRINKVR(%)  3.9901E+00  1.0130E+01  9.9594E+01  1.0000E+02
 EPSSHRINKSD(%)  1.1593E+01
 EPSSHRINKVR(%)  2.1842E+01


 SUBMODEL    2

 ETABAR:         5.4041E-04 -3.2263E-04  2.5490E-03 -4.9796E-03
 SE:             6.6927E-04  5.2598E-04  2.1785E-02  2.4477E-02
 N:                     100         100         100         100

 ETASHRINKSD(%)  9.6869E+01  9.6807E+01  2.1087E+00  1.0000E-10
 ETASHRINKVR(%)  9.9902E+01  9.9898E+01  4.1729E+00  1.0000E-10
 EBVSHRINKSD(%)  9.7857E+01  9.4449E+01  1.9070E+00  1.1113E-01
 EBVSHRINKVR(%)  9.9954E+01  9.9692E+01  3.7776E+00  2.2213E-01
 EPSSHRINKSD(%)  1.4584E+01
 EPSSHRINKVR(%)  2.7042E+01


 TOTAL DATA POINTS NORMALLY DISTRIBUTED (N):         2400
 N*LOG(2PI) CONSTANT TO OBJECTIVE FUNCTION:    4410.90495938243
 OBJECTIVE FUNCTION VALUE WITHOUT CONSTANT:   -9967.27886948714
 OBJECTIVE FUNCTION VALUE WITH CONSTANT:      -5556.37391010471
 REPORTED OBJECTIVE FUNCTION DOES NOT CONTAIN CONSTANT

 TOTAL EFFECTIVE ETAS (NIND*NETA):                          1200


 #TERE:
 Elapsed estimation  time in seconds:    16.80
 Elapsed covariance  time in seconds:     4.85

 ********************         OBJECTIVE FUNCTION EVALUATION BY IMPORTANCE SAMPLING (NO PRIOR)        ********************
 #OBJT:**************                        FINAL VALUE OF OBJECTIVE FUNCTION                       ********************
 #OBJV:********************************************    -9967.279       **************************************************

 ********************         OBJECTIVE FUNCTION EVALUATION BY IMPORTANCE SAMPLING (NO PRIOR)        ********************
 ********************                             FINAL PARAMETER ESTIMATE                           ********************

 THETA - VECTOR OF FIXED EFFECTS PARAMETERS   *********
         TH 1      TH 2      TH 3      TH 4      TH 5
         4.24E+00 -2.30E+00  4.26E+00 -6.71E-01  6.67E-01

 OMEGA - COV MATRIX FOR RANDOM EFFECTS - ETAS  ********
         ETA1      ETA2      ETA3      ETA4
 ETA1
+        4.62E-02
 ETA2
+       -8.58E-03  2.74E-02
 ETA3
+        0.00E+00  0.00E+00  5.00E-02
 ETA4
+        0.00E+00  0.00E+00 -1.06E-02  5.88E-02

 SIGMA - COV MATRIX FOR RANDOM EFFECTS - EPSILONS  ****
         EPS1
 EPS1
+        1.02E-02

 OMEGA - CORR MATRIX FOR RANDOM EFFECTS - ETAS  *******
         ETA1      ETA2      ETA3      ETA4
 ETA1
+        2.15E-01
 ETA2
+       -2.41E-01  1.66E-01
 ETA3
+        0.00E+00  0.00E+00  2.24E-01
 ETA4
+        0.00E+00  0.00E+00 -1.96E-01  2.43E-01

 SIGMA - CORR MATRIX FOR RANDOM EFFECTS - EPSILONS  ***
         EPS1
 EPS1
+        1.01E-01

 ********************         OBJECTIVE FUNCTION EVALUATION BY IMPORTANCE SAMPLING (NO PRIOR)        ********************
 ********************                          STANDARD ERROR OF ESTIMATE (R)                        ********************

 THETA - VECTOR OF FIXED EFFECTS PARAMETERS   *********
         TH 1      TH 2      TH 3      TH 4      TH 5
         1.55E-02  1.23E-02  2.27E-02  2.43E-02  2.73E-02

 OMEGA - COV MATRIX FOR RANDOM EFFECTS - ETAS  ********
         ETA1      ETA2      ETA3      ETA4
 ETA1
+        4.79E-03
 ETA2
+        2.79E-03  3.05E-03
 ETA3
+        0.00E+00  0.00E+00  7.47E-03
 ETA4
+        0.00E+00  0.00E+00  5.61E-03  8.15E-03

 SIGMA - COV MATRIX FOR RANDOM EFFECTS - EPSILONS  ****
         EPS1
 EPS1
+        3.42E-04

 OMEGA - CORR MATRIX FOR RANDOM EFFECTS - ETAS  *******
         ETA1      ETA2      ETA3      ETA4
 ETA1
+        1.11E-02
 ETA2
+        7.12E-02  9.22E-03
 ETA3
+       ......... .........  1.67E-02
 ETA4
+       ......... .........  9.77E-02  1.68E-02

 SIGMA - CORR MATRIX FOR RANDOM EFFECTS - EPSILONS  ***
         EPS1
 EPS1
+        1.69E-03

 ********************         OBJECTIVE FUNCTION EVALUATION BY IMPORTANCE SAMPLING (NO PRIOR)        ********************
 ********************                        COVARIANCE MATRIX OF ESTIMATE (R)                       ********************

            TH 1      TH 2      TH 3      TH 4      TH 5      OM11      OM12      OM13      OM14      OM22      OM23      OM24
             OM33      OM34      OM44      SG11
 TH 1
+        2.41E-04
 TH 2
+       -5.01E-05  1.52E-04
 TH 3
+       -1.02E-07  3.09E-07  5.16E-04
 TH 4
+        3.49E-08  1.73E-07 -1.09E-04  5.92E-04
 TH 5
+       -2.76E-07  2.61E-07  5.59E-06 -1.12E-05  7.43E-04
 OM11
+       -5.00E-07 -8.84E-09  3.32E-08  9.79E-09 -1.14E-07  2.29E-05
 OM12
+        1.62E-07  2.71E-07  3.61E-08 -5.02E-08  7.68E-08 -4.80E-06  7.81E-06
 OM13
+       ......... ......... ......... ......... ......... ......... ......... .........
 OM14
+       ......... ......... ......... ......... ......... ......... ......... ......... .........
 OM22
+        2.39E-07 -1.40E-06 -1.36E-07  3.58E-08 -3.72E-08  9.92E-07 -3.03E-06  0.00E+00  0.00E+00  9.32E-06
 OM23
+       ......... ......... ......... ......... ......... ......... ......... ......... ......... ......... .........
 OM24
+       ......... ......... ......... ......... ......... ......... ......... ......... ......... ......... ......... .........
 OM33
+        1.78E-08 -2.07E-08 -2.54E-06  6.48E-07 -8.87E-07 -1.16E-08 -4.06E-08  0.00E+00  0.00E+00  4.34E-08  0.00E+00  0.00E+00
          5.58E-05
 OM34
+        7.49E-08 -2.72E-08  2.87E-06 -1.07E-06 -9.58E-07  2.95E-08  1.22E-08  0.00E+00  0.00E+00 -1.94E-08  0.00E+00  0.00E+00
         -1.09E-05  3.14E-05
 OM44
+        5.68E-08 -1.14E-07  7.83E-08  3.33E-06  2.71E-06 -4.25E-08 -2.06E-10  0.00E+00  0.00E+00  2.24E-08  0.00E+00  0.00E+00
          2.35E-06 -1.24E-05  6.64E-05
 SG11
+        9.17E-08 -3.03E-08  8.91E-08 -6.19E-09 -4.14E-07 -1.80E-08  1.35E-08  0.00E+00  0.00E+00 -2.88E-08  0.00E+00  0.00E+00
         -1.38E-08 -4.37E-10  7.13E-09  1.17E-07

 ********************         OBJECTIVE FUNCTION EVALUATION BY IMPORTANCE SAMPLING (NO PRIOR)        ********************
 ********************                        CORRELATION MATRIX OF ESTIMATE (R)                      ********************

            TH 1      TH 2      TH 3      TH 4      TH 5      OM11      OM12      OM13      OM14      OM22      OM23      OM24
             OM33      OM34      OM44      SG11
 TH 1
+        1.55E-02
 TH 2
+       -2.61E-01  1.23E-02
 TH 3
+       -2.90E-04  1.10E-03  2.27E-02
 TH 4
+        9.25E-05  5.76E-04 -1.97E-01  2.43E-02
 TH 5
+       -6.53E-04  7.75E-04  9.03E-03 -1.70E-02  2.73E-02
 OM11
+       -6.73E-03 -1.50E-04  3.06E-04  8.40E-05 -8.76E-04  4.79E-03
 OM12
+        3.74E-03  7.86E-03  5.70E-04 -7.39E-04  1.01E-03 -3.59E-01  2.79E-03
 OM13
+       ......... ......... ......... ......... ......... ......... ......... .........
 OM14
+       ......... ......... ......... ......... ......... ......... ......... ......... .........
 OM22
+        5.04E-03 -3.73E-02 -1.96E-03  4.83E-04 -4.47E-04  6.79E-02 -3.55E-01  0.00E+00  0.00E+00  3.05E-03
 OM23
+       ......... ......... ......... ......... ......... ......... ......... ......... ......... ......... .........
 OM24
+       ......... ......... ......... ......... ......... ......... ......... ......... ......... ......... ......... .........
 OM33
+        1.54E-04 -2.25E-04 -1.50E-02  3.57E-03 -4.36E-03 -3.26E-04 -1.94E-03  0.00E+00  0.00E+00  1.90E-03  0.00E+00  0.00E+00
          7.47E-03
 OM34
+        8.62E-04 -3.93E-04  2.25E-02 -7.84E-03 -6.27E-03  1.10E-03  7.80E-04  0.00E+00  0.00E+00 -1.13E-03  0.00E+00  0.00E+00
         -2.60E-01  5.61E-03
 OM44
+        4.49E-04 -1.13E-03  4.23E-04  1.68E-02  1.22E-02 -1.09E-03 -9.06E-06  0.00E+00  0.00E+00  9.02E-04  0.00E+00  0.00E+00
          3.86E-02 -2.71E-01  8.15E-03
 SG11
+        1.73E-02 -7.19E-03  1.15E-02 -7.44E-04 -4.44E-02 -1.10E-02  1.41E-02  0.00E+00  0.00E+00 -2.76E-02  0.00E+00  0.00E+00
         -5.42E-03 -2.28E-04  2.56E-03  3.42E-04
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 #TBLN:      4
 #METH: MCMC Bayesian Analysis
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
 #TERM:
 STATISTICAL PORTION WAS COMPLETED

 TOTAL DATA POINTS NORMALLY DISTRIBUTED (N):         2400
 N*LOG(2PI) CONSTANT TO OBJECTIVE FUNCTION:    4410.90495938243
 OBJECTIVE FUNCTION VALUE WITHOUT CONSTANT:   -14660.0286096253
 OBJECTIVE FUNCTION VALUE WITH CONSTANT:      -10249.1236502429
 REPORTED OBJECTIVE FUNCTION DOES NOT CONTAIN CONSTANT

 TOTAL EFFECTIVE ETAS (NIND*NETA):                          1200
 NIND*NETA*LOG(2PI) CONSTANT TO OBJECTIVE FUNCTION:    2205.45247969121
 OBJECTIVE FUNCTION VALUE WITHOUT CONSTANT:   -14660.0286096253
 OBJECTIVE FUNCTION VALUE WITH CONSTANT:      -12454.5761299341
 REPORTED OBJECTIVE FUNCTION DOES NOT CONTAIN CONSTANT

 PRIOR CONSTANT TO OBJECTIVE FUNCTION:    28.5447777318297
 OBJECTIVE FUNCTION VALUE WITHOUT CONSTANT:   -14660.0286096253
 OBJECTIVE FUNCTION VALUE WITH CONSTANT:      -14631.4838318935
 REPORTED OBJECTIVE FUNCTION DOES NOT CONTAIN CONSTANT


 #TERE:
 Elapsed estimation  time in seconds:    99.52
 Elapsed covariance  time in seconds:     0.00

 ********************                              MCMC BAYESIAN ANALYSIS                            ********************
 #OBJT:**************                       AVERAGE VALUE OF LIKELIHOOD FUNCTION                     ********************
 #OBJV:********************************************   -14660.029       **************************************************
 #OBJS:********************************************       66.344 (STD) **************************************************

 ********************                              MCMC BAYESIAN ANALYSIS                            ********************
 ********************                             FINAL PARAMETER ESTIMATE                           ********************

 THETA - VECTOR OF FIXED EFFECTS PARAMETERS   *********
         TH 1      TH 2      TH 3      TH 4      TH 5
         4.24E+00 -2.30E+00  4.26E+00 -6.77E-01  6.66E-01

 OMEGA - COV MATRIX FOR RANDOM EFFECTS - ETAS  ********
         ETA1      ETA2      ETA3      ETA4
 ETA1
+        4.72E-02
 ETA2
+       -8.75E-03  2.81E-02
 ETA3
+        0.00E+00  0.00E+00  5.12E-02
 ETA4
+        0.00E+00  0.00E+00 -1.04E-02  6.31E-02

 SIGMA - COV MATRIX FOR RANDOM EFFECTS - EPSILONS  ****
         EPS1
 EPS1
+        1.02E-02

 OMEGA - CORR MATRIX FOR RANDOM EFFECTS - ETAS  *******
         ETA1      ETA2      ETA3      ETA4
 ETA1
+        2.17E-01
 ETA2
+       -2.39E-01  1.68E-01
 ETA3
+        0.00E+00  0.00E+00  2.26E-01
 ETA4
+        0.00E+00  0.00E+00 -1.81E-01  2.51E-01

 SIGMA - CORR MATRIX FOR RANDOM EFFECTS - EPSILONS  ***
         EPS1
 EPS1
+        1.01E-01

 ********************                              MCMC BAYESIAN ANALYSIS                            ********************
 ********************                STANDARD ERROR OF ESTIMATE (From Sample Variance)               ********************

 THETA - VECTOR OF FIXED EFFECTS PARAMETERS   *********
         TH 1      TH 2      TH 3      TH 4      TH 5
         1.56E-02  1.24E-02  2.24E-02  2.39E-02  2.67E-02

 OMEGA - COV MATRIX FOR RANDOM EFFECTS - ETAS  ********
         ETA1      ETA2      ETA3      ETA4
 ETA1
+        4.99E-03
 ETA2
+        2.86E-03  3.12E-03
 ETA3
+        0.00E+00  0.00E+00  7.00E-03
 ETA4
+        0.00E+00  0.00E+00  5.61E-03  8.85E-03

 SIGMA - COV MATRIX FOR RANDOM EFFECTS - EPSILONS  ****
         EPS1
 EPS1
+        3.36E-04

 OMEGA - CORR MATRIX FOR RANDOM EFFECTS - ETAS  *******
         ETA1      ETA2      ETA3      ETA4
 ETA1
+        1.14E-02
 ETA2
+        7.00E-02  9.25E-03
 ETA3
+        0.00E+00  0.00E+00  1.54E-02
 ETA4
+        0.00E+00  0.00E+00  9.05E-02  1.74E-02

 SIGMA - CORR MATRIX FOR RANDOM EFFECTS - EPSILONS  ***
         EPS1
 EPS1
+        1.66E-03

 ********************                              MCMC BAYESIAN ANALYSIS                            ********************
 ********************               COVARIANCE MATRIX OF ESTIMATE (From Sample Variance)             ********************

            TH 1      TH 2      TH 3      TH 4      TH 5      OM11      OM12      OM13      OM14      OM22      OM23      OM24
             OM33      OM34      OM44      SG11
 TH 1
+        2.45E-04
 TH 2
+       -3.73E-05  1.53E-04
 TH 3
+       -1.05E-05  1.77E-06  5.04E-04
 TH 4
+        9.46E-06 -1.46E-06 -3.85E-05  5.71E-04
 TH 5
+       -3.82E-06 -2.00E-05  1.12E-05 -1.16E-05  7.13E-04
 OM11
+        1.42E-06  5.39E-06 -3.46E-06  1.08E-05 -2.55E-06  2.49E-05
 OM12
+        1.39E-06 -8.50E-07  3.22E-07 -6.64E-06 -1.34E-06 -5.75E-06  8.19E-06
 OM13
+       ......... ......... ......... ......... ......... ......... ......... .........
 OM14
+       ......... ......... ......... ......... ......... ......... ......... ......... .........
 OM22
+        1.02E-06 -1.87E-06 -1.51E-08  3.38E-06  4.51E-07  1.78E-06 -3.51E-06  0.00E+00  0.00E+00  9.74E-06
 OM23
+       ......... ......... ......... ......... ......... ......... ......... ......... ......... ......... .........
 OM24
+       ......... ......... ......... ......... ......... ......... ......... ......... ......... ......... ......... .........
 OM33
+        4.22E-06  2.15E-06  3.41E-06  1.61E-05 -4.03E-06  2.64E-07  1.07E-06  0.00E+00  0.00E+00  1.63E-06  0.00E+00  0.00E+00
          4.90E-05
 OM34
+       -2.16E-06 -1.86E-06  8.18E-06 -1.60E-05 -8.00E-06 -9.43E-07 -6.69E-07  0.00E+00  0.00E+00 -2.53E-07  0.00E+00  0.00E+00
         -1.33E-05  3.15E-05
 OM44
+       -5.88E-06  5.41E-06 -1.18E-05  1.04E-05  8.81E-06  3.02E-06 -1.71E-06  0.00E+00  0.00E+00  6.45E-07  0.00E+00  0.00E+00
         -7.85E-08 -1.22E-05  7.83E-05
 SG11
+        2.41E-07  1.43E-07 -3.11E-08  2.59E-07 -6.53E-08 -1.26E-07  6.69E-08  0.00E+00  0.00E+00 -2.07E-08  0.00E+00  0.00E+00
         -3.64E-09  1.58E-08  7.56E-08  1.13E-07

 ********************                              MCMC BAYESIAN ANALYSIS                            ********************
 ********************              CORRELATION MATRIX OF ESTIMATE (From Sample Variance)             ********************

            TH 1      TH 2      TH 3      TH 4      TH 5      OM11      OM12      OM13      OM14      OM22      OM23      OM24
             OM33      OM34      OM44      SG11
 TH 1
+        1.56E-02
 TH 2
+       -1.92E-01  1.24E-02
 TH 3
+       -2.98E-02  6.35E-03  2.24E-02
 TH 4
+        2.53E-02 -4.93E-03 -7.18E-02  2.39E-02
 TH 5
+       -9.14E-03 -6.06E-02  1.87E-02 -1.82E-02  2.67E-02
 OM11
+        1.82E-02  8.72E-02 -3.09E-02  9.08E-02 -1.91E-02  4.99E-03
 OM12
+        3.11E-02 -2.40E-02  5.00E-03 -9.70E-02 -1.76E-02 -4.03E-01  2.86E-03
 OM13
+       ......... ......... ......... ......... ......... ......... ......... .........
 OM14
+       ......... ......... ......... ......... ......... ......... ......... ......... .........
 OM22
+        2.10E-02 -4.83E-02 -2.16E-04  4.54E-02  5.41E-03  1.14E-01 -3.93E-01  0.00E+00  0.00E+00  3.12E-03
 OM23
+       ......... ......... ......... ......... ......... ......... ......... ......... ......... ......... .........
 OM24
+       ......... ......... ......... ......... ......... ......... ......... ......... ......... ......... ......... .........
 OM33
+        3.85E-02  2.48E-02  2.17E-02  9.65E-02 -2.16E-02  7.57E-03  5.33E-02  0.00E+00  0.00E+00  7.47E-02  0.00E+00  0.00E+00
          7.00E-03
 OM34
+       -2.47E-02 -2.67E-02  6.50E-02 -1.19E-01 -5.34E-02 -3.37E-02 -4.16E-02  0.00E+00  0.00E+00 -1.44E-02  0.00E+00  0.00E+00
         -3.39E-01  5.61E-03
 OM44
+       -4.25E-02  4.93E-02 -5.96E-02  4.91E-02  3.73E-02  6.85E-02 -6.74E-02  0.00E+00  0.00E+00  2.33E-02  0.00E+00  0.00E+00
         -1.27E-03 -2.46E-01  8.85E-03
 SG11
+        4.58E-02  3.44E-02 -4.12E-03  3.23E-02 -7.28E-03 -7.50E-02  6.96E-02  0.00E+00  0.00E+00 -1.97E-02  0.00E+00  0.00E+00
         -1.55E-03  8.39E-03  2.54E-02  3.36E-04
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 #TBLN:      5
 #METH: First Order Conditional Estimation with Interaction (No Prior)
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
 #TERM:
0MINIMIZATION SUCCESSFUL
 HOWEVER, PROBLEMS OCCURRED WITH THE MINIMIZATION.
 REGARD THE RESULTS OF THE ESTIMATION STEP CAREFULLY, AND ACCEPT THEM ONLY
 AFTER CHECKING THAT THE COVARIANCE STEP PRODUCES REASONABLE OUTPUT.
 NO. OF FUNCTION EVALUATIONS USED:      427
 NO. OF SIG. DIGITS IN FINAL EST.:  3.0

 ETABAR IS THE ARITHMETIC MEAN OF THE ETA-ESTIMATES,
 AND SE IS THE ASSOCIATED STANDARD ERROR.

 SUBMODEL    1

 ETABAR:        -1.1478E-03  2.3836E-03  0.0000E+00  0.0000E+00
 SE:             1.4890E-02  1.1050E-02  0.0000E+00  0.0000E+00
 N:                     200         200           0           0

 ETASHRINKSD(%)  1.7695E+00  5.0752E+00  1.0000E+02  1.0000E+02
 ETASHRINKVR(%)  3.5078E+00  9.8928E+00  1.0000E+02  1.0000E+02
 EBVSHRINKSD(%)  1.9971E+00  5.0713E+00  1.0000E+02  1.0000E+02
 EBVSHRINKVR(%)  3.9544E+00  9.8855E+00  1.0000E+02  1.0000E+02
 EPSSHRINKSD(%)  1.1415E+01
 EPSSHRINKVR(%)  2.1527E+01


 SUBMODEL    2

 ETABAR:         0.0000E+00  0.0000E+00 -2.8904E-04  1.4249E-04
 SE:             0.0000E+00  0.0000E+00  2.1779E-02  2.4454E-02
 N:                       0           0         100         100

 ETASHRINKSD(%)  1.0000E+02  1.0000E+02  1.4264E+00  1.0000E-10
 ETASHRINKVR(%)  1.0000E+02  1.0000E+02  2.8324E+00  1.0000E-10
 EBVSHRINKSD(%)  1.0000E+02  1.0000E+02  1.9134E+00  1.0473E-01
 EBVSHRINKVR(%)  1.0000E+02  1.0000E+02  3.7902E+00  2.0935E-01
 EPSSHRINKSD(%)  1.4364E+01
 EPSSHRINKVR(%)  2.6664E+01


 TOTAL DATA POINTS NORMALLY DISTRIBUTED (N):         2400
 N*LOG(2PI) CONSTANT TO OBJECTIVE FUNCTION:    4410.90495938243
 OBJECTIVE FUNCTION VALUE WITHOUT CONSTANT:   -9961.74636335185
 OBJECTIVE FUNCTION VALUE WITH CONSTANT:      -5550.84140396942
 REPORTED OBJECTIVE FUNCTION DOES NOT CONTAIN CONSTANT

 TOTAL EFFECTIVE ETAS (NIND*NETA):                           600


 #TERE:
 Elapsed estimation  time in seconds:    52.26
 Elapsed covariance  time in seconds:    19.32
 Elapsed postprocess time in seconds:     0.00

 ********************          FIRST ORDER CONDITIONAL ESTIMATION WITH INTERACTION (NO PRIOR)        ********************
 #OBJT:**************                       MINIMUM VALUE OF OBJECTIVE FUNCTION                      ********************
 #OBJV:********************************************    -9961.746       **************************************************

 ********************          FIRST ORDER CONDITIONAL ESTIMATION WITH INTERACTION (NO PRIOR)        ********************
 ********************                             FINAL PARAMETER ESTIMATE                           ********************

 THETA - VECTOR OF FIXED EFFECTS PARAMETERS   *********
         TH 1      TH 2      TH 3      TH 4      TH 5
         4.24E+00 -2.30E+00  4.26E+00 -6.75E-01  6.67E-01

 OMEGA - COV MATRIX FOR RANDOM EFFECTS - ETAS  ********
         ETA1      ETA2      ETA3      ETA4
 ETA1
+        4.62E-02
 ETA2
+       -8.58E-03  2.72E-02
 ETA3
+        0.00E+00  0.00E+00  4.93E-02
 ETA4
+        0.00E+00  0.00E+00 -1.10E-02  6.00E-02

 SIGMA - COV MATRIX FOR RANDOM EFFECTS - EPSILONS  ****
         EPS1
 EPS1
+        1.02E-02

 OMEGA - CORR MATRIX FOR RANDOM EFFECTS - ETAS  *******
         ETA1      ETA2      ETA3      ETA4
 ETA1
+        2.15E-01
 ETA2
+       -2.42E-01  1.65E-01
 ETA3
+        0.00E+00  0.00E+00  2.22E-01
 ETA4
+        0.00E+00  0.00E+00 -2.03E-01  2.45E-01

 SIGMA - CORR MATRIX FOR RANDOM EFFECTS - EPSILONS  ***
         EPS1
 EPS1
+        1.01E-01

 ********************          FIRST ORDER CONDITIONAL ESTIMATION WITH INTERACTION (NO PRIOR)        ********************
 ********************                            STANDARD ERROR OF ESTIMATE                          ********************

 THETA - VECTOR OF FIXED EFFECTS PARAMETERS   *********
         TH 1      TH 2      TH 3      TH 4      TH 5
         1.55E-02  1.23E-02  2.26E-02  2.45E-02  2.72E-02

 OMEGA - COV MATRIX FOR RANDOM EFFECTS - ETAS  ********
         ETA1      ETA2      ETA3      ETA4
 ETA1
+        4.81E-03
 ETA2
+        2.79E-03  3.02E-03
 ETA3
+       ......... .........  7.25E-03
 ETA4
+       ......... .........  5.67E-03  8.51E-03

 SIGMA - COV MATRIX FOR RANDOM EFFECTS - EPSILONS  ****
         EPS1
 EPS1
+        3.43E-04

 OMEGA - CORR MATRIX FOR RANDOM EFFECTS - ETAS  *******
         ETA1      ETA2      ETA3      ETA4
 ETA1
+        1.12E-02
 ETA2
+        7.13E-02  9.15E-03
 ETA3
+       ......... .........  1.63E-02
 ETA4
+       ......... .........  9.79E-02  1.74E-02

 SIGMA - CORR MATRIX FOR RANDOM EFFECTS - EPSILONS  ***
         EPS1
 EPS1
+        1.69E-03

 ********************          FIRST ORDER CONDITIONAL ESTIMATION WITH INTERACTION (NO PRIOR)        ********************
 ********************                          COVARIANCE MATRIX OF ESTIMATE                         ********************

            TH 1      TH 2      TH 3      TH 4      TH 5      OM11      OM12      OM13      OM14      OM22      OM23      OM24
             OM33      OM34      OM44      SG11
 TH 1
+        2.41E-04
 TH 2
+       -5.01E-05  1.51E-04
 TH 3
+        1.10E-07  1.91E-08  5.13E-04
 TH 4
+       -2.07E-09  1.87E-08 -1.13E-04  6.01E-04
 TH 5
+       -1.01E-09  5.37E-09  2.30E-09  2.39E-08  7.41E-04
 OM11
+        6.85E-08 -1.54E-07 -1.95E-08 -1.18E-09 -2.70E-10  2.32E-05
 OM12
+       -7.85E-08  3.95E-07  1.37E-08 -1.27E-09 -4.21E-10 -4.83E-06  7.79E-06
 OM13
+       ......... ......... ......... ......... ......... ......... ......... .........
 OM14
+       ......... ......... ......... ......... ......... ......... ......... ......... .........
 OM22
+        3.16E-07 -1.27E-06 -3.08E-08  8.20E-09  2.50E-09  9.95E-07 -3.00E-06 ......... .........  9.12E-06
 OM23
+       ......... ......... ......... ......... ......... ......... ......... ......... ......... ......... .........
 OM24
+       ......... ......... ......... ......... ......... ......... ......... ......... ......... ......... ......... .........
 OM33
+       -2.36E-08 -3.33E-09  1.37E-07 -7.47E-08  4.66E-10  4.06E-09 -2.91E-09 ......... .........  6.92E-09 ......... .........
          5.26E-05
 OM34
+        5.18E-09 -1.75E-09 -3.95E-08  1.97E-07 -3.06E-09 -8.42E-10  9.65E-10 ......... ......... -2.37E-09 ......... .........
         -1.16E-05  3.21E-05
 OM44
+       -5.20E-10 -1.93E-08  3.39E-07 -3.98E-07 -2.42E-08  1.66E-09  9.37E-10 ......... ......... -7.54E-09 ......... .........
          2.59E-06 -1.36E-05  7.24E-05
 SG11
+        1.15E-07  1.79E-08  1.13E-07  1.42E-09 -4.83E-12 -2.04E-08  1.46E-08 ......... ......... -3.28E-08 ......... .........
         -2.43E-08  4.38E-09 -4.07E-09  1.18E-07

 ********************          FIRST ORDER CONDITIONAL ESTIMATION WITH INTERACTION (NO PRIOR)        ********************
 ********************                          CORRELATION MATRIX OF ESTIMATE                        ********************

            TH 1      TH 2      TH 3      TH 4      TH 5      OM11      OM12      OM13      OM14      OM22      OM23      OM24
             OM33      OM34      OM44      SG11
 TH 1
+        1.55E-02
 TH 2
+       -2.62E-01  1.23E-02
 TH 3
+        3.13E-04  6.84E-05  2.26E-02
 TH 4
+       -5.44E-06  6.21E-05 -2.04E-01  2.45E-02
 TH 5
+       -2.40E-06  1.60E-05  3.73E-06  3.58E-05  2.72E-02
 OM11
+        9.17E-04 -2.59E-03 -1.79E-04 -1.00E-05 -2.06E-06  4.81E-03
 OM12
+       -1.81E-03  1.15E-02  2.16E-04 -1.85E-05 -5.54E-06 -3.60E-01  2.79E-03
 OM13
+       ......... ......... ......... ......... ......... ......... ......... .........
 OM14
+       ......... ......... ......... ......... ......... ......... ......... ......... .........
 OM22
+        6.74E-03 -3.42E-02 -4.50E-04  1.11E-04  3.04E-05  6.85E-02 -3.56E-01 ......... .........  3.02E-03
 OM23
+       ......... ......... ......... ......... ......... ......... ......... ......... ......... ......... .........
 OM24
+       ......... ......... ......... ......... ......... ......... ......... ......... ......... ......... ......... .........
 OM33
+       -2.09E-04 -3.73E-05  8.36E-04 -4.20E-04  2.36E-06  1.16E-04 -1.44E-04 ......... .........  3.16E-04 ......... .........
          7.25E-03
 OM34
+        5.89E-05 -2.51E-05 -3.08E-04  1.42E-03 -1.98E-05 -3.09E-05  6.10E-05 ......... ......... -1.38E-04 ......... .........
         -2.83E-01  5.67E-03
 OM44
+       -3.94E-06 -1.85E-04  1.76E-03 -1.91E-03 -1.05E-04  4.05E-05  3.95E-05 ......... ......... -2.93E-04 ......... .........
          4.19E-02 -2.83E-01  8.51E-03
 SG11
+        2.16E-02  4.24E-03  1.46E-02  1.69E-04 -5.17E-07 -1.23E-02  1.52E-02 ......... ......... -3.17E-02 ......... .........
         -9.75E-03  2.25E-03 -1.40E-03  3.43E-04
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 Elapsed finaloutput time in seconds:     0.43
 #CPUT: Total CPU Time in Seconds,      261.333
