Sat 04/22/2017
09:34 AM
;Model Desc: Population Mixture Problem in 1 Compartment model,
; with rate constant parameter and its inter-subject variances
; modeled as coming from two sub-populations
;Project Name: nm7examples
;Project ID: NO PROJECT DESCRIPTION

$PROB RUN# example4 (from ad1tr1m2t)
$INPUT C SET ID JID TIME CONC=DV DOSE=AMT RATE EVID MDV CMT VC1
       K101 VC2 K102 SIGZ PROB
$DATA example4.csv IGNORE=C

$SUBROUTINES ADVAN1 TRANS1

$MIX
P(1)=THETA(4)
P(2)=1.0-THETA(4)
NSPOP=2

$PK
MU_1=THETA(1)
MU_2=THETA(2)
MU_3=THETA(3)
V=DEXP(MU_1+ETA(1))
K10M=DEXP(MU_2+ETA(2))
K10F=DEXP(MU_3+ETA(3))
Q=1
IF(MIXNUM.EQ.2) Q=0
K=Q*K10M+(1.0-Q)*K10F
S1=V

$ERROR
Y = F + F*EPS(1)

$THETA
(-1000.0  4.3 1000.0) ;[MU_1]
(-1000.0 -2.9 1000.0) ;[MU_2]
(-1000.0 -0.67 1000.0) ;[MU_3]
(0.0001 0.667 0.9999)   ;[P(1)]

$OMEGA BLOCK(3)
 .04  ;[p]
 0.01  ;[f]
 .027 ;[p]
 0.01  ;[f]
 0.001 ;[f]
 0.06 ;[p]

$SIGMA
 0.01 ;[p]

; Prior information setup for OMEGAS only
$PRIOR NWPRI

; Prior OMEGA
$OMEGAP BLOCK(3)
 0.05 FIX
 0.0 0.05
 0.0 0.0  0.05

; Degrees of Freedom defined for Priors.
$OMEGAPD (3 FIX)

$EST METHOD=ITS INTERACTION NITER=30 PRINT=5 NOABORT SIGL=6
     FILE=example4.ext NOPRIOR=1 CTYPE=3 CITER=10 CALPHA=0.05

$EST METHOD=IMP INTERACTION NITER=20 ISAMPLE=300 PRINT=1
     NOABORT SIGL=6 NOPRIOR=1

$EST NBURN=500 NITER=500 METHOD=SAEM INTERACTION PRINT=10 SIGL=6
     ISAMPLE=2 NOPRIOR=1 MAPITER=0

$EST METHOD=IMP INTERACTION EONLY=1 NITER=20 ISAMPLE=3000 PRINT=1
     NOABORT SIGL=6 NOPRIOR=1

$EST METHOD=BAYES INTERACTION NBURN=2000 NITER=5000 PRINT=10
     FILE=example4.txt SIGL=6 NOPRIOR=0

$EST MAXEVAL=9999 NSIG=3 SIGL=12 PRINT=1
     METHOD=CONDITIONAL INTERACTION
     NOABORT FILE=example4.ext NOPRIOR=1

$COV MATRIX=R UNCONDITIONAL SIGL=10

NM-TRAN MESSAGES
 WARNINGS AND ERRORS (IF ANY) FOR PROBLEM    1
 (WARNING  2) NM-TRAN INFERS THAT THE DATA ARE POPULATION.

1NONLINEAR MIXED EFFECTS MODEL PROGRAM (NONMEM) VERSION 7.4.0 beta 2 (nm74b2)
 ORIGINALLY DEVELOPED BY STUART BEAL, LEWIS SHEINER, AND ALISON BOECKMANN
 CURRENT DEVELOPERS ARE ROBERT BAUER, ICON DEVELOPMENT SOLUTIONS,
 AND ALISON BOECKMANN. IMPLEMENTATION, EFFICIENCY, AND STANDARDIZATION
 PERFORMED BY NOUS INFOSYSTEMS.
 PROBLEM NO.:         1
 RUN# example4 (from ad1tr1m2t)
 TOT. NO. OF OBS RECS:     2400
 TOT. NO. OF INDIVIDUALS:      300
 ONE COMPARTMENT MODEL (ADVAN1)
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 #TBLN:      1
 #METH: Iterative Two Stage (No Prior)
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
 #TERM:
 OPTIMIZATION WAS NOT COMPLETED

 ETABAR IS THE ARITHMETIC MEAN OF THE ETA-ESTIMATES,
 AND SE IS THE ASSOCIATED STANDARD ERROR.

 SUBMODEL    1

 ETABAR:        -6.8177E-03  1.2649E-03  1.5225E-03
 SE:             1.4906E-02  1.1049E-02  3.3641E-03
 N:                     200         200         200

 ETASHRINKSD(%)  3.0067E+00  5.0598E+00  8.0533E+01
 ETASHRINKVR(%)  5.9230E+00  9.8636E+00  9.6210E+01
 EBVSHRINKSD(%)  1.9427E+00  5.0701E+00  8.0324E+01
 EBVSHRINKVR(%)  3.8476E+00  9.8831E+00  9.6129E+01
 EPSSHRINKSD(%)  1.1367E+01
 EPSSHRINKVR(%)  2.1443E+01


 SUBMODEL    2

 ETABAR:         1.3636E-02 -2.5270E-03 -3.0362E-03
 SE:             2.1747E-02  4.0480E-03  2.4451E-02
 N:                     100         100         100

 ETASHRINKSD(%)  1.0000E-10  7.5343E+01  1.0000E-10
 ETASHRINKVR(%)  1.0000E-10  9.3920E+01  1.0000E-10
 EBVSHRINKSD(%)  1.9835E+00  7.5902E+01  1.0446E-01
 EBVSHRINKVR(%)  3.9276E+00  9.4193E+01  2.0880E-01
 EPSSHRINKSD(%)  1.4346E+01
 EPSSHRINKVR(%)  2.6634E+01


 TOTAL DATA POINTS NORMALLY DISTRIBUTED (N):         2400
 N*LOG(2PI) CONSTANT TO OBJECTIVE FUNCTION:    4410.90495938243
 OBJECTIVE FUNCTION VALUE WITHOUT CONSTANT:   -9961.00594927628
 OBJECTIVE FUNCTION VALUE WITH CONSTANT:      -5550.10098989385
 REPORTED OBJECTIVE FUNCTION DOES NOT CONTAIN CONSTANT

 TOTAL EFFECTIVE ETAS (NIND*NETA):                           900


 #TERE:
 Elapsed estimation  time in seconds:     7.35
 Elapsed covariance  time in seconds:     0.59

 ********************                          ITERATIVE TWO STAGE (NO PRIOR)                        ********************
 #OBJT:**************                        FINAL VALUE OF OBJECTIVE FUNCTION                       ********************
 #OBJV:********************************************    -9961.006       **************************************************

 ********************                          ITERATIVE TWO STAGE (NO PRIOR)                        ********************
 ********************                             FINAL PARAMETER ESTIMATE                           ********************

 THETA - VECTOR OF FIXED EFFECTS PARAMETERS   *********
         TH 1      TH 2      TH 3      TH 4
         4.25E+00 -2.30E+00 -6.72E-01  6.67E-01

 OMEGA - COV MATRIX FOR RANDOM EFFECTS - ETAS  ********
         ETA1      ETA2      ETA3
 ETA1
+        4.75E-02
 ETA2
+       -8.80E-03  2.72E-02
 ETA3
+       -1.06E-02  1.02E-03  6.00E-02

 SIGMA - COV MATRIX FOR RANDOM EFFECTS - EPSILONS  ****
         EPS1
 EPS1
+        1.02E-02

 OMEGA - CORR MATRIX FOR RANDOM EFFECTS - ETAS  *******
         ETA1      ETA2      ETA3
 ETA1
+        2.18E-01
 ETA2
+       -2.45E-01  1.65E-01
 ETA3
+       -1.99E-01  2.52E-02  2.45E-01

 SIGMA - CORR MATRIX FOR RANDOM EFFECTS - EPSILONS  ***
         EPS1
 EPS1
+        1.01E-01

 ********************                          ITERATIVE TWO STAGE (NO PRIOR)                        ********************
 ********************                          STANDARD ERROR OF ESTIMATE (S)                        ********************

 THETA - VECTOR OF FIXED EFFECTS PARAMETERS   *********
         TH 1      TH 2      TH 3      TH 4
         1.30E-02  1.27E-02  2.44E-02  2.73E-02

 OMEGA - COV MATRIX FOR RANDOM EFFECTS - ETAS  ********
         ETA1      ETA2      ETA3
 ETA1
+        4.37E-03
 ETA2
+        2.65E-03  2.72E-03
 ETA3
+        5.36E-03  1.75E+03  8.84E-03

 SIGMA - COV MATRIX FOR RANDOM EFFECTS - EPSILONS  ****
         EPS1
 EPS1
+        3.49E-04

 OMEGA - CORR MATRIX FOR RANDOM EFFECTS - ETAS  *******
         ETA1      ETA2      ETA3
 ETA1
+        1.00E-02
 ETA2
+        6.61E-02  8.24E-03
 ETA3
+        9.39E-02  4.33E+04  1.80E-02

 SIGMA - CORR MATRIX FOR RANDOM EFFECTS - EPSILONS  ***
         EPS1
 EPS1
+        1.72E-03

 ********************                          ITERATIVE TWO STAGE (NO PRIOR)                        ********************
 ********************                        COVARIANCE MATRIX OF ESTIMATE (S)                       ********************

            TH 1      TH 2      TH 3      TH 4      OM11      OM12      OM13      OM22      OM23      OM33      SG11
 TH 1
+        1.68E-04
 TH 2
+       -3.53E-05  1.62E-04
 TH 3
+       -3.72E-05  7.76E-06  5.94E-04
 TH 4
+        1.51E-05  9.36E-07 -3.96E-06  7.45E-04
 OM11
+       -4.24E-06  9.66E-07  2.52E-06  1.88E-06  1.91E-05
 OM12
+        1.97E-06  4.53E-06 -8.84E-07 -5.98E-07 -4.95E-06  7.01E-06
 OM13
+        1.98E-06 -4.23E-07 -1.13E-05 -2.08E-07 -5.24E-06  1.38E-06  2.87E-05
 OM22
+        2.20E-06 -2.63E-06 -3.85E-07  1.58E-06 -1.38E-07 -2.50E-06  1.78E-08  7.39E-06
 OM23
+        2.14E-01  4.64E+00  1.98E-01  2.20E+00 -3.90E-01 -1.84E-01  2.72E-02  1.80E+00  3.07E+06
 OM33
+       -2.21E-06  4.93E-07 -2.78E-06  3.62E-07  1.12E-06 -2.81E-07 -1.86E-05 -9.22E-08 -1.70E-01  7.82E-05
 SG11
+        1.54E-07 -5.08E-08  2.79E-07 -3.09E-07  6.78E-08 -3.18E-08 -1.03E-07  4.48E-08  1.13E-01 -1.63E-07  1.22E-07

 ********************                          ITERATIVE TWO STAGE (NO PRIOR)                        ********************
 ********************                        CORRELATION MATRIX OF ESTIMATE (S)                      ********************

            TH 1      TH 2      TH 3      TH 4      OM11      OM12      OM13      OM22      OM23      OM33      SG11
 TH 1
+        1.30E-02
 TH 2
+       -2.14E-01  1.27E-02
 TH 3
+       -1.18E-01  2.50E-02  2.44E-02
 TH 4
+        4.27E-02  2.69E-03 -5.96E-03  2.73E-02
 OM11
+       -7.49E-02  1.74E-02  2.37E-02  1.57E-02  4.37E-03
 OM12
+        5.75E-02  1.34E-01 -1.37E-02 -8.28E-03 -4.28E-01  2.65E-03
 OM13
+        2.85E-02 -6.19E-03 -8.63E-02 -1.42E-03 -2.24E-01  9.69E-02  5.36E-03
 OM22
+        6.25E-02 -7.60E-02 -5.81E-03  2.13E-02 -1.16E-02 -3.47E-01  1.22E-03  2.72E-03
 OM23
+        9.43E-03  2.08E-01  4.64E-03  4.59E-02 -5.10E-02 -3.96E-02  2.90E-03  3.78E-01  1.75E+03
 OM33
+       -1.93E-02  4.38E-03 -1.29E-02  1.50E-03  2.91E-02 -1.20E-02 -3.93E-01 -3.83E-03 -1.10E-02  8.84E-03
 SG11
+        3.41E-02 -1.14E-02  3.28E-02 -3.24E-02  4.45E-02 -3.45E-02 -5.52E-02  4.72E-02  1.85E-01 -5.30E-02  3.49E-04
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 #TBLN:      2
 #METH: Importance Sampling (No Prior)
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
 #TERM:
 OPTIMIZATION WAS COMPLETED

 ETABAR IS THE ARITHMETIC MEAN OF THE ETA-ESTIMATES,
 AND SE IS THE ASSOCIATED STANDARD ERROR.

 SUBMODEL    1

 ETABAR:        -6.1858E-03  9.5595E-04  1.6495E-03
 SE:             1.4909E-02  1.1117E-02  3.6614E-03
 N:                     200         200         200

 ETASHRINKSD(%)  2.9019E+00  5.6497E+00  7.8768E+01
 ETASHRINKVR(%)  5.7196E+00  1.0980E+01  9.5492E+01
 EBVSHRINKSD(%)  1.9750E+00  5.1042E+00  7.9101E+01
 EBVSHRINKVR(%)  3.9110E+00  9.9479E+00  9.5632E+01
 EPSSHRINKSD(%)  1.1639E+01
 EPSSHRINKVR(%)  2.1923E+01


 SUBMODEL    2

 ETABAR:         1.3077E-02 -3.5218E-03 -2.5846E-03
 SE:             2.1757E-02  4.2844E-03  2.4482E-02
 N:                     100         100         100

 ETASHRINKSD(%)  1.0000E-10  7.4224E+01  1.0000E-10
 ETASHRINKVR(%)  1.0000E-10  9.3356E+01  1.0000E-10
 EBVSHRINKSD(%)  2.0124E+00  7.5485E+01  1.0929E-01
 EBVSHRINKVR(%)  3.9843E+00  9.3990E+01  2.1845E-01
 EPSSHRINKSD(%)  1.4649E+01
 EPSSHRINKVR(%)  2.7152E+01


 TOTAL DATA POINTS NORMALLY DISTRIBUTED (N):         2400
 N*LOG(2PI) CONSTANT TO OBJECTIVE FUNCTION:    4410.90495938243
 OBJECTIVE FUNCTION VALUE WITHOUT CONSTANT:   -9967.15427310508
 OBJECTIVE FUNCTION VALUE WITH CONSTANT:      -5556.24931372265
 REPORTED OBJECTIVE FUNCTION DOES NOT CONTAIN CONSTANT

 TOTAL EFFECTIVE ETAS (NIND*NETA):                           900


 #TERE:
 Elapsed estimation  time in seconds:    13.98
 Elapsed covariance  time in seconds:     1.74

 ********************                          IMPORTANCE SAMPLING (NO PRIOR)                        ********************
 #OBJT:**************                        FINAL VALUE OF OBJECTIVE FUNCTION                       ********************
 #OBJV:********************************************    -9967.154       **************************************************

 ********************                          IMPORTANCE SAMPLING (NO PRIOR)                        ********************
 ********************                             FINAL PARAMETER ESTIMATE                           ********************

 THETA - VECTOR OF FIXED EFFECTS PARAMETERS   *********
         TH 1      TH 2      TH 3      TH 4
         4.25E+00 -2.30E+00 -6.74E-01  6.67E-01

 OMEGA - COV MATRIX FOR RANDOM EFFECTS - ETAS  ********
         ETA1      ETA2      ETA3
 ETA1
+        4.74E-02
 ETA2
+       -8.82E-03  2.79E-02
 ETA3
+       -1.08E-02  1.12E-03  5.98E-02

 SIGMA - COV MATRIX FOR RANDOM EFFECTS - EPSILONS  ****
         EPS1
 EPS1
+        1.02E-02

 OMEGA - CORR MATRIX FOR RANDOM EFFECTS - ETAS  *******
         ETA1      ETA2      ETA3
 ETA1
+        2.18E-01
 ETA2
+       -2.43E-01  1.67E-01
 ETA3
+       -2.02E-01  2.74E-02  2.44E-01

 SIGMA - CORR MATRIX FOR RANDOM EFFECTS - EPSILONS  ***
         EPS1
 EPS1
+        1.01E-01

 ********************                          IMPORTANCE SAMPLING (NO PRIOR)                        ********************
 ********************                          STANDARD ERROR OF ESTIMATE (R)                        ********************

 THETA - VECTOR OF FIXED EFFECTS PARAMETERS   *********
         TH 1      TH 2      TH 3      TH 4
         1.28E-02  1.23E-02  2.42E-02  2.73E-02

 OMEGA - COV MATRIX FOR RANDOM EFFECTS - ETAS  ********
         ETA1      ETA2      ETA3
 ETA1
+        4.02E-03
 ETA2
+        2.84E-03  3.14E-03
 ETA3
+        5.25E-03  2.02E-02  8.40E-03

 SIGMA - COV MATRIX FOR RANDOM EFFECTS - EPSILONS  ****
         EPS1
 EPS1
+        3.43E-04

 OMEGA - CORR MATRIX FOR RANDOM EFFECTS - ETAS  *******
         ETA1      ETA2      ETA3
 ETA1
+        9.24E-03
 ETA2
+        7.21E-02  9.39E-03
 ETA3
+        9.47E-02  4.95E-01  1.72E-02

 SIGMA - CORR MATRIX FOR RANDOM EFFECTS - EPSILONS  ***
         EPS1
 EPS1
+        1.70E-03

 ********************                          IMPORTANCE SAMPLING (NO PRIOR)                        ********************
 ********************                        COVARIANCE MATRIX OF ESTIMATE (R)                       ********************

            TH 1      TH 2      TH 3      TH 4      OM11      OM12      OM13      OM22      OM23      OM33      SG11
 TH 1
+        1.65E-04
 TH 2
+       -3.43E-05  1.52E-04
 TH 3
+       -3.68E-05  7.50E-06  5.88E-04
 TH 4
+        1.46E-05 -3.97E-06 -5.66E-06  7.45E-04
 OM11
+       -5.51E-08 -1.43E-08 -2.57E-08  2.56E-06  1.62E-05
 OM12
+        1.56E-07  1.02E-06  5.85E-07 -8.80E-07 -3.29E-06  8.05E-06
 OM13
+       -7.81E-08  2.07E-07 -7.99E-06  8.25E-07 -3.50E-06  6.91E-07  2.76E-05
 OM22
+        1.69E-07 -1.39E-06 -4.54E-07  9.03E-07  6.80E-07 -3.08E-06 -6.87E-08  9.85E-06
 OM23
+        7.19E-07 -4.69E-06  5.69E-05 -1.70E-05  5.05E-07  1.62E-06 -1.45E-05 -2.11E-06  4.08E-04
 OM33
+        1.53E-07 -1.57E-07  1.43E-06 -1.96E-08  7.87E-07 -4.31E-08 -1.20E-05 -1.30E-07  1.91E-05  7.05E-05
 SG11
+        8.87E-08 -2.83E-08 -2.93E-08 -4.14E-07 -2.43E-08  1.42E-08  1.08E-08 -2.98E-08 -6.78E-08 -8.81E-09  1.18E-07

 ********************                          IMPORTANCE SAMPLING (NO PRIOR)                        ********************
 ********************                        CORRELATION MATRIX OF ESTIMATE (R)                      ********************

            TH 1      TH 2      TH 3      TH 4      OM11      OM12      OM13      OM22      OM23      OM33      SG11
 TH 1
+        1.28E-02
 TH 2
+       -2.17E-01  1.23E-02
 TH 3
+       -1.18E-01  2.51E-02  2.42E-02
 TH 4
+        4.16E-02 -1.18E-02 -8.55E-03  2.73E-02
 OM11
+       -1.07E-03 -2.89E-04 -2.64E-04  2.33E-02  4.02E-03
 OM12
+        4.27E-03  2.91E-02  8.50E-03 -1.14E-02 -2.88E-01  2.84E-03
 OM13
+       -1.16E-03  3.20E-03 -6.28E-02  5.76E-03 -1.66E-01  4.64E-02  5.25E-03
 OM22
+        4.20E-03 -3.59E-02 -5.97E-03  1.05E-02  5.38E-02 -3.46E-01 -4.17E-03  3.14E-03
 OM23
+        2.77E-03 -1.89E-02  1.16E-01 -3.09E-02  6.21E-03  2.83E-02 -1.37E-01 -3.33E-02  2.02E-02
 OM33
+        1.42E-03 -1.52E-03  7.00E-03 -8.56E-05  2.33E-02 -1.81E-03 -2.72E-01 -4.93E-03  1.13E-01  8.40E-03
 SG11
+        2.01E-02 -6.71E-03 -3.52E-03 -4.42E-02 -1.76E-02  1.45E-02  6.00E-03 -2.76E-02 -9.78E-03 -3.06E-03  3.43E-04
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 #TBLN:      3
 #METH: Stochastic Approximation Expectation-Maximization (No Prior)
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
 #TERM:
 STOCHASTIC PORTION WAS COMPLETED
 REDUCED STOCHASTIC PORTION WAS COMPLETED

 ETABAR IS THE ARITHMETIC MEAN OF THE ETA-ESTIMATES,
 AND SE IS THE ASSOCIATED STANDARD ERROR.

 SUBMODEL    1

 ETABAR:        -6.3786E-03  1.6888E-03  5.1941E-04
 SE:             1.4902E-02  1.1099E-02  5.8680E-03
 N:                     200         200         200

 ETASHRINKSD(%)  2.9968E+00  5.2361E+00  6.5852E+01
 ETASHRINKVR(%)  5.9037E+00  1.0198E+01  8.8339E+01
 EBVSHRINKSD(%)  1.9480E+00  5.1180E+00  6.4823E+01
 EBVSHRINKVR(%)  3.8581E+00  9.9741E+00  8.7626E+01
 EPSSHRINKSD(%)  1.1591E+01
 EPSSHRINKVR(%)  2.1839E+01


 SUBMODEL    2

 ETABAR:         1.2747E-02 -3.3890E-03 -9.3423E-04
 SE:             2.1737E-02  6.2396E-03  2.4478E-02
 N:                     100         100         100

 ETASHRINKSD(%)  1.0000E-10  6.2233E+01  1.0000E-10
 ETASHRINKVR(%)  1.0000E-10  8.5737E+01  1.0000E-10
 EBVSHRINKSD(%)  1.9974E+00  6.3265E+01  1.0968E-01
 EBVSHRINKVR(%)  3.9549E+00  8.6505E+01  2.1924E-01
 EPSSHRINKSD(%)  1.4612E+01
 EPSSHRINKVR(%)  2.7089E+01


 TOTAL DATA POINTS NORMALLY DISTRIBUTED (N):         2400
 N*LOG(2PI) CONSTANT TO OBJECTIVE FUNCTION:    4410.90495938243
 OBJECTIVE FUNCTION VALUE WITHOUT CONSTANT:   -14416.7033318487
 OBJECTIVE FUNCTION VALUE WITH CONSTANT:      -10005.7983724662
 REPORTED OBJECTIVE FUNCTION DOES NOT CONTAIN CONSTANT

 TOTAL EFFECTIVE ETAS (NIND*NETA):                           900
 NIND*NETA*LOG(2PI) CONSTANT TO OBJECTIVE FUNCTION:    1654.08935976841
 OBJECTIVE FUNCTION VALUE WITHOUT CONSTANT:   -14416.7033318487
 OBJECTIVE FUNCTION VALUE WITH CONSTANT:      -12762.6139720802
 REPORTED OBJECTIVE FUNCTION DOES NOT CONTAIN CONSTANT


 #TERE:
 Elapsed estimation  time in seconds:    67.86
 Elapsed covariance  time in seconds:     0.62

 ********************           STOCHASTIC APPROXIMATION EXPECTATION-MAXIMIZATION (NO PRIOR)         ********************
 #OBJT:**************                        FINAL VALUE OF LIKELIHOOD FUNCTION                      ********************
 #OBJV:********************************************   -14416.703       **************************************************

 ********************           STOCHASTIC APPROXIMATION EXPECTATION-MAXIMIZATION (NO PRIOR)         ********************
 ********************                             FINAL PARAMETER ESTIMATE                           ********************

 THETA - VECTOR OF FIXED EFFECTS PARAMETERS   *********
         TH 1      TH 2      TH 3      TH 4
         4.25E+00 -2.30E+00 -6.75E-01  6.67E-01

 OMEGA - COV MATRIX FOR RANDOM EFFECTS - ETAS  ********
         ETA1      ETA2      ETA3
 ETA1
+        4.74E-02
 ETA2
+       -8.95E-03  2.76E-02
 ETA3
+       -1.09E-02 -8.99E-03  5.94E-02

 SIGMA - COV MATRIX FOR RANDOM EFFECTS - EPSILONS  ****
         EPS1
 EPS1
+        1.02E-02

 OMEGA - CORR MATRIX FOR RANDOM EFFECTS - ETAS  *******
         ETA1      ETA2      ETA3
 ETA1
+        2.18E-01
 ETA2
+       -2.47E-01  1.66E-01
 ETA3
+       -2.06E-01 -2.22E-01  2.44E-01

 SIGMA - CORR MATRIX FOR RANDOM EFFECTS - EPSILONS  ***
         EPS1
 EPS1
+        1.01E-01

 ********************           STOCHASTIC APPROXIMATION EXPECTATION-MAXIMIZATION (NO PRIOR)         ********************
 ********************                          STANDARD ERROR OF ESTIMATE (S)                        ********************

 THETA - VECTOR OF FIXED EFFECTS PARAMETERS   *********
         TH 1      TH 2      TH 3      TH 4
         1.30E-02  1.28E-02  2.44E-02  2.73E-02

 OMEGA - COV MATRIX FOR RANDOM EFFECTS - ETAS  ********
         ETA1      ETA2      ETA3
 ETA1
+        4.37E-03
 ETA2
+        2.67E-03  2.57E-03
 ETA3
+        5.29E-03  6.06E-02  8.64E-03

 SIGMA - COV MATRIX FOR RANDOM EFFECTS - EPSILONS  ****
         EPS1
 EPS1
+        3.41E-04

 OMEGA - CORR MATRIX FOR RANDOM EFFECTS - ETAS  *******
         ETA1      ETA2      ETA3
 ETA1
+        1.00E-02
 ETA2
+        6.60E-02  7.74E-03
 ETA3
+        9.28E-02  1.50E+00  1.77E-02

 SIGMA - CORR MATRIX FOR RANDOM EFFECTS - EPSILONS  ***
         EPS1
 EPS1
+        1.69E-03

 ********************           STOCHASTIC APPROXIMATION EXPECTATION-MAXIMIZATION (NO PRIOR)         ********************
 ********************                        COVARIANCE MATRIX OF ESTIMATE (S)                       ********************

            TH 1      TH 2      TH 3      TH 4      OM11      OM12      OM13      OM22      OM23      OM33      SG11
 TH 1
+        1.68E-04
 TH 2
+       -3.78E-05  1.65E-04
 TH 3
+       -4.04E-05  1.82E-05  5.95E-04
 TH 4
+        1.33E-05 -1.31E-07  6.56E-06  7.46E-04
 OM11
+       -4.55E-06  2.65E-06  4.26E-06  2.62E-06  1.91E-05
 OM12
+        2.13E-06  4.64E-06 -1.40E-06 -8.13E-07 -5.08E-06  7.13E-06
 OM13
+        2.07E-06 -4.47E-07 -1.02E-05  1.31E-07 -5.39E-06  1.40E-06  2.80E-05
 OM22
+        2.15E-06 -6.12E-06 -7.61E-07  2.90E-07  8.56E-08 -2.50E-06 -7.59E-08  6.60E-06
 OM23
+       -3.19E-05  1.61E-04  2.70E-04  7.61E-05  2.42E-05 -6.83E-06 -2.01E-06 -9.56E-06  3.67E-03
 OM33
+       -2.30E-06  2.24E-06 -2.20E-06  3.77E-06  1.50E-06 -2.63E-07 -1.86E-05 -5.56E-08  2.49E-05  7.47E-05
 SG11
+        1.27E-07 -2.52E-07  2.89E-07 -3.89E-07  8.22E-08 -2.51E-08 -9.25E-08 -2.16E-08  5.36E-07 -1.60E-07  1.16E-07

 ********************           STOCHASTIC APPROXIMATION EXPECTATION-MAXIMIZATION (NO PRIOR)         ********************
 ********************                        CORRELATION MATRIX OF ESTIMATE (S)                      ********************

            TH 1      TH 2      TH 3      TH 4      OM11      OM12      OM13      OM22      OM23      OM33      SG11
 TH 1
+        1.30E-02
 TH 2
+       -2.26E-01  1.28E-02
 TH 3
+       -1.28E-01  5.80E-02  2.44E-02
 TH 4
+        3.76E-02 -3.74E-04  9.85E-03  2.73E-02
 OM11
+       -8.01E-02  4.72E-02  3.99E-02  2.20E-02  4.37E-03
 OM12
+        6.14E-02  1.35E-01 -2.15E-02 -1.11E-02 -4.35E-01  2.67E-03
 OM13
+        3.02E-02 -6.57E-03 -7.89E-02  9.04E-04 -2.33E-01  9.90E-02  5.29E-03
 OM22
+        6.45E-02 -1.85E-01 -1.21E-02  4.14E-03  7.62E-03 -3.64E-01 -5.58E-03  2.57E-03
 OM23
+       -4.06E-02  2.06E-01  1.83E-01  4.60E-02  9.13E-02 -4.22E-02 -6.27E-03 -6.14E-02  6.06E-02
 OM33
+       -2.05E-02  2.02E-02 -1.04E-02  1.60E-02  3.97E-02 -1.14E-02 -4.06E-01 -2.51E-03  4.76E-02  8.64E-03
 SG11
+        2.86E-02 -5.74E-02  3.47E-02 -4.18E-02  5.51E-02 -2.75E-02 -5.12E-02 -2.46E-02  2.59E-02 -5.42E-02  3.41E-04
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 #TBLN:      4
 #METH: Objective Function Evaluation by Importance Sampling (No Prior)
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
 #TERM:
 EXPECTATION ONLY PROCESS COMPLETED

 ETABAR IS THE ARITHMETIC MEAN OF THE ETA-ESTIMATES,
 AND SE IS THE ASSOCIATED STANDARD ERROR.

 SUBMODEL    1

 ETABAR:        -6.5009E-03  1.6700E-03  1.5158E-03
 SE:             1.4908E-02  1.1108E-02  5.8589E-03
 N:                     200         200         200

 ETASHRINKSD(%)  2.9617E+00  5.1540E+00  6.5905E+01
 ETASHRINKVR(%)  5.8357E+00  1.0042E+01  8.8375E+01
 EBVSHRINKSD(%)  1.9591E+00  5.1738E+00  6.6224E+01
 EBVSHRINKVR(%)  3.8799E+00  1.0080E+01  8.8592E+01
 EPSSHRINKSD(%)  1.1625E+01
 EPSSHRINKVR(%)  2.1899E+01


 SUBMODEL    2

 ETABAR:         1.3112E-02 -2.6634E-03 -9.9861E-04
 SE:             2.1741E-02  6.2181E-03  2.4481E-02
 N:                     100         100         100

 ETASHRINKSD(%)  1.0000E-10  6.2363E+01  1.0000E-10
 ETASHRINKVR(%)  1.0000E-10  8.5835E+01  1.0000E-10
 EBVSHRINKSD(%)  2.0139E+00  6.2812E+01  1.1016E-01
 EBVSHRINKVR(%)  3.9872E+00  8.6171E+01  2.2020E-01
 EPSSHRINKSD(%)  1.4607E+01
 EPSSHRINKVR(%)  2.7081E+01


 TOTAL DATA POINTS NORMALLY DISTRIBUTED (N):         2400
 N*LOG(2PI) CONSTANT TO OBJECTIVE FUNCTION:    4410.90495938243
 OBJECTIVE FUNCTION VALUE WITHOUT CONSTANT:   -9966.30276537542
 OBJECTIVE FUNCTION VALUE WITH CONSTANT:      -5555.39780599299
 REPORTED OBJECTIVE FUNCTION DOES NOT CONTAIN CONSTANT

 TOTAL EFFECTIVE ETAS (NIND*NETA):                           900


 #TERE:
 Elapsed estimation  time in seconds:   186.51
 Elapsed covariance  time in seconds:    11.58

 ********************         OBJECTIVE FUNCTION EVALUATION BY IMPORTANCE SAMPLING (NO PRIOR)        ********************
 #OBJT:**************                        FINAL VALUE OF OBJECTIVE FUNCTION                       ********************
 #OBJV:********************************************    -9966.303       **************************************************

 ********************         OBJECTIVE FUNCTION EVALUATION BY IMPORTANCE SAMPLING (NO PRIOR)        ********************
 ********************                             FINAL PARAMETER ESTIMATE                           ********************

 THETA - VECTOR OF FIXED EFFECTS PARAMETERS   *********
         TH 1      TH 2      TH 3      TH 4
         4.25E+00 -2.30E+00 -6.75E-01  6.67E-01

 OMEGA - COV MATRIX FOR RANDOM EFFECTS - ETAS  ********
         ETA1      ETA2      ETA3
 ETA1
+        4.74E-02
 ETA2
+       -8.95E-03  2.76E-02
 ETA3
+       -1.09E-02 -8.99E-03  5.94E-02

 SIGMA - COV MATRIX FOR RANDOM EFFECTS - EPSILONS  ****
         EPS1
 EPS1
+        1.02E-02

 OMEGA - CORR MATRIX FOR RANDOM EFFECTS - ETAS  *******
         ETA1      ETA2      ETA3
 ETA1
+        2.18E-01
 ETA2
+       -2.47E-01  1.66E-01
 ETA3
+       -2.06E-01 -2.22E-01  2.44E-01

 SIGMA - CORR MATRIX FOR RANDOM EFFECTS - EPSILONS  ***
         EPS1
 EPS1
+        1.01E-01

 ********************         OBJECTIVE FUNCTION EVALUATION BY IMPORTANCE SAMPLING (NO PRIOR)        ********************
 ********************                          STANDARD ERROR OF ESTIMATE (R)                        ********************

 THETA - VECTOR OF FIXED EFFECTS PARAMETERS   *********
         TH 1      TH 2      TH 3      TH 4
         1.28E-02  1.23E-02  2.42E-02  2.73E-02

 OMEGA - COV MATRIX FOR RANDOM EFFECTS - ETAS  ********
         ETA1      ETA2      ETA3
 ETA1
+        4.03E-03
 ETA2
+        2.82E-03  3.07E-03
 ETA3
+        5.25E-03  4.50E-02  8.31E-03

 SIGMA - COV MATRIX FOR RANDOM EFFECTS - EPSILONS  ****
         EPS1
 EPS1
+        3.42E-04

 OMEGA - CORR MATRIX FOR RANDOM EFFECTS - ETAS  *******
         ETA1      ETA2      ETA3
 ETA1
+        9.25E-03
 ETA2
+        7.14E-02  9.25E-03
 ETA3
+        9.45E-02  1.11E+00  1.71E-02

 SIGMA - CORR MATRIX FOR RANDOM EFFECTS - EPSILONS  ***
         EPS1
 EPS1
+        1.69E-03

 ********************         OBJECTIVE FUNCTION EVALUATION BY IMPORTANCE SAMPLING (NO PRIOR)        ********************
 ********************                        COVARIANCE MATRIX OF ESTIMATE (R)                       ********************

            TH 1      TH 2      TH 3      TH 4      OM11      OM12      OM13      OM22      OM23      OM33      SG11
 TH 1
+        1.65E-04
 TH 2
+       -3.48E-05  1.51E-04
 TH 3
+       -3.73E-05  9.54E-06  5.86E-04
 TH 4
+        1.49E-05 -3.33E-06  7.92E-07  7.44E-04
 OM11
+        4.56E-08 -9.42E-08  5.41E-08  2.50E-06  1.62E-05
 OM12
+       -1.52E-07  1.36E-06 -1.97E-07 -7.46E-07 -3.43E-06  7.93E-06
 OM13
+       -3.85E-07 -1.52E-07 -7.17E-06  1.33E-07 -3.75E-06  8.06E-07  2.76E-05
 OM22
+        2.66E-07 -1.98E-06  5.44E-08  1.57E-07  7.19E-07 -3.17E-06 -1.61E-07  9.44E-06
 OM23
+       -1.67E-06 -3.26E-05 -8.05E-05 -5.69E-06  1.08E-06  3.51E-06  8.99E-06 -3.01E-06  2.02E-03
 OM33
+        3.58E-07  3.36E-07  9.10E-07  1.64E-06  8.65E-07 -2.86E-07 -1.31E-05  6.45E-08 -3.82E-05  6.91E-05
 SG11
+        8.91E-08 -3.28E-08 -1.71E-08 -4.09E-07 -2.04E-08  1.43E-08  2.90E-09 -2.83E-08 -6.30E-08  6.72E-09  1.17E-07

 ********************         OBJECTIVE FUNCTION EVALUATION BY IMPORTANCE SAMPLING (NO PRIOR)        ********************
 ********************                        CORRELATION MATRIX OF ESTIMATE (R)                      ********************

            TH 1      TH 2      TH 3      TH 4      OM11      OM12      OM13      OM22      OM23      OM33      SG11
 TH 1
+        1.28E-02
 TH 2
+       -2.21E-01  1.23E-02
 TH 3
+       -1.20E-01  3.21E-02  2.42E-02
 TH 4
+        4.24E-02 -9.95E-03  1.20E-03  2.73E-02
 OM11
+        8.81E-04 -1.90E-03  5.55E-04  2.27E-02  4.03E-03
 OM12
+       -4.20E-03  3.94E-02 -2.88E-03 -9.71E-03 -3.02E-01  2.82E-03
 OM13
+       -5.71E-03 -2.36E-03 -5.64E-02  9.29E-04 -1.77E-01  5.45E-02  5.25E-03
 OM22
+        6.74E-03 -5.24E-02  7.31E-04  1.88E-03  5.80E-02 -3.66E-01 -9.95E-03  3.07E-03
 OM23
+       -2.88E-03 -5.90E-02 -7.39E-02 -4.63E-03  5.96E-03  2.77E-02  3.80E-02 -2.18E-02  4.50E-02
 OM33
+        3.35E-03  3.30E-03  4.52E-03  7.25E-03  2.58E-02 -1.22E-02 -3.00E-01  2.52E-03 -1.02E-01  8.31E-03
 SG11
+        2.03E-02 -7.80E-03 -2.06E-03 -4.38E-02 -1.48E-02  1.49E-02  1.61E-03 -2.69E-02 -4.09E-03  2.36E-03  3.42E-04
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 #TBLN:      5
 #METH: MCMC Bayesian Analysis
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
 #TERM:
 STATISTICAL PORTION WAS COMPLETED

 TOTAL DATA POINTS NORMALLY DISTRIBUTED (N):         2400
 N*LOG(2PI) CONSTANT TO OBJECTIVE FUNCTION:    4410.90495938243
 OBJECTIVE FUNCTION VALUE WITHOUT CONSTANT:   -14087.8335530506
 OBJECTIVE FUNCTION VALUE WITH CONSTANT:      -9676.92859366816
 REPORTED OBJECTIVE FUNCTION DOES NOT CONTAIN CONSTANT

 TOTAL EFFECTIVE ETAS (NIND*NETA):                           900
 NIND*NETA*LOG(2PI) CONSTANT TO OBJECTIVE FUNCTION:    1654.08935976841
 OBJECTIVE FUNCTION VALUE WITHOUT CONSTANT:   -14087.8335530506
 OBJECTIVE FUNCTION VALUE WITH CONSTANT:      -12433.7441932822
 REPORTED OBJECTIVE FUNCTION DOES NOT CONTAIN CONSTANT

 PRIOR CONSTANT TO OBJECTIVE FUNCTION:    27.6497595571396
 OBJECTIVE FUNCTION VALUE WITHOUT CONSTANT:   -14087.8335530506
 OBJECTIVE FUNCTION VALUE WITH CONSTANT:      -14060.1837934935
 REPORTED OBJECTIVE FUNCTION DOES NOT CONTAIN CONSTANT


 #TERE:
 Elapsed estimation  time in seconds:   411.35
 Elapsed covariance  time in seconds:     0.00

 ********************                              MCMC BAYESIAN ANALYSIS                            ********************
 #OBJT:**************                       AVERAGE VALUE OF LIKELIHOOD FUNCTION                     ********************
 #OBJV:********************************************   -14087.834       **************************************************
 #OBJS:********************************************       65.549 (STD) **************************************************

 ********************                              MCMC BAYESIAN ANALYSIS                            ********************
 ********************                             FINAL PARAMETER ESTIMATE                           ********************

 THETA - VECTOR OF FIXED EFFECTS PARAMETERS   *********
         TH 1      TH 2      TH 3      TH 4
         4.25E+00 -2.30E+00 -6.75E-01  6.65E-01

 OMEGA - COV MATRIX FOR RANDOM EFFECTS - ETAS  ********
         ETA1      ETA2      ETA3
 ETA1
+        4.81E-02
 ETA2
+       -8.86E-03  2.87E-02
 ETA3
+       -1.04E-02 -2.13E-03  6.26E-02

 SIGMA - COV MATRIX FOR RANDOM EFFECTS - EPSILONS  ****
         EPS1
 EPS1
+        1.02E-02

 OMEGA - CORR MATRIX FOR RANDOM EFFECTS - ETAS  *******
         ETA1      ETA2      ETA3
 ETA1
+        2.19E-01
 ETA2
+       -2.38E-01  1.69E-01
 ETA3
+       -1.90E-01 -5.03E-02  2.49E-01

 SIGMA - CORR MATRIX FOR RANDOM EFFECTS - EPSILONS  ***
         EPS1
 EPS1
+        1.01E-01

 ********************                              MCMC BAYESIAN ANALYSIS                            ********************
 ********************                STANDARD ERROR OF ESTIMATE (From Sample Variance)               ********************

 THETA - VECTOR OF FIXED EFFECTS PARAMETERS   *********
         TH 1      TH 2      TH 3      TH 4
         1.28E-02  1.28E-02  2.52E-02  2.70E-02

 OMEGA - COV MATRIX FOR RANDOM EFFECTS - ETAS  ********
         ETA1      ETA2      ETA3
 ETA1
+        4.14E-03
 ETA2
+        2.91E-03  3.18E-03
 ETA3
+        5.40E-03  1.17E-02  9.26E-03

 SIGMA - COV MATRIX FOR RANDOM EFFECTS - EPSILONS  ****
         EPS1
 EPS1
+        3.46E-04

 OMEGA - CORR MATRIX FOR RANDOM EFFECTS - ETAS  *******
         ETA1      ETA2      ETA3
 ETA1
+        9.39E-03
 ETA2
+        7.17E-02  9.31E-03
 ETA3
+        9.34E-02  2.75E-01  1.83E-02

 SIGMA - CORR MATRIX FOR RANDOM EFFECTS - EPSILONS  ***
         EPS1
 EPS1
+        1.71E-03

 ********************                              MCMC BAYESIAN ANALYSIS                            ********************
 ********************               COVARIANCE MATRIX OF ESTIMATE (From Sample Variance)             ********************

            TH 1      TH 2      TH 3      TH 4      OM11      OM12      OM13      OM22      OM23      OM33      SG11
 TH 1
+        1.63E-04
 TH 2
+       -3.58E-05  1.63E-04
 TH 3
+       -3.69E-05  1.37E-05  6.33E-04
 TH 4
+       -2.89E-06  4.66E-06  1.39E-07  7.30E-04
 OM11
+        7.43E-07 -1.85E-07  2.57E-06 -1.90E-06  1.71E-05
 OM12
+       -1.50E-07  2.11E-06 -3.58E-07  2.13E-06 -3.54E-06  8.49E-06
 OM13
+       -4.24E-07 -5.58E-07 -6.56E-06  4.89E-06 -3.80E-06  1.08E-06  2.91E-05
 OM22
+        2.79E-08 -9.79E-07  3.45E-06 -2.45E-07  9.07E-07 -3.50E-06 -5.97E-07  1.01E-05
 OM23
+       -4.22E-07  3.53E-07 -1.15E-05 -4.93E-06  9.09E-07 -2.15E-06 -3.75E-06 -1.97E-06  1.38E-04
 OM33
+        2.65E-08 -1.33E-06 -6.16E-06 -7.38E-06  1.44E-06 -8.39E-07 -1.28E-05  6.35E-07  1.09E-06  8.57E-05
 SG11
+        1.65E-07 -2.73E-08  7.41E-08  1.85E-07 -3.25E-08  1.45E-08  4.12E-08 -1.14E-08 -9.01E-08 -1.51E-07  1.20E-07

 ********************                              MCMC BAYESIAN ANALYSIS                            ********************
 ********************              CORRELATION MATRIX OF ESTIMATE (From Sample Variance)             ********************

            TH 1      TH 2      TH 3      TH 4      OM11      OM12      OM13      OM22      OM23      OM33      SG11
 TH 1
+        1.28E-02
 TH 2
+       -2.20E-01  1.28E-02
 TH 3
+       -1.15E-01  4.26E-02  2.52E-02
 TH 4
+       -8.38E-03  1.35E-02  2.04E-04  2.70E-02
 OM11
+        1.40E-02 -3.51E-03  2.47E-02 -1.70E-02  4.14E-03
 OM12
+       -4.02E-03  5.68E-02 -4.89E-03  2.71E-02 -2.93E-01  2.91E-03
 OM13
+       -6.14E-03 -8.11E-03 -4.84E-02  3.36E-02 -1.70E-01  6.88E-02  5.40E-03
 OM22
+        6.88E-04 -2.42E-02  4.31E-02 -2.85E-03  6.89E-02 -3.78E-01 -3.48E-02  3.18E-03
 OM23
+       -2.81E-03  2.36E-03 -3.89E-02 -1.55E-02  1.87E-02 -6.28E-02 -5.92E-02 -5.28E-02  1.17E-02
 OM33
+        2.24E-04 -1.13E-02 -2.65E-02 -2.95E-02  3.77E-02 -3.11E-02 -2.55E-01  2.16E-02  1.00E-02  9.26E-03
 SG11
+        3.72E-02 -6.19E-03  8.50E-03  1.98E-02 -2.27E-02  1.44E-02  2.20E-02 -1.04E-02 -2.21E-02 -4.70E-02  3.46E-04
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 #TBLN:      6
 #METH: First Order Conditional Estimation with Interaction (No Prior)
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
 #TERM:
0MINIMIZATION SUCCESSFUL
 HOWEVER, PROBLEMS OCCURRED WITH THE MINIMIZATION.
 REGARD THE RESULTS OF THE ESTIMATION STEP CAREFULLY, AND ACCEPT THEM ONLY
 AFTER CHECKING THAT THE COVARIANCE STEP PRODUCES REASONABLE OUTPUT.
 NO. OF FUNCTION EVALUATIONS USED:      433
 NO. OF SIG. DIGITS IN FINAL EST.:  3.9

 ETABAR IS THE ARITHMETIC MEAN OF THE ETA-ESTIMATES,
 AND SE IS THE ASSOCIATED STANDARD ERROR.

 SUBMODEL    1

 ETABAR:        -7.6481E-03  3.5994E-03  0.0000E+00
 SE:             1.4905E-02  1.1055E-02  0.0000E+00
 N:                     200         200           0

 ETASHRINKSD(%)  2.8537E+00  5.1393E+00  1.0000E+02
 ETASHRINKVR(%)  5.6260E+00  1.0015E+01  1.0000E+02
 EBVSHRINKSD(%)  1.9511E+00  5.0648E+00  1.0000E+02
 EBVSHRINKVR(%)  3.8641E+00  9.8732E+00  1.0000E+02
 EPSSHRINKSD(%)  1.1414E+01
 EPSSHRINKVR(%)  2.1525E+01


 SUBMODEL    2

 ETABAR:         1.2713E-02  0.0000E+00 -2.7693E-03
 SE:             2.1743E-02  0.0000E+00  2.4451E-02
 N:                     100           0         100

 ETASHRINKSD(%)  1.0000E-10  1.0000E+02  1.0000E-10
 ETASHRINKVR(%)  1.0000E-10  1.0000E+02  1.0000E-10
 EBVSHRINKSD(%)  1.9919E+00  1.0000E+02  1.0485E-01
 EBVSHRINKVR(%)  3.9441E+00  1.0000E+02  2.0959E-01
 EPSSHRINKSD(%)  1.4383E+01
 EPSSHRINKVR(%)  2.6697E+01


 TOTAL DATA POINTS NORMALLY DISTRIBUTED (N):         2400
 N*LOG(2PI) CONSTANT TO OBJECTIVE FUNCTION:    4410.90495938243
 OBJECTIVE FUNCTION VALUE WITHOUT CONSTANT:   -9961.05529205431
 OBJECTIVE FUNCTION VALUE WITH CONSTANT:      -5550.15033267188
 REPORTED OBJECTIVE FUNCTION DOES NOT CONTAIN CONSTANT

 TOTAL EFFECTIVE ETAS (NIND*NETA):                           600


 #TERE:
 Elapsed estimation  time in seconds:    51.91
 Elapsed covariance  time in seconds:    13.57
 Elapsed postprocess time in seconds:     0.00

 ********************          FIRST ORDER CONDITIONAL ESTIMATION WITH INTERACTION (NO PRIOR)        ********************
 #OBJT:**************                       MINIMUM VALUE OF OBJECTIVE FUNCTION                      ********************
 #OBJV:********************************************    -9961.055       **************************************************

 ********************          FIRST ORDER CONDITIONAL ESTIMATION WITH INTERACTION (NO PRIOR)        ********************
 ********************                             FINAL PARAMETER ESTIMATE                           ********************

 THETA - VECTOR OF FIXED EFFECTS PARAMETERS   *********
         TH 1      TH 2      TH 3      TH 4
         4.25E+00 -2.30E+00 -6.72E-01  6.67E-01

 OMEGA - COV MATRIX FOR RANDOM EFFECTS - ETAS  ********
         ETA1      ETA2      ETA3
 ETA1
+        4.73E-02
 ETA2
+       -8.81E-03  2.73E-02
 ETA3
+       -1.06E-02 -1.94E-03  5.99E-02

 SIGMA - COV MATRIX FOR RANDOM EFFECTS - EPSILONS  ****
         EPS1
 EPS1
+        1.02E-02

 OMEGA - CORR MATRIX FOR RANDOM EFFECTS - ETAS  *******
         ETA1      ETA2      ETA3
 ETA1
+        2.18E-01
 ETA2
+       -2.45E-01  1.65E-01
 ETA3
+       -1.99E-01 -4.79E-02  2.45E-01

 SIGMA - CORR MATRIX FOR RANDOM EFFECTS - EPSILONS  ***
         EPS1
 EPS1
+        1.01E-01

 ********************          FIRST ORDER CONDITIONAL ESTIMATION WITH INTERACTION (NO PRIOR)        ********************
 ********************                            STANDARD ERROR OF ESTIMATE                          ********************

 THETA - VECTOR OF FIXED EFFECTS PARAMETERS   *********
         TH 1      TH 2      TH 3      TH 4
         1.28E-02  1.22E-02  2.42E-02  2.72E-02

 OMEGA - COV MATRIX FOR RANDOM EFFECTS - ETAS  ********
         ETA1      ETA2      ETA3
 ETA1
+        4.02E-03
 ETA2
+        2.79E-03  3.03E-03
 ETA3
+        5.30E-03  1.70E+00  8.48E-03

 SIGMA - COV MATRIX FOR RANDOM EFFECTS - EPSILONS  ****
         EPS1
 EPS1
+        3.43E-04

 OMEGA - CORR MATRIX FOR RANDOM EFFECTS - ETAS  *******
         ETA1      ETA2      ETA3
 ETA1
+        9.25E-03
 ETA2
+        7.14E-02  9.16E-03
 ETA3
+        9.56E-02  4.21E+01  1.73E-02

 SIGMA - CORR MATRIX FOR RANDOM EFFECTS - EPSILONS  ***
         EPS1
 EPS1
+        1.70E-03

 ********************          FIRST ORDER CONDITIONAL ESTIMATION WITH INTERACTION (NO PRIOR)        ********************
 ********************                          COVARIANCE MATRIX OF ESTIMATE                         ********************

            TH 1      TH 2      TH 3      TH 4      OM11      OM12      OM13      OM22      OM23      OM33      SG11
 TH 1
+        1.64E-04
 TH 2
+       -3.42E-05  1.48E-04
 TH 3
+       -3.63E-05  7.59E-06  5.86E-04
 TH 4
+       -1.06E-09  8.42E-09  3.55E-08  7.41E-04
 OM11
+        3.98E-08 -1.04E-07 -2.55E-08 -2.04E-11  1.62E-05
 OM12
+       -4.86E-08  1.36E-06  1.40E-08 -4.91E-10 -3.37E-06  7.81E-06
 OM13
+       -1.00E-08  1.94E-08 -7.33E-06 -3.16E-09 -3.58E-06  7.46E-07  2.81E-05
 OM22
+        1.92E-07 -1.60E-06 -3.69E-08  2.64E-09  6.94E-07 -3.07E-06 -1.54E-07  9.17E-06
 OM23
+       -8.35E-06 -9.33E-07  3.45E-06  1.77E-07  2.09E-06 -2.68E-06 -6.45E-06  2.13E-06  2.90E+00
 OM33
+        1.19E-07 -5.81E-08  2.95E-06 -2.57E-08  8.00E-07 -1.65E-07 -1.22E-05  2.52E-08 -4.30E-04  7.19E-05
 SG11
+        1.15E-07  1.62E-08  1.05E-09 -5.02E-12 -2.12E-08  1.45E-08  3.35E-09 -3.02E-08 -7.77E-06 -7.80E-10  1.18E-07

 ********************          FIRST ORDER CONDITIONAL ESTIMATION WITH INTERACTION (NO PRIOR)        ********************
 ********************                          CORRELATION MATRIX OF ESTIMATE                        ********************

            TH 1      TH 2      TH 3      TH 4      OM11      OM12      OM13      OM22      OM23      OM33      SG11
 TH 1
+        1.28E-02
 TH 2
+       -2.19E-01  1.22E-02
 TH 3
+       -1.17E-01  2.57E-02  2.42E-02
 TH 4
+       -3.04E-06  2.54E-05  5.39E-05  2.72E-02
 OM11
+        7.71E-04 -2.12E-03 -2.62E-04 -1.86E-07  4.02E-03
 OM12
+       -1.36E-03  4.00E-02  2.06E-04 -6.46E-06 -3.00E-01  2.79E-03
 OM13
+       -1.47E-04  3.00E-04 -5.71E-02 -2.19E-05 -1.68E-01  5.04E-02  5.30E-03
 OM22
+        4.94E-03 -4.34E-02 -5.04E-04  3.21E-05  5.70E-02 -3.63E-01 -9.61E-03  3.03E-03
 OM23
+       -3.82E-04 -4.50E-05  8.36E-05  3.82E-06  3.04E-04 -5.63E-04 -7.15E-04  4.12E-04  1.70E+00
 OM33
+        1.10E-03 -5.62E-04  1.44E-02 -1.11E-04  2.35E-02 -6.97E-03 -2.72E-01  9.82E-04 -2.98E-02  8.48E-03
 SG11
+        2.61E-02  3.87E-03  1.26E-04 -5.37E-07 -1.53E-02  1.51E-02  1.84E-03 -2.91E-02 -1.33E-02 -2.68E-04  3.43E-04
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 Elapsed finaloutput time in seconds:     0.34
 #CPUT: Total CPU Time in Seconds,      701.630
