Mon 09/30/2013
03:45 PM
;Model Desc: Population Mixture Problem in 1 Compartment model, with rate constant parameter
;            mean modeled for two sub-populations, but its inter-subject variance is the same in both sub-populations
;Project Name: nm7examples
;Project ID: NO PROJECT DESCRIPTION

$PROB RUN# example5 (from ad1tr1m4t)
$INPUT C SET ID JID TIME CONC=DV DOSE=AMT RATE EVID MDV CMT VC1 K101 VC2 K102 SIGZ PROB
$DATA example5.csv IGNORE=C

$SUBROUTINES ADVAN1 TRANS1

$MIX
P(1)=THETA(4)
P(2)=1.0-THETA(4)
NSPOP=2

$PK
Q=1
IF(MIXNUM.EQ.2) Q=0
MU_1=THETA(1)
; Note that MU_2 can be modeled as THETA(2) or THETA(3), depending on the MIXNUM value.
; Also, we are avoiding IF/THEN blocks.
MU_2=Q*THETA(2)+(1.0-Q)*THETA(3)
V=DEXP(MU_1+ETA(1))
K=DEXP(MU_2+ETA(2))
S1=V

$ERROR
Y = F + F*EPS(1)

$THETA
(-1000.0  4.3 1000.0)  ;[MU_1]
(-1000.0 -2.9 1000.0)  ;[MU_2-1]
(-1000.0 -0.67 1000.0) ;[MU_2-2]
(0.0001 0.667 0.9999)  ;[P(1)]

$OMEGA BLOCK(2)
0.04 ;[p]
0.01  ;[f]
0.04 ;[p]

$SIGMA
0.01 ;[p]

$EST METHOD=ITS INTERACTION NITER=100 PRINT=1 NOABORT SIGL=8 FILE=example5.ext CTYPE=3
$EST METHOD=IMPMAP INTERACTION NITER=20 ISAMPLE=300 PRINT=1 NOABORT SIGL=8
$EST METHOD=IMP INTERACTION NITER=20 ISAMPLE=1000 PRINT=1 NOABORT SIGL=6
$EST NBURN=500 NITER=500 METHOD=SAEM INTERACTION PRINT=10 SIGL=6 ISAMPLE=2
$EST METHOD=IMP INTERACTION NITER=5 ISAMPLE=1000 PRINT=1 NOABORT SIGL=6 EONLY=1 MAPITER=0
$EST METHOD=BAYES INTERACTION NBURN=2000 NITER=5000 PRINT=10  FILE=example5.txt SIGL=8
$EST MAXEVAL=9999 NSIG=2 SIGL=8 PRINT=10 FILE=example5.ext METHOD=CONDITIONAL INTERACTION NOABORT
$COV MATRIX=R

NM-TRAN MESSAGES
 WARNINGS AND ERRORS (IF ANY) FOR PROBLEM    1
 (WARNING  2) NM-TRAN INFERS THAT THE DATA ARE POPULATION.

1NONLINEAR MIXED EFFECTS MODEL PROGRAM (NONMEM) VERSION 7.3beta7.0(P)
 ORIGINALLY DEVELOPED BY STUART BEAL, LEWIS SHEINER, AND ALISON BOECKMANN
 CURRENT DEVELOPERS ARE ROBERT BAUER, ICON DEVELOPMENT SOLUTIONS,
 AND ALISON BOECKMANN. IMPLEMENTATION, EFFICIENCY, AND STANDARDIZATION
 PERFORMED BY NOUS INFOSYSTEMS.
 PROBLEM NO.:         1
 RUN# example5 (from ad1tr1m4t)
 TOT. NO. OF OBS RECS:     2400
 TOT. NO. OF INDIVIDUALS:    300
 ONE COMPARTMENT MODEL (ADVAN1)
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 #TBLN:      1
 #METH: Iterative Two Stage
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
 #TERM:
 OPTIMIZATION WAS COMPLETED

 ETABAR IS THE ARITHMETIC MEAN OF THE ETA-ESTIMATES,
 AND SE IS THE ASSOCIATED STANDARD ERROR.

 SUBMODEL    1

 ETABAR:        -6.6693E-03  1.3544E-03
 SE:             1.4908E-02  1.1375E-02
 N:                     200         200

 ETAshrink(%):   3.0064E+00  1.8516E+01
 EBVshrink(%):   1.9542E+00  3.6232E+00
 EPSshrink(%):   1.1632E+01


 SUBMODEL    2

 ETABAR:         1.3339E-02 -2.7101E-03
 SE:             2.1747E-02  2.4428E-02
 N:                     100         100

 ETAshrink(%):   1.0000E-10  1.0000E-10
 EBVshrink(%):   1.9814E+00  1.5980E-01
 EPSshrink(%):   1.4289E+01


 #TERE:
 Elapsed estimation time in seconds:     3.87
 Elapsed covariance time in seconds:     0.22

 ********************                               ITERATIVE TWO STAGE                              ********************
 #OBJT:**************                        FINAL VALUE OF OBJECTIVE FUNCTION                       ********************
 #OBJV:********************************************    -9939.460       **************************************************

 ********************                               ITERATIVE TWO STAGE                              ********************
 ********************                             FINAL PARAMETER ESTIMATE                           ********************

 THETA - VECTOR OF FIXED EFFECTS PARAMETERS   *********
         TH 1      TH 2      TH 3      TH 4
         4.25E+00 -2.30E+00 -6.72E-01  6.67E-01

 OMEGA - COV MATRIX FOR RANDOM EFFECTS - ETAS  ********
            ETA1      ETA2
 ETA1
+        4.75E-02
 ETA2
+       -9.65E-03  3.92E-02

 SIGMA - COV MATRIX FOR RANDOM EFFECTS - EPSILONS  ****
            EPS1
 EPS1
+        1.02E-02

 OMEGA - CORR MATRIX FOR RANDOM EFFECTS - ETAS  *******
            ETA1      ETA2
 ETA1
+        2.18E-01
 ETA2
+       -2.24E-01  1.98E-01

 SIGMA - CORR MATRIX FOR RANDOM EFFECTS - EPSILONS  ***
            EPS1
 EPS1
+        1.01E-01

 ********************                               ITERATIVE TWO STAGE                              ********************
 ********************                          STANDARD ERROR OF ESTIMATE (S)                        ********************

 THETA - VECTOR OF FIXED EFFECTS PARAMETERS   *********
         TH 1      TH 2      TH 3      TH 4
         1.29E-02  1.73E-02  1.58E-02  2.81E-02

 OMEGA - COV MATRIX FOR RANDOM EFFECTS - ETAS  ********
            ETA1      ETA2
 ETA1
+        4.34E-03
 ETA2
+        2.65E-03  3.00E-03

 SIGMA - COV MATRIX FOR RANDOM EFFECTS - EPSILONS  ****
            EPS1
 EPS1
+        3.41E-04

 OMEGA - CORR MATRIX FOR RANDOM EFFECTS - ETAS  *******
            ETA1      ETA2
 ETA1
+        9.96E-03
 ETA2
+        5.48E-02  7.58E-03

 SIGMA - CORR MATRIX FOR RANDOM EFFECTS - EPSILONS  ***
            EPS1
 EPS1
+        1.69E-03

 ********************                               ITERATIVE TWO STAGE                              ********************
 ********************                        COVARIANCE MATRIX OF ESTIMATE (S)                       ********************

            TH 1      TH 2      TH 3      TH 4      OM11      OM12      OM22      SG11
 TH 1
+        1.67E-04
 TH 2
+       -4.18E-05  2.98E-04
 TH 3
+       -3.21E-05  6.03E-06  2.49E-04
 TH 4
+        1.78E-05 -9.39E-06 -7.46E-06  7.91E-04
 OM11
+       -3.80E-06  1.93E-06  2.25E-06  4.24E-07  1.89E-05
 OM12
+        1.76E-06  4.64E-06 -2.89E-06 -2.59E-06 -5.07E-06  7.04E-06
 OM22
+        8.28E-07 -4.42E-06 -8.40E-07  1.99E-05  4.82E-07 -3.08E-06  9.00E-06
 SG11
+        1.44E-07 -3.56E-07  1.61E-07 -5.18E-07  8.76E-08 -5.30E-08 -4.76E-08  1.17E-07

 ********************                               ITERATIVE TWO STAGE                              ********************
 ********************                        CORRELATION MATRIX OF ESTIMATE (S)                      ********************

            TH 1      TH 2      TH 3      TH 4      OM11      OM12      OM22      SG11
 TH 1
+        1.29E-02
 TH 2
+       -1.87E-01  1.73E-02
 TH 3
+       -1.57E-01  2.21E-02  1.58E-02
 TH 4
+        4.90E-02 -1.93E-02 -1.68E-02  2.81E-02
 OM11
+       -6.77E-02  2.57E-02  3.28E-02  3.47E-03  4.34E-03
 OM12
+        5.12E-02  1.01E-01 -6.90E-02 -3.48E-02 -4.40E-01  2.65E-03
 OM22
+        2.14E-02 -8.53E-02 -1.77E-02  2.36E-01  3.70E-02 -3.87E-01  3.00E-03
 SG11
+        3.27E-02 -6.05E-02  2.98E-02 -5.39E-02  5.91E-02 -5.85E-02 -4.65E-02  3.41E-04
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 #TBLN:      2
 #METH: Importance Sampling assisted by MAP Estimation
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
 #TERM:
 OPTIMIZATION WAS COMPLETED

 ETABAR IS THE ARITHMETIC MEAN OF THE ETA-ESTIMATES,
 AND SE IS THE ASSOCIATED STANDARD ERROR.

 SUBMODEL    1

 ETABAR:        -6.3303E-03  1.6164E-03
 SE:             1.4901E-02  1.1436E-02
 N:                     200         200

 ETAshrink(%):   3.0620E+00  1.8549E+01
 EBVshrink(%):   1.9628E+00  3.7106E+00
 EPSshrink(%):   1.1795E+01


 SUBMODEL    2

 ETABAR:         1.2684E-02 -2.5283E-03
 SE:             2.1724E-02  2.4457E-02
 N:                     100         100

 ETAshrink(%):   1.0000E-10  1.0000E-10
 EBVshrink(%):   1.9890E+00  1.6013E-01
 EPSshrink(%):   1.4469E+01


 #TERE:
 Elapsed estimation time in seconds:    26.43
 Elapsed covariance time in seconds:     2.45

 ********************                  IMPORTANCE SAMPLING ASSISTED BY MAP ESTIMATION                ********************
 #OBJT:**************                        FINAL VALUE OF OBJECTIVE FUNCTION                       ********************
 #OBJV:********************************************    -9946.846       **************************************************

 ********************                  IMPORTANCE SAMPLING ASSISTED BY MAP ESTIMATION                ********************
 ********************                             FINAL PARAMETER ESTIMATE                           ********************

 THETA - VECTOR OF FIXED EFFECTS PARAMETERS   *********
         TH 1      TH 2      TH 3      TH 4
         4.25E+00 -2.30E+00 -6.74E-01  6.67E-01

 OMEGA - COV MATRIX FOR RANDOM EFFECTS - ETAS  ********
            ETA1      ETA2
 ETA1
+        4.75E-02
 ETA2
+       -9.80E-03  3.96E-02

 SIGMA - COV MATRIX FOR RANDOM EFFECTS - EPSILONS  ****
            EPS1
 EPS1
+        1.02E-02

 OMEGA - CORR MATRIX FOR RANDOM EFFECTS - ETAS  *******
            ETA1      ETA2
 ETA1
+        2.18E-01
 ETA2
+       -2.26E-01  1.99E-01

 SIGMA - CORR MATRIX FOR RANDOM EFFECTS - EPSILONS  ***
            EPS1
 EPS1
+        1.01E-01

 ********************                  IMPORTANCE SAMPLING ASSISTED BY MAP ESTIMATION                ********************
 ********************                          STANDARD ERROR OF ESTIMATE (R)                        ********************

 THETA - VECTOR OF FIXED EFFECTS PARAMETERS   *********
         TH 1      TH 2      TH 3      TH 4
         1.29E-02  1.74E-02  1.59E-02  2.84E-02

 OMEGA - COV MATRIX FOR RANDOM EFFECTS - ETAS  ********
            ETA1      ETA2
 ETA1
+        4.04E-03
 ETA2
+        2.74E-03  3.54E-03

 SIGMA - COV MATRIX FOR RANDOM EFFECTS - EPSILONS  ****
            EPS1
 EPS1
+        3.43E-04

 OMEGA - CORR MATRIX FOR RANDOM EFFECTS - ETAS  *******
            ETA1      ETA2
 ETA1
+        9.28E-03
 ETA2
+        5.82E-02  8.89E-03

 SIGMA - CORR MATRIX FOR RANDOM EFFECTS - EPSILONS  ***
            EPS1
 EPS1
+        1.70E-03

 ********************                  IMPORTANCE SAMPLING ASSISTED BY MAP ESTIMATION                ********************
 ********************                        COVARIANCE MATRIX OF ESTIMATE (R)                       ********************

            TH 1      TH 2      TH 3      TH 4      OM11      OM12      OM22      SG11
 TH 1
+        1.65E-04
 TH 2
+       -4.29E-05  3.03E-04
 TH 3
+       -3.08E-05  1.91E-06  2.54E-04
 TH 4
+        1.63E-05 -1.08E-05 -9.09E-07  8.08E-04
 OM11
+       -8.33E-09  1.80E-06 -1.59E-06  2.62E-06  1.63E-05
 OM12
+       -3.07E-07  5.95E-06 -4.66E-06 -2.37E-06 -3.55E-06  7.53E-06
 OM22
+        9.28E-07 -5.53E-06  2.88E-06  2.76E-05  8.28E-07 -3.22E-06  1.25E-05
 SG11
+        1.03E-07 -4.23E-07  2.92E-07 -4.65E-07 -2.50E-08 -4.28E-09 -1.33E-08  1.18E-07

 ********************                  IMPORTANCE SAMPLING ASSISTED BY MAP ESTIMATION                ********************
 ********************                        CORRELATION MATRIX OF ESTIMATE (R)                      ********************

            TH 1      TH 2      TH 3      TH 4      OM11      OM12      OM22      SG11
 TH 1
+        1.29E-02
 TH 2
+       -1.91E-01  1.74E-02
 TH 3
+       -1.50E-01  6.89E-03  1.59E-02
 TH 4
+        4.46E-02 -2.18E-02 -2.01E-03  2.84E-02
 OM11
+       -1.60E-04  2.55E-02 -2.46E-02  2.28E-02  4.04E-03
 OM12
+       -8.69E-03  1.25E-01 -1.07E-01 -3.04E-02 -3.20E-01  2.74E-03
 OM22
+        2.04E-02 -8.97E-02  5.10E-02  2.74E-01  5.79E-02 -3.31E-01  3.54E-03
 SG11
+        2.33E-02 -7.09E-02  5.35E-02 -4.77E-02 -1.80E-02 -4.55E-03 -1.10E-02  3.43E-04
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 #TBLN:      3
 #METH: Importance Sampling
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
 #TERM:
 OPTIMIZATION WAS COMPLETED

 ETABAR IS THE ARITHMETIC MEAN OF THE ETA-ESTIMATES,
 AND SE IS THE ASSOCIATED STANDARD ERROR.

 SUBMODEL    1

 ETABAR:        -6.1687E-03  1.0141E-03
 SE:             1.4909E-02  1.1457E-02
 N:                     200         200

 ETAshrink(%):   3.0326E+00  1.8340E+01
 EBVshrink(%):   1.9757E+00  3.7594E+00
 EPSshrink(%):   1.1872E+01


 SUBMODEL    2

 ETABAR:         1.2546E-02 -2.5789E-03
 SE:             2.1724E-02  2.4453E-02
 N:                     100         100

 ETAshrink(%):   1.0000E-10  1.0000E-10
 EBVshrink(%):   2.0008E+00  1.6510E-01
 EPSshrink(%):   1.4560E+01


 #TERE:
 Elapsed estimation time in seconds:    81.58
 Elapsed covariance time in seconds:     7.46

 ********************                               IMPORTANCE SAMPLING                              ********************
 #OBJT:**************                        FINAL VALUE OF OBJECTIVE FUNCTION                       ********************
 #OBJV:********************************************    -9943.553       **************************************************

 ********************                               IMPORTANCE SAMPLING                              ********************
 ********************                             FINAL PARAMETER ESTIMATE                           ********************

 THETA - VECTOR OF FIXED EFFECTS PARAMETERS   *********
         TH 1      TH 2      TH 3      TH 4
         4.25E+00 -2.30E+00 -6.74E-01  6.67E-01

 OMEGA - COV MATRIX FOR RANDOM EFFECTS - ETAS  ********
            ETA1      ETA2
 ETA1
+        4.75E-02
 ETA2
+       -9.77E-03  3.96E-02

 SIGMA - COV MATRIX FOR RANDOM EFFECTS - EPSILONS  ****
            EPS1
 EPS1
+        1.02E-02

 OMEGA - CORR MATRIX FOR RANDOM EFFECTS - ETAS  *******
            ETA1      ETA2
 ETA1
+        2.18E-01
 ETA2
+       -2.25E-01  1.99E-01

 SIGMA - CORR MATRIX FOR RANDOM EFFECTS - EPSILONS  ***
            EPS1
 EPS1
+        1.01E-01

 ********************                               IMPORTANCE SAMPLING                              ********************
 ********************                          STANDARD ERROR OF ESTIMATE (R)                        ********************

 THETA - VECTOR OF FIXED EFFECTS PARAMETERS   *********
         TH 1      TH 2      TH 3      TH 4
         1.29E-02  1.73E-02  1.60E-02  2.84E-02

 OMEGA - COV MATRIX FOR RANDOM EFFECTS - ETAS  ********
            ETA1      ETA2
 ETA1
+        4.05E-03
 ETA2
+        2.73E-03  3.51E-03

 SIGMA - COV MATRIX FOR RANDOM EFFECTS - EPSILONS  ****
            EPS1
 EPS1
+        3.43E-04

 OMEGA - CORR MATRIX FOR RANDOM EFFECTS - ETAS  *******
            ETA1      ETA2
 ETA1
+        9.28E-03
 ETA2
+        5.81E-02  8.83E-03

 SIGMA - CORR MATRIX FOR RANDOM EFFECTS - EPSILONS  ***
            EPS1
 EPS1
+        1.70E-03

 ********************                               IMPORTANCE SAMPLING                              ********************
 ********************                        COVARIANCE MATRIX OF ESTIMATE (R)                       ********************

            TH 1      TH 2      TH 3      TH 4      OM11      OM12      OM22      SG11
 TH 1
+        1.66E-04
 TH 2
+       -4.23E-05  3.01E-04
 TH 3
+       -3.11E-05  2.12E-06  2.55E-04
 TH 4
+        1.60E-05 -9.15E-06 -8.74E-07  8.07E-04
 OM11
+       -6.37E-08  1.86E-06 -1.61E-06  2.57E-06  1.64E-05
 OM12
+       -2.09E-07  5.72E-06 -4.57E-06 -2.22E-06 -3.52E-06  7.47E-06
 OM22
+        8.62E-07 -5.19E-06  2.89E-06  2.71E-05  8.15E-07 -3.16E-06  1.23E-05
 SG11
+        1.04E-07 -4.16E-07  2.88E-07 -4.39E-07 -2.49E-08 -4.85E-09 -1.09E-08  1.18E-07

 ********************                               IMPORTANCE SAMPLING                              ********************
 ********************                        CORRELATION MATRIX OF ESTIMATE (R)                      ********************

            TH 1      TH 2      TH 3      TH 4      OM11      OM12      OM22      SG11
 TH 1
+        1.29E-02
 TH 2
+       -1.90E-01  1.73E-02
 TH 3
+       -1.51E-01  7.67E-03  1.60E-02
 TH 4
+        4.37E-02 -1.86E-02 -1.93E-03  2.84E-02
 OM11
+       -1.22E-03  2.65E-02 -2.50E-02  2.24E-02  4.05E-03
 OM12
+       -5.94E-03  1.21E-01 -1.05E-01 -2.86E-02 -3.19E-01  2.73E-03
 OM22
+        1.91E-02 -8.52E-02  5.15E-02  2.71E-01  5.73E-02 -3.29E-01  3.51E-03
 SG11
+        2.36E-02 -6.99E-02  5.25E-02 -4.50E-02 -1.79E-02 -5.17E-03 -9.03E-03  3.43E-04
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 #TBLN:      4
 #METH: Stochastic Approximation Expectation-Maximization
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
 #TERM:
 STOCHASTIC PORTION WAS COMPLETED
 REDUCED STOCHASTIC PORTION WAS COMPLETED

 ETABAR IS THE ARITHMETIC MEAN OF THE ETA-ESTIMATES,
 AND SE IS THE ASSOCIATED STANDARD ERROR.

 SUBMODEL    1

 ETABAR:        -6.4775E-03  1.3228E-03
 SE:             1.4927E-02  1.1452E-02
 N:                     200         200

 ETAshrink(%):   2.9819E+00  1.8338E+01
 EBVshrink(%):   1.9683E+00  3.7583E+00
 EPSshrink(%):   1.1953E+01


 SUBMODEL    2

 ETABAR:         1.2960E-02 -2.6545E-03
 SE:             2.1746E-02  2.4453E-02
 N:                     100         100

 ETAshrink(%):   1.0000E-10  1.0000E-10
 EBVshrink(%):   2.0225E+00  1.6683E-01
 EPSshrink(%):   1.4575E+01


 #TERE:
 Elapsed estimation time in seconds:    87.31
 Elapsed covariance time in seconds:     0.17

 ********************                STOCHASTIC APPROXIMATION EXPECTATION-MAXIMIZATION               ********************
 #OBJT:**************                        FINAL VALUE OF LIKELIHOOD FUNCTION                      ********************
 #OBJV:********************************************   -13626.031       **************************************************

 ********************                STOCHASTIC APPROXIMATION EXPECTATION-MAXIMIZATION               ********************
 ********************                             FINAL PARAMETER ESTIMATE                           ********************

 THETA - VECTOR OF FIXED EFFECTS PARAMETERS   *********
         TH 1      TH 2      TH 3      TH 4
         4.25E+00 -2.30E+00 -6.74E-01  6.67E-01

 OMEGA - COV MATRIX FOR RANDOM EFFECTS - ETAS  ********
            ETA1      ETA2
 ETA1
+        4.76E-02
 ETA2
+       -9.75E-03  3.95E-02

 SIGMA - COV MATRIX FOR RANDOM EFFECTS - EPSILONS  ****
            EPS1
 EPS1
+        1.02E-02

 OMEGA - CORR MATRIX FOR RANDOM EFFECTS - ETAS  *******
            ETA1      ETA2
 ETA1
+        2.18E-01
 ETA2
+       -2.25E-01  1.99E-01

 SIGMA - CORR MATRIX FOR RANDOM EFFECTS - EPSILONS  ***
            EPS1
 EPS1
+        1.01E-01

 ********************                STOCHASTIC APPROXIMATION EXPECTATION-MAXIMIZATION               ********************
 ********************                          STANDARD ERROR OF ESTIMATE (S)                        ********************

 THETA - VECTOR OF FIXED EFFECTS PARAMETERS   *********
         TH 1      TH 2      TH 3      TH 4
         1.29E-02  1.73E-02  1.59E-02  2.81E-02

 OMEGA - COV MATRIX FOR RANDOM EFFECTS - ETAS  ********
            ETA1      ETA2
 ETA1
+        4.36E-03
 ETA2
+        2.68E-03  3.04E-03

 SIGMA - COV MATRIX FOR RANDOM EFFECTS - EPSILONS  ****
            EPS1
 EPS1
+        3.42E-04

 OMEGA - CORR MATRIX FOR RANDOM EFFECTS - ETAS  *******
            ETA1      ETA2
 ETA1
+        1.00E-02
 ETA2
+        5.49E-02  7.64E-03

 SIGMA - CORR MATRIX FOR RANDOM EFFECTS - EPSILONS  ***
            EPS1
 EPS1
+        1.69E-03

 ********************                STOCHASTIC APPROXIMATION EXPECTATION-MAXIMIZATION               ********************
 ********************                        COVARIANCE MATRIX OF ESTIMATE (S)                       ********************

            TH 1      TH 2      TH 3      TH 4      OM11      OM12      OM22      SG11
 TH 1
+        1.68E-04
 TH 2
+       -4.21E-05  3.00E-04
 TH 3
+       -3.27E-05  6.24E-06  2.53E-04
 TH 4
+        1.76E-05 -9.27E-06 -7.37E-06  7.89E-04
 OM11
+       -3.99E-06  1.98E-06  2.30E-06  3.56E-07  1.90E-05
 OM12
+        1.86E-06  4.76E-06 -2.82E-06 -2.50E-06 -5.19E-06  7.17E-06
 OM22
+        8.97E-07 -4.63E-06 -8.90E-07  1.98E-05  5.10E-07 -3.16E-06  9.22E-06
 SG11
+        1.32E-07 -4.22E-07  1.57E-07 -4.98E-07  9.05E-08 -5.43E-08 -4.66E-08  1.17E-07

 ********************                STOCHASTIC APPROXIMATION EXPECTATION-MAXIMIZATION               ********************
 ********************                        CORRELATION MATRIX OF ESTIMATE (S)                      ********************

            TH 1      TH 2      TH 3      TH 4      OM11      OM12      OM22      SG11
 TH 1
+        1.29E-02
 TH 2
+       -1.88E-01  1.73E-02
 TH 3
+       -1.59E-01  2.26E-02  1.59E-02
 TH 4
+        4.84E-02 -1.91E-02 -1.65E-02  2.81E-02
 OM11
+       -7.05E-02  2.62E-02  3.31E-02  2.91E-03  4.36E-03
 OM12
+        5.35E-02  1.03E-01 -6.61E-02 -3.33E-02 -4.44E-01  2.68E-03
 OM22
+        2.28E-02 -8.80E-02 -1.84E-02  2.32E-01  3.85E-02 -3.88E-01  3.04E-03
 SG11
+        2.98E-02 -7.11E-02  2.89E-02 -5.17E-02  6.06E-02 -5.93E-02 -4.49E-02  3.42E-04
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 #TBLN:      5
 #METH: Objective Function Evaluation by Importance Sampling
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
 #TERM:
 EXPECTATION ONLY PROCESS COMPLETED

 ETABAR IS THE ARITHMETIC MEAN OF THE ETA-ESTIMATES,
 AND SE IS THE ASSOCIATED STANDARD ERROR.

 SUBMODEL    1

 ETABAR:        -6.6407E-03  1.5671E-03
 SE:             1.4907E-02  1.1463E-02
 N:                     200         200

 ETAshrink(%):   3.1105E+00  1.8260E+01
 EBVshrink(%):   1.9687E+00  3.7492E+00
 EPSshrink(%):   1.1972E+01


 SUBMODEL    2

 ETABAR:         1.2229E-02 -2.5131E-03
 SE:             2.1731E-02  2.4458E-02
 N:                     100         100

 ETAshrink(%):   1.0000E-10  1.0000E-10
 EBVshrink(%):   1.9874E+00  1.6368E-01
 EPSshrink(%):   1.4651E+01


 #TERE:
 Elapsed estimation time in seconds:    33.03
 Elapsed covariance time in seconds:     7.54

 ********************               OBJECTIVE FUNCTION EVALUATION BY IMPORTANCE SAMPLING             ********************
 #OBJT:**************                        FINAL VALUE OF OBJECTIVE FUNCTION                       ********************
 #OBJV:********************************************    -9946.972       **************************************************

 ********************               OBJECTIVE FUNCTION EVALUATION BY IMPORTANCE SAMPLING             ********************
 ********************                             FINAL PARAMETER ESTIMATE                           ********************

 THETA - VECTOR OF FIXED EFFECTS PARAMETERS   *********
         TH 1      TH 2      TH 3      TH 4
         4.25E+00 -2.30E+00 -6.74E-01  6.67E-01

 OMEGA - COV MATRIX FOR RANDOM EFFECTS - ETAS  ********
            ETA1      ETA2
 ETA1
+        4.76E-02
 ETA2
+       -9.75E-03  3.95E-02

 SIGMA - COV MATRIX FOR RANDOM EFFECTS - EPSILONS  ****
            EPS1
 EPS1
+        1.02E-02

 OMEGA - CORR MATRIX FOR RANDOM EFFECTS - ETAS  *******
            ETA1      ETA2
 ETA1
+        2.18E-01
 ETA2
+       -2.25E-01  1.99E-01

 SIGMA - CORR MATRIX FOR RANDOM EFFECTS - EPSILONS  ***
            EPS1
 EPS1
+        1.01E-01

 ********************               OBJECTIVE FUNCTION EVALUATION BY IMPORTANCE SAMPLING             ********************
 ********************                          STANDARD ERROR OF ESTIMATE (R)                        ********************

 THETA - VECTOR OF FIXED EFFECTS PARAMETERS   *********
         TH 1      TH 2      TH 3      TH 4
         1.29E-02  1.73E-02  1.60E-02  2.84E-02

 OMEGA - COV MATRIX FOR RANDOM EFFECTS - ETAS  ********
            ETA1      ETA2
 ETA1
+        4.06E-03
 ETA2
+        2.73E-03  3.50E-03

 SIGMA - COV MATRIX FOR RANDOM EFFECTS - EPSILONS  ****
            EPS1
 EPS1
+        3.44E-04

 OMEGA - CORR MATRIX FOR RANDOM EFFECTS - ETAS  *******
            ETA1      ETA2
 ETA1
+        9.30E-03
 ETA2
+        5.81E-02  8.81E-03

 SIGMA - CORR MATRIX FOR RANDOM EFFECTS - EPSILONS  ***
            EPS1
 EPS1
+        1.70E-03

 ********************               OBJECTIVE FUNCTION EVALUATION BY IMPORTANCE SAMPLING             ********************
 ********************                        COVARIANCE MATRIX OF ESTIMATE (R)                       ********************

            TH 1      TH 2      TH 3      TH 4      OM11      OM12      OM22      SG11
 TH 1
+        1.66E-04
 TH 2
+       -4.21E-05  3.00E-04
 TH 3
+       -3.12E-05  2.14E-06  2.55E-04
 TH 4
+        1.61E-05 -1.01E-05 -1.25E-06  8.07E-04
 OM11
+        9.08E-08  1.87E-06 -1.69E-06  2.64E-06  1.65E-05
 OM12
+       -2.94E-07  5.77E-06 -4.47E-06 -2.22E-06 -3.50E-06  7.47E-06
 OM22
+        8.89E-07 -5.26E-06  2.71E-06  2.70E-05  8.07E-07 -3.13E-06  1.23E-05
 SG11
+        1.04E-07 -4.13E-07  2.89E-07 -4.60E-07 -3.19E-08 -3.29E-09 -1.67E-08  1.19E-07

 ********************               OBJECTIVE FUNCTION EVALUATION BY IMPORTANCE SAMPLING             ********************
 ********************                        CORRELATION MATRIX OF ESTIMATE (R)                      ********************

            TH 1      TH 2      TH 3      TH 4      OM11      OM12      OM22      SG11
 TH 1
+        1.29E-02
 TH 2
+       -1.89E-01  1.73E-02
 TH 3
+       -1.52E-01  7.76E-03  1.60E-02
 TH 4
+        4.42E-02 -2.06E-02 -2.75E-03  2.84E-02
 OM11
+        1.74E-03  2.66E-02 -2.62E-02  2.29E-02  4.06E-03
 OM12
+       -8.35E-03  1.22E-01 -1.03E-01 -2.86E-02 -3.16E-01  2.73E-03
 OM22
+        1.97E-02 -8.68E-02  4.85E-02  2.71E-01  5.68E-02 -3.27E-01  3.50E-03
 SG11
+        2.35E-02 -6.93E-02  5.26E-02 -4.70E-02 -2.29E-02 -3.50E-03 -1.39E-02  3.44E-04
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 #TBLN:      6
 #METH: MCMC Bayesian Analysis
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
 #TERM:
 BURN-IN WAS COMPLETED
 STATISTICAL PORTION WAS COMPLETED

 #TERE:
 Elapsed estimation time in seconds:   503.39
 Elapsed covariance time in seconds:     0.00

 ********************                              MCMC BAYESIAN ANALYSIS                            ********************
 #OBJT:**************                       AVERAGE VALUE OF LIKELIHOOD FUNCTION                     ********************
 #OBJV:********************************************   -13431.932       **************************************************
 #OBJS:********************************************       40.064 (STD) **************************************************

 ********************                              MCMC BAYESIAN ANALYSIS                            ********************
 ********************                             FINAL PARAMETER ESTIMATE                           ********************

 THETA - VECTOR OF FIXED EFFECTS PARAMETERS   *********
         TH 1      TH 2      TH 3      TH 4
         4.25E+00 -2.30E+00 -6.74E-01  6.66E-01

 OMEGA - COV MATRIX FOR RANDOM EFFECTS - ETAS  ********
            ETA1      ETA2
 ETA1
+        4.79E-02
 ETA2
+       -9.78E-03  4.00E-02

 SIGMA - COV MATRIX FOR RANDOM EFFECTS - EPSILONS  ****
            EPS1
 EPS1
+        1.02E-02

 OMEGA - CORR MATRIX FOR RANDOM EFFECTS - ETAS  *******
            ETA1      ETA2
 ETA1
+        2.19E-01
 ETA2
+       -2.23E-01  2.00E-01

 SIGMA - CORR MATRIX FOR RANDOM EFFECTS - EPSILONS  ***
            EPS1
 EPS1
+        1.01E-01

 ********************                              MCMC BAYESIAN ANALYSIS                            ********************
 ********************                STANDARD ERROR OF ESTIMATE (From Sample Variance)               ********************

 THETA - VECTOR OF FIXED EFFECTS PARAMETERS   *********
         TH 1      TH 2      TH 3      TH 4
         1.30E-02  1.46E-02  1.97E-02  2.66E-02

 OMEGA - COV MATRIX FOR RANDOM EFFECTS - ETAS  ********
            ETA1      ETA2
 ETA1
+        4.10E-03
 ETA2
+        2.70E-03  3.37E-03

 SIGMA - COV MATRIX FOR RANDOM EFFECTS - EPSILONS  ****
            EPS1
 EPS1
+        3.47E-04

 OMEGA - CORR MATRIX FOR RANDOM EFFECTS - ETAS  *******
            ETA1      ETA2
 ETA1
+        9.33E-03
 ETA2
+        5.69E-02  8.41E-03

 SIGMA - CORR MATRIX FOR RANDOM EFFECTS - EPSILONS  ***
            EPS1
 EPS1
+        1.72E-03

 ********************                              MCMC BAYESIAN ANALYSIS                            ********************
 ********************               COVARIANCE MATRIX OF ESTIMATE (From Sample Variance)             ********************

            TH 1      TH 2      TH 3      TH 4      OM11      OM12      OM22      SG11
 TH 1
+        1.69E-04
 TH 2
+       -4.03E-05  2.12E-04
 TH 3
+       -3.68E-05  5.89E-06  3.89E-04
 TH 4
+        2.52E-06  4.65E-06  1.12E-05  7.08E-04
 OM11
+        7.12E-07 -1.29E-07  2.70E-07  1.90E-06  1.68E-05
 OM12
+       -8.33E-07 -6.73E-07  1.33E-06 -2.99E-07 -3.27E-06  7.29E-06
 OM22
+        1.36E-06 -2.36E-06 -1.09E-06 -1.00E-06  5.62E-07 -2.79E-06  1.14E-05
 SG11
+        1.70E-08 -3.89E-08 -1.49E-08  3.00E-07 -6.10E-10 -3.05E-09 -1.68E-08  1.20E-07

 ********************                              MCMC BAYESIAN ANALYSIS                            ********************
 ********************              CORRELATION MATRIX OF ESTIMATE (From Sample Variance)             ********************

            TH 1      TH 2      TH 3      TH 4      OM11      OM12      OM22      SG11
 TH 1
+        1.30E-02
 TH 2
+       -2.13E-01  1.46E-02
 TH 3
+       -1.44E-01  2.05E-02  1.97E-02
 TH 4
+        7.29E-03  1.20E-02  2.14E-02  2.66E-02
 OM11
+        1.33E-02 -2.16E-03  3.34E-03  1.74E-02  4.10E-03
 OM12
+       -2.37E-02 -1.71E-02  2.51E-02 -4.16E-03 -2.95E-01  2.70E-03
 OM22
+        3.09E-02 -4.81E-02 -1.64E-02 -1.11E-02  4.07E-02 -3.07E-01  3.37E-03
 SG11
+        3.76E-03 -7.71E-03 -2.19E-03  3.24E-02 -4.29E-04 -3.26E-03 -1.44E-02  3.47E-04
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 #TBLN:      7
 #METH: First Order Conditional Estimation with Interaction
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
 #TERM:
0MINIMIZATION SUCCESSFUL
 HOWEVER, PROBLEMS OCCURRED WITH THE MINIMIZATION.
 REGARD THE RESULTS OF THE ESTIMATION STEP CAREFULLY, AND ACCEPT THEM ONLY
 AFTER CHECKING THAT THE COVARIANCE STEP PRODUCES REASONABLE OUTPUT.
 NO. OF FUNCTION EVALUATIONS USED:     1435
 NO. OF SIG. DIGITS IN FINAL EST.:  2.0

 ETABAR IS THE ARITHMETIC MEAN OF THE ETA-ESTIMATES,
 AND SE IS THE ASSOCIATED STANDARD ERROR.

 SUBMODEL    1

 ETABAR:        -7.5518E-03  3.8965E-03
 SE:             1.4906E-02  1.1378E-02
 N:                     200         200

 ETAshrink(%):   2.8550E+00  1.8503E+01
 EBVshrink(%):   1.9608E+00  3.6242E+00
 EPSshrink(%):   1.1639E+01


 SUBMODEL    2

 ETABAR:         1.2391E-02 -2.4592E-03
 SE:             2.1744E-02  2.4428E-02
 N:                     100         100

 ETAshrink(%):   1.0000E-10  1.0000E-10
 EBVshrink(%):   1.9880E+00  1.5977E-01
 EPSshrink(%):   1.4291E+01


 #TERE:
 Elapsed estimation time in seconds:   172.74
 Elapsed covariance time in seconds:    14.32

 ********************               FIRST ORDER CONDITIONAL ESTIMATION WITH INTERACTION              ********************
 #OBJT:**************                       MINIMUM VALUE OF OBJECTIVE FUNCTION                      ********************
 #OBJV:********************************************    -9939.498       **************************************************

 ********************               FIRST ORDER CONDITIONAL ESTIMATION WITH INTERACTION              ********************
 ********************                             FINAL PARAMETER ESTIMATE                           ********************

 THETA - VECTOR OF FIXED EFFECTS PARAMETERS   *********
         TH 1      TH 2      TH 3      TH 4
         4.25E+00 -2.30E+00 -6.73E-01  6.67E-01

 OMEGA - COV MATRIX FOR RANDOM EFFECTS - ETAS  ********
            ETA1      ETA2
 ETA1
+        4.73E-02
 ETA2
+       -9.65E-03  3.92E-02

 SIGMA - COV MATRIX FOR RANDOM EFFECTS - EPSILONS  ****
            EPS1
 EPS1
+        1.02E-02

 OMEGA - CORR MATRIX FOR RANDOM EFFECTS - ETAS  *******
            ETA1      ETA2
 ETA1
+        2.18E-01
 ETA2
+       -2.24E-01  1.98E-01

 SIGMA - CORR MATRIX FOR RANDOM EFFECTS - EPSILONS  ***
            EPS1
 EPS1
+        1.01E-01

 ********************               FIRST ORDER CONDITIONAL ESTIMATION WITH INTERACTION              ********************
 ********************                            STANDARD ERROR OF ESTIMATE                          ********************

 THETA - VECTOR OF FIXED EFFECTS PARAMETERS   *********
         TH 1      TH 2      TH 3      TH 4
         1.28E-02  1.44E-02  1.95E-02  2.72E-02

 OMEGA - COV MATRIX FOR RANDOM EFFECTS - ETAS  ********
            ETA1      ETA2
 ETA1
+        4.02E-03
 ETA2
+        2.67E-03  3.32E-03

 SIGMA - COV MATRIX FOR RANDOM EFFECTS - EPSILONS  ****
            EPS1
 EPS1
+        3.42E-04

 OMEGA - CORR MATRIX FOR RANDOM EFFECTS - ETAS  *******
            ETA1      ETA2
 ETA1
+        9.25E-03
 ETA2
+        5.73E-02  8.39E-03

 SIGMA - CORR MATRIX FOR RANDOM EFFECTS - EPSILONS  ***
            EPS1
 EPS1
+        1.69E-03

 ********************               FIRST ORDER CONDITIONAL ESTIMATION WITH INTERACTION              ********************
 ********************                          COVARIANCE MATRIX OF ESTIMATE                         ********************

            TH 1      TH 2      TH 3      TH 4      OM11      OM12      OM22      SG11
 TH 1
+        1.64E-04
 TH 2
+       -3.71E-05  2.08E-04
 TH 3
+       -3.34E-05  7.93E-06  3.81E-04
 TH 4
+       -1.05E-08  5.41E-08  2.04E-08  7.41E-04
 OM11
+        7.35E-08 -8.79E-08  3.02E-08 -2.55E-11  1.62E-05
 OM12
+       -4.51E-08  1.09E-06 -1.65E-06  3.41E-10 -3.51E-06  7.15E-06
 OM22
+        1.44E-07 -9.97E-07  6.19E-07  4.04E-10  7.50E-07 -2.86E-06  1.10E-05
 SG11
+        1.16E-07 -9.97E-10  3.81E-10 -2.12E-13 -2.08E-08  7.75E-09 -9.46E-09  1.17E-07

 ********************               FIRST ORDER CONDITIONAL ESTIMATION WITH INTERACTION              ********************
 ********************                          CORRELATION MATRIX OF ESTIMATE                        ********************

            TH 1      TH 2      TH 3      TH 4      OM11      OM12      OM22      SG11
 TH 1
+        1.28E-02
 TH 2
+       -2.01E-01  1.44E-02
 TH 3
+       -1.33E-01  2.82E-02  1.95E-02
 TH 4
+       -3.01E-05  1.38E-04  3.84E-05  2.72E-02
 OM11
+        1.43E-03 -1.52E-03  3.84E-04 -2.33E-07  4.02E-03
 OM12
+       -1.32E-03  2.84E-02 -3.15E-02  4.68E-06 -3.27E-01  2.67E-03
 OM22
+        3.39E-03 -2.08E-02  9.54E-03  4.47E-06  5.61E-02 -3.22E-01  3.32E-03
 SG11
+        2.65E-02 -2.02E-04  5.70E-05 -2.28E-08 -1.51E-02  8.47E-03 -8.33E-03  3.42E-04
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 #CPUT: Total CPU Time in Seconds,      937.940
