Wed 06/17/2015
04:34 PM
;Model Desc: Receptor Mediated Clearance model with Dynamic Change in Receptors
;Project Name: nm7examples
;Project ID: NO PROJECT DESCRIPTION

$PROB RUN# example6 (from r2compl)
$INPUT C SET ID JID TIME DV=CONC DOSE=AMT RATE EVID MDV CMT
$DATA example6.csv IGNORE=C

; The new numerical integration solver is used, although ADVAN=9 is also efficient
; for this problem.
$SUBROUTINES ADVAN13 TRANS1 TOL=4
$MODEL NCOMPARTMENTS=3

$PRIOR NWPRI NTHETA=8, NETA=8, NTHP=0, NETP=8, NPEXP=1

$PK
include nonmem_reserved_general
; Request extra information for Bayesian analysis.  An extra call will then be made
; for accepted samples
BAYES_EXTRA_REQUEST=1
MU_1=THETA(1)
MU_2=THETA(2)
MU_3=THETA(3)
MU_4=THETA(4)
MU_5=THETA(5)
MU_6=THETA(6)
MU_7=THETA(7)
MU_8=THETA(8)
VC=EXP(MU_1+ETA(1))
K10=EXP(MU_2+ETA(2))
K12=EXP(MU_3+ETA(3))
K21=EXP(MU_4+ETA(4))
VM=EXP(MU_5+ETA(5))
KMC=EXP(MU_6+ETA(6))
K03=EXP(MU_7+ETA(7))
K30=EXP(MU_8+ETA(8))
S3=VC
S1=VC
KM=KMC*S1
F3=K03/K30
; When Bayes_extra=1, then this particular set of individual parameters were "accepted"
; So you may record them if you wish
IF(BAYES_EXTRA==1 .AND. NEWIND/=2) THEN
;IF(BAYES_EXTRA==1 .AND. ITER_REPORT>=0 .AND. TIME==0.0) THEN
" WRITE(50,'(I12,1X,F14.0,9(1X,1PG12.5))') ITER_REPORT,ID,VC,K10,K12,K21,VM,KMC,K03,K30,OBJI(NIREC,1)
ENDIF

$DES
DADT(1) = -(K10+K12)*A(1) + K21*A(2) - VM*A(1)*A(3)/(A(1)+KM)
DADT(2) = K12*A(1) - K21*A(2)
DADT(3) =  -VM*A(1)*A(3)/(A(1)+KM) - K30*A(3) + K03

$ERROR
CALLFL=0
ETYPE=1
IF(CMT.NE.1) ETYPE=0
IPRED=F
Y = F + F*ETYPE*EPS(1) + F*(1.0-ETYPE)*EPS(2)

$THETA
;Initial Thetas
( 4.0 )  ;[MU_1]
( -2.1 ) ;[MU_2]
( 0.7 )  ;[MU_3]
( -0.17 );[MU_4]
( 2.2 ) ;[MU_5]
( 0.14 )  ;[MU_6]
( 3.7 )  ;[MU_7]
( -0.7) ;[MU_8]
; degrees of freedom for OMEGA prior
(8 FIXED)           ;[dfo]

;Initial Omegas
$OMEGA BLOCK(8)
0.2 ;[p]
-0.0043  ;[f]
0.2 ;[p]
0.0048   ;[f]
-0.0023  ;[f]
0.2 ;[p]
0.0032   ;[f]
0.0059   ;[f]
-0.0014  ;[f]
0.2 ;[p]
0.0029   ;[f]
0.002703 ;[f]
-0.00026 ;[f]
-0.0032  ;[f]
0.2 ;[p]
-0.0025  ;[f]
0.00097  ;[f]
0.0024   ;[f]
0.00197  ;[f]
-0.0080  ;[f]
0.2 ;[p]
0.0031   ;[f]
-0.00571 ;[f]
0.0030   ;[f]
-0.0074  ;[f]
0.0025   ;[f]
0.0034   ;[f]
0.2 ;[p]
0.00973  ;[f]
0.00862  ;[f]
0.0041   ;[f]
0.0046   ;[f]
0.00061  ;[f]
-0.0056  ;[f]
0.0056   ;[f]
0.2 ;[p]

; Omega prior
$OMEGA BLOCK(8)
0.2 FIX
0.0 0.2
0.0 0.0 0.2
0.0 0.0 0.0 0.2
0.0 0.0 0.0 0.0 0.2
0.0 0.0 0.0 0.0 0.0 0.2
0.0 0.0 0.0 0.0 0.0 0.0 0.2
0.0 0.0 0.0 0.0 0.0 0.0 0.0 0.2

$SIGMA
0.1 ;[p]
0.1 ;[p]

; Starting with a short iterative two stage analysis brings the results closer
; so less time needs to be spent during the burn-in of the BAYES analysis
;$EST METHOD=ITS INTERACTION SIGL=4 NITER=15 PRINT=1 FILE=example6.ext NOABORT NOPRIOR=1
$EST METHOD=BAYES INTERACTION NBURN=4000 SIGL=4 NITER=10000 PRINT=25 CTYPE=3 NOABORT NOPRIOR=0
; By default, ISAMPLE_M* are 2.  Since there are many data points per subject,
; setting these to 1 is enough, and it reduces the time of the analysis
;     ISAMPLE_M1=1 ISAMPLE_M2=1 ISAMPLE_M3=1 IACCEPT=0.4
$COV MATRIX=R UNCONDITIONAL

NM-TRAN MESSAGES
 WARNINGS AND ERRORS (IF ANY) FOR PROBLEM    1
 (WARNING  2) NM-TRAN INFERS THAT THE DATA ARE POPULATION.
 (MU_WARNING 20) MU_001: MU_ VARIABLE SHOULD NOT BE DEFINED AFTER VERBATIM CODE.

1NONLINEAR MIXED EFFECTS MODEL PROGRAM (NONMEM) VERSION 7.4.0 alpha6 (nm74a6)
 ORIGINALLY DEVELOPED BY STUART BEAL, LEWIS SHEINER, AND ALISON BOECKMANN
 CURRENT DEVELOPERS ARE ROBERT BAUER, ICON DEVELOPMENT SOLUTIONS,
 AND ALISON BOECKMANN. IMPLEMENTATION, EFFICIENCY, AND STANDARDIZATION
 PERFORMED BY NOUS INFOSYSTEMS.
 PROBLEM NO.:         1
 RUN# example6 (from r2compl)
 TOT. NO. OF OBS RECS:     1568
 TOT. NO. OF INDIVIDUALS:     50
 GENERAL NONLINEAR KINETICS MODEL USING LSODA (ADVAN13)
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 #TBLN:      1
 #METH: MCMC Bayesian Analysis
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
 #TERM:
 BURN-IN WAS COMPLETED
 STATISTICAL PORTION WAS COMPLETED

 #TERE:
 Elapsed estimation  time in seconds:  2947.71
 Elapsed covariance  time in seconds:     0.00

 ********************                              MCMC BAYESIAN ANALYSIS                            ********************
 #OBJT:**************                       AVERAGE VALUE OF LIKELIHOOD FUNCTION                     ********************
 #OBJV:********************************************    -6502.980       **************************************************
 #OBJS:********************************************       33.359 (STD) **************************************************

 ********************                              MCMC BAYESIAN ANALYSIS                            ********************
 ********************                             FINAL PARAMETER ESTIMATE                           ********************

 THETA - VECTOR OF FIXED EFFECTS PARAMETERS   *********
         TH 1      TH 2      TH 3      TH 4      TH 5      TH 6      TH 7      TH 8
         3.91E+00 -2.22E+00  5.55E-01 -1.83E-01  2.27E+00  2.39E-01  3.71E+00 -7.05E-01

 OMEGA - COV MATRIX FOR RANDOM EFFECTS - ETAS  ********
         ETA1      ETA2      ETA3      ETA4      ETA5      ETA6      ETA7      ETA8
 ETA1
+        2.87E-01
 ETA2
+       -3.47E-02  2.21E-01
 ETA3
+        4.51E-02 -9.97E-03  1.45E-01
 ETA4
+        3.05E-02  5.66E-02 -1.20E-02  2.69E-01
 ETA5
+        2.81E-02  1.68E-02 -4.73E-04 -3.26E-02  2.11E-01
 ETA6
+       -2.58E-02  5.47E-03  1.43E-02  1.36E-02 -7.47E-02  2.41E-01
 ETA7
+        3.00E-02 -4.93E-02  3.27E-02 -7.52E-02  2.42E-02 -1.36E-03  2.51E-01
 ETA8
+        9.76E-02  7.34E-02  4.29E-02  4.87E-02  5.37E-03 -5.33E-02  5.85E-02  2.41E-01

 SIGMA - COV MATRIX FOR RANDOM EFFECTS - EPSILONS  ****
         EPS1      EPS2
 EPS1
+        9.29E-03
 EPS2
+        0.00E+00  2.24E-02

 OMEGA - CORR MATRIX FOR RANDOM EFFECTS - ETAS  *******
         ETA1      ETA2      ETA3      ETA4      ETA5      ETA6      ETA7      ETA8
 ETA1
+        5.33E-01
 ETA2
+       -1.34E-01  4.66E-01
 ETA3
+        2.20E-01 -5.59E-02  3.78E-01
 ETA4
+        1.09E-01  2.30E-01 -6.27E-02  5.15E-01
 ETA5
+        1.13E-01  7.86E-02 -3.46E-03 -1.36E-01  4.57E-01
 ETA6
+       -9.87E-02  2.56E-02  7.75E-02  5.27E-02 -3.31E-01  4.87E-01
 ETA7
+        1.10E-01 -2.05E-01  1.70E-01 -2.87E-01  1.04E-01 -5.74E-03  4.99E-01
 ETA8
+        3.68E-01  3.18E-01  2.26E-01  1.89E-01  2.30E-02 -2.20E-01  2.35E-01  4.89E-01

 SIGMA - CORR MATRIX FOR RANDOM EFFECTS - EPSILONS  ***
         EPS1      EPS2
 EPS1
+        9.63E-02
 EPS2
+        0.00E+00  1.49E-01

 ********************                              MCMC BAYESIAN ANALYSIS                            ********************
 ********************                STANDARD ERROR OF ESTIMATE (From Sample Variance)               ********************

 THETA - VECTOR OF FIXED EFFECTS PARAMETERS   *********
         TH 1      TH 2      TH 3      TH 4      TH 5      TH 6      TH 7      TH 8
         7.60E-02  7.72E-02  6.01E-02  7.52E-02  6.64E-02  7.63E-02  7.06E-02  7.10E-02

 OMEGA - COV MATRIX FOR RANDOM EFFECTS - ETAS  ********
         ETA1      ETA2      ETA3      ETA4      ETA5      ETA6      ETA7      ETA8
 ETA1
+        6.06E-02
 ETA2
+        4.07E-02  5.72E-02
 ETA3
+        3.31E-02  3.02E-02  3.56E-02
 ETA4
+        4.12E-02  4.16E-02  3.32E-02  5.93E-02
 ETA5
+        3.73E-02  3.40E-02  2.78E-02  3.55E-02  4.52E-02
 ETA6
+        4.09E-02  3.93E-02  3.05E-02  4.15E-02  3.67E-02  5.83E-02
 ETA7
+        3.99E-02  4.10E-02  3.05E-02  4.01E-02  3.45E-02  3.84E-02  5.24E-02
 ETA8
+        4.15E-02  3.81E-02  3.07E-02  3.92E-02  3.40E-02  3.87E-02  3.79E-02  5.18E-02

 SIGMA - COV MATRIX FOR RANDOM EFFECTS - EPSILONS  ****
         EPS1      EPS2
 EPS1
+        6.30E-04
 EPS2
+        0.00E+00  1.19E-03

 OMEGA - CORR MATRIX FOR RANDOM EFFECTS - ETAS  *******
         ETA1      ETA2      ETA3      ETA4      ETA5      ETA6      ETA7      ETA8
 ETA1
+        5.52E-02
 ETA2
+        1.49E-01  5.92E-02
 ETA3
+        1.47E-01  1.62E-01  4.56E-02
 ETA4
+        1.40E-01  1.53E-01  1.61E-01  5.61E-02
 ETA5
+        1.42E-01  1.51E-01  1.53E-01  1.40E-01  4.81E-02
 ETA6
+        1.48E-01  1.64E-01  1.57E-01  1.56E-01  1.39E-01  5.80E-02
 ETA7
+        1.40E-01  1.55E-01  1.48E-01  1.31E-01  1.42E-01  1.50E-01  5.11E-02
 ETA8
+        1.24E-01  1.42E-01  1.45E-01  1.40E-01  1.44E-01  1.45E-01  1.35E-01  5.14E-02

 SIGMA - CORR MATRIX FOR RANDOM EFFECTS - EPSILONS  ***
         EPS1      EPS2
 EPS1
+        3.26E-03
 EPS2
+        0.00E+00  3.98E-03
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 Elapsed postprocess time in seconds:     0.00
 #CPUT: Total CPU Time in Seconds,     2909.840
