Tue 04/19/2016
07:27 PM
;Model Desc: Receptor Mediated Clearance model with Dynamic Change in Receptors
;Project Name: nm7examples
;Project ID: NO PROJECT DESCRIPTION

$PROB RUN# example6 (from r2compl)
$INPUT C SET ID JID TIME DV=CONC DOSE=AMT RATE EVID MDV CMT
$DATA example6.csv IGNORE=C

; The new numerical integration solver is used, although ADVAN=9 is also efficient
; for this problem.
$SUBROUTINES ADVAN13 TRANS1 TOL=4
$MODEL NCOMPARTMENTS=3

$PRIOR NWPRI NTHETA=8, NETA=8, NTHP=0, NETP=8, NPEXP=1

$PK
MU_1=THETA(1)
MU_2=THETA(2)
MU_3=THETA(3)
MU_4=THETA(4)
MU_5=THETA(5)
MU_6=THETA(6)
MU_7=THETA(7)
MU_8=THETA(8)
VC=EXP(MU_1+ETA(1))
K10=EXP(MU_2+ETA(2))
K12=EXP(MU_3+ETA(3))
K21=EXP(MU_4+ETA(4))
VM=EXP(MU_5+ETA(5))
KMC=EXP(MU_6+ETA(6))
K03=EXP(MU_7+ETA(7))
K30=EXP(MU_8+ETA(8))
S3=VC
S1=VC
KM=KMC*S1
F3=K03/K30

$DES
DADT(1) = -(K10+K12)*A(1) + K21*A(2) - VM*A(1)*A(3)/(A(1)+KM)
DADT(2) = K12*A(1) - K21*A(2)
DADT(3) =  -VM*A(1)*A(3)/(A(1)+KM) - K30*A(3) + K03

$ERROR
CALLFL=0
ETYPE=1
IF(CMT.NE.1) ETYPE=0
IPRED=F
Y = F + F*ETYPE*EPS(1) + F*(1.0-ETYPE)*EPS(2)

$THETA
;Initial Thetas
( 4.0 )  ;[MU_1]
( -2.1 ) ;[MU_2]
( 0.7 )  ;[MU_3]
( -0.17 );[MU_4]
( 2.2 ) ;[MU_5]
( 0.14 )  ;[MU_6]
( 3.7 )  ;[MU_7]
( -0.7) ;[MU_8]
; degrees of freedom for OMEGA prior
(8 FIXED)           ;[dfo]

;Initial Omegas
$OMEGA BLOCK(8)
0.2 ;[p]
-0.0043  ;[f]
0.2 ;[p]
0.0048   ;[f]
-0.0023  ;[f]
0.2 ;[p]
0.0032   ;[f]
0.0059   ;[f]
-0.0014  ;[f]
0.2 ;[p]
0.0029   ;[f]
0.002703 ;[f]
-0.00026 ;[f]
-0.0032  ;[f]
0.2 ;[p]
-0.0025  ;[f]
0.00097  ;[f]
0.0024   ;[f]
0.00197  ;[f]
-0.0080  ;[f]
0.2 ;[p]
0.0031   ;[f]
-0.00571 ;[f]
0.0030   ;[f]
-0.0074  ;[f]
0.0025   ;[f]
0.0034   ;[f]
0.2 ;[p]
0.00973  ;[f]
0.00862  ;[f]
0.0041   ;[f]
0.0046   ;[f]
0.00061  ;[f]
-0.0056  ;[f]
0.0056   ;[f]
0.2 ;[p]

; Omega prior
$OMEGA BLOCK(8)
0.2 FIX
0.0 0.2
0.0 0.0 0.2
0.0 0.0 0.0 0.2
0.0 0.0 0.0 0.0 0.2
0.0 0.0 0.0 0.0 0.0 0.2
0.0 0.0 0.0 0.0 0.0 0.0 0.2
0.0 0.0 0.0 0.0 0.0 0.0 0.0 0.2

$SIGMA
0.1 ;[p]
0.1 ;[p]

$EST METHOD=BAYES INTERACTION NBURN=4000 SIGL=4 NITER=10000 PRINT=25 CTYPE=3 NOABORT NOPRIOR=0 IKAPPA=0.75
$COV MATRIX=R UNCONDITIONAL

NM-TRAN MESSAGES
 WARNINGS AND ERRORS (IF ANY) FOR PROBLEM    1
 (WARNING  2) NM-TRAN INFERS THAT THE DATA ARE POPULATION.

1NONLINEAR MIXED EFFECTS MODEL PROGRAM (NONMEM) VERSION 7.4.0 alpha9 (nm74a9)
 ORIGINALLY DEVELOPED BY STUART BEAL, LEWIS SHEINER, AND ALISON BOECKMANN
 CURRENT DEVELOPERS ARE ROBERT BAUER, ICON DEVELOPMENT SOLUTIONS,
 AND ALISON BOECKMANN. IMPLEMENTATION, EFFICIENCY, AND STANDARDIZATION
 PERFORMED BY NOUS INFOSYSTEMS.
 PROBLEM NO.:         1
 RUN# example6 (from r2compl)
 TOT. NO. OF OBS RECS:     1568
 TOT. NO. OF INDIVIDUALS:     50
 GENERAL NONLINEAR KINETICS MODEL USING LSODA (ADVAN13)
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 #TBLN:      1
 #METH: MCMC Bayesian Analysis
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
 #TERM:
 STATISTICAL PORTION WAS COMPLETED

 TOTAL DATA POINTS NORMALLY DISTRIBUTED (N):         1568
 N*LOG(2PI) CONSTANT TO OBJECTIVE FUNCTION:    2881.79124012985
 OBJECTIVE FUNCTION VALUE WITHOUT CONSTANT:   -6492.94132407657
 OBJECTIVE FUNCTION VALUE WITH CONSTANT:      -3611.15008394672
 REPORTED OBJECTIVE FUNCTION DOES NOT CONTAIN CONSTANT

 TOTAL EFFECTIVE ETAS (NIND*NETA):                           400
 NIND*NETA*LOG(2PI) CONSTANT TO OBJECTIVE FUNCTION:    735.150826563738
 OBJECTIVE FUNCTION VALUE WITHOUT CONSTANT:   -6492.94132407657
 OBJECTIVE FUNCTION VALUE WITH CONSTANT:      -5757.79049751283
 REPORTED OBJECTIVE FUNCTION DOES NOT CONTAIN CONSTANT

 PRIOR CONSTANT TO OBJECTIVE FUNCTION:    55.1779157436876
 OBJECTIVE FUNCTION VALUE WITHOUT CONSTANT:   -6492.94132407657
 OBJECTIVE FUNCTION VALUE WITH CONSTANT:      -6437.76340833288
 REPORTED OBJECTIVE FUNCTION DOES NOT CONTAIN CONSTANT


 #TERE:
 Elapsed estimation  time in seconds:  2917.78
 Elapsed covariance  time in seconds:     0.01

 ********************                              MCMC BAYESIAN ANALYSIS                            ********************
 #OBJT:**************                       AVERAGE VALUE OF LIKELIHOOD FUNCTION                     ********************
 #OBJV:********************************************    -6492.941       **************************************************
 #OBJS:********************************************       32.980 (STD) **************************************************

 ********************                              MCMC BAYESIAN ANALYSIS                            ********************
 ********************                             FINAL PARAMETER ESTIMATE                           ********************

 THETA - VECTOR OF FIXED EFFECTS PARAMETERS   *********
         TH 1      TH 2      TH 3      TH 4      TH 5      TH 6      TH 7      TH 8
         3.91E+00 -2.22E+00  5.54E-01 -1.85E-01  2.27E+00  2.40E-01  3.71E+00 -7.04E-01

 OMEGA - COV MATRIX FOR RANDOM EFFECTS - ETAS  ********
         ETA1      ETA2      ETA3      ETA4      ETA5      ETA6      ETA7      ETA8
 ETA1
+        2.81E-01
 ETA2
+       -3.30E-02  2.12E-01
 ETA3
+        4.48E-02 -1.09E-02  1.41E-01
 ETA4
+        3.01E-02  5.61E-02 -1.40E-02  2.61E-01
 ETA5
+        2.75E-02  1.67E-02 -7.54E-04 -3.27E-02  2.07E-01
 ETA6
+       -2.64E-02  4.06E-03  1.59E-02  1.43E-02 -7.39E-02  2.34E-01
 ETA7
+        2.89E-02 -4.69E-02  3.27E-02 -7.36E-02  2.40E-02 -1.12E-03  2.46E-01
 ETA8
+        9.57E-02  7.37E-02  4.09E-02  4.64E-02  5.44E-03 -5.12E-02  5.73E-02  2.36E-01

 SIGMA - COV MATRIX FOR RANDOM EFFECTS - EPSILONS  ****
         EPS1      EPS2
 EPS1
+        9.29E-03
 EPS2
+        0.00E+00  2.23E-02

 OMEGA - CORR MATRIX FOR RANDOM EFFECTS - ETAS  *******
         ETA1      ETA2      ETA3      ETA4      ETA5      ETA6      ETA7      ETA8
 ETA1
+        5.28E-01
 ETA2
+       -1.32E-01  4.57E-01
 ETA3
+        2.24E-01 -6.40E-02  3.73E-01
 ETA4
+        1.11E-01  2.36E-01 -7.45E-02  5.07E-01
 ETA5
+        1.13E-01  8.03E-02 -5.19E-03 -1.40E-01  4.52E-01
 ETA6
+       -1.03E-01  1.94E-02  8.81E-02  5.71E-02 -3.35E-01  4.80E-01
 ETA7
+        1.09E-01 -2.01E-01  1.75E-01 -2.88E-01  1.05E-01 -4.61E-03  4.93E-01
 ETA8
+        3.69E-01  3.29E-01  2.21E-01  1.85E-01  2.39E-02 -2.16E-01  2.35E-01  4.83E-01

 SIGMA - CORR MATRIX FOR RANDOM EFFECTS - EPSILONS  ***
         EPS1      EPS2
 EPS1
+        9.63E-02
 EPS2
+        0.00E+00  1.49E-01

 ********************                              MCMC BAYESIAN ANALYSIS                            ********************
 ********************                STANDARD ERROR OF ESTIMATE (From Sample Variance)               ********************

 THETA - VECTOR OF FIXED EFFECTS PARAMETERS   *********
         TH 1      TH 2      TH 3      TH 4      TH 5      TH 6      TH 7      TH 8
         7.53E-02  7.42E-02  5.90E-02  7.38E-02  6.60E-02  7.52E-02  6.97E-02  7.04E-02

 OMEGA - COV MATRIX FOR RANDOM EFFECTS - ETAS  ********
         ETA1      ETA2      ETA3      ETA4      ETA5      ETA6      ETA7      ETA8
 ETA1
+        5.91E-02
 ETA2
+        3.96E-02  5.34E-02
 ETA3
+        3.21E-02  2.85E-02  3.45E-02
 ETA4
+        4.00E-02  3.93E-02  3.17E-02  5.73E-02
 ETA5
+        3.66E-02  3.27E-02  2.75E-02  3.49E-02  4.44E-02
 ETA6
+        3.98E-02  3.75E-02  2.93E-02  3.95E-02  3.60E-02  5.65E-02
 ETA7
+        3.92E-02  3.87E-02  2.96E-02  3.89E-02  3.36E-02  3.72E-02  5.12E-02
 ETA8
+        4.07E-02  3.66E-02  2.98E-02  3.81E-02  3.35E-02  3.75E-02  3.69E-02  5.08E-02

 SIGMA - COV MATRIX FOR RANDOM EFFECTS - EPSILONS  ****
         EPS1      EPS2
 EPS1
+        6.24E-04
 EPS2
+        0.00E+00  1.18E-03

 OMEGA - CORR MATRIX FOR RANDOM EFFECTS - ETAS  *******
         ETA1      ETA2      ETA3      ETA4      ETA5      ETA6      ETA7      ETA8
 ETA1
+        5.45E-02
 ETA2
+        1.49E-01  5.64E-02
 ETA3
+        1.45E-01  1.58E-01  4.46E-02
 ETA4
+        1.40E-01  1.48E-01  1.59E-01  5.51E-02
 ETA5
+        1.42E-01  1.49E-01  1.54E-01  1.40E-01  4.77E-02
 ETA6
+        1.47E-01  1.62E-01  1.54E-01  1.53E-01  1.39E-01  5.68E-02
 ETA7
+        1.40E-01  1.52E-01  1.47E-01  1.30E-01  1.40E-01  1.49E-01  5.04E-02
 ETA8
+        1.24E-01  1.38E-01  1.45E-01  1.40E-01  1.45E-01  1.44E-01  1.35E-01  5.10E-02

 SIGMA - CORR MATRIX FOR RANDOM EFFECTS - EPSILONS  ***
         EPS1      EPS2
 EPS1
+        3.23E-03
 EPS2
+        0.00E+00  3.95E-03
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 Elapsed postprocess time in seconds:     0.01
 #CPUT: Total CPU Time in Seconds,     2880.668
