;Model Desc: Receptor Mediated Clearance model with Dynamic Change in Receptors
;Project Name: nm7examples
;Project ID: NO PROJECT DESCRIPTION

$PROB RUN# example6 (from r2compl)
$INPUT C SET ID JID TIME DV=CONC DOSE=AMT RATE EVID MDV CMT
$DATA example6.csv IGNORE=C

; The new numerical integration solver is used, although ADVAN=9 is also efficient
; for this problem.
$SUBROUTINES ADVAN13 TRANS1 TOL=4
$MODEL NCOMPARTMENTS=3


$PK
;BAYES_EXTRA_REQUEST=1
MU_1=THETA(1)
MU_2=THETA(2)
MU_3=THETA(3)
MU_4=THETA(4)
MU_5=THETA(5)
MU_6=THETA(6)
MU_7=THETA(7)
MU_8=THETA(8)
VC=EXP(MU_1+ETA(1))
K10=EXP(MU_2+ETA(2))
K12=EXP(MU_3+ETA(3))
K21=EXP(MU_4+ETA(4))
VM=EXP(MU_5+ETA(5))
KMC=EXP(MU_6+ETA(6))
K03=EXP(MU_7+ETA(7))
K30=EXP(MU_8+ETA(8))
S3=VC
S1=VC
KM=KMC*S1
F3=K03/K30

$DES
DADT(1) = -(K10+K12)*A(1) + K21*A(2) - VM*A(1)*A(3)/(A(1)+KM)
DADT(2) = K12*A(1) - K21*A(2)
DADT(3) =  -VM*A(1)*A(3)/(A(1)+KM) - K30*A(3) + K03

$ERROR
CALLFL=0
ETYPE=1
IF(CMT.NE.1) ETYPE=0
IPRED=F
Y = F + F*ETYPE*EPS(1) + F*(1.0-ETYPE)*EPS(2)

$THETA
;Initial Thetas
( 4.0 )  ;[MU_1]
( -2.1 ) ;[MU_2]
( 0.7 )  ;[MU_3]
( -0.17 );[MU_4]
( 2.2 ) ;[MU_5]
( 0.14 )  ;[MU_6]
( 3.7 )  ;[MU_7]
( -0.7) ;[MU_8]
; degrees of freedom for OMEGA prior

;Initial Omegas
$OMEGA BLOCK(8) VALUES(0.3,0.001)

; Omega prior
$PRIOR NWPRI
$OMEGAP BLOCK(8) FIXED VALUES(0.2,0.0)
$OMEGAPD (8.0 FIXED)

$SIGMA
0.1 ;[p]
(0.3);[p]

$EST METHOD=ITS INTERACTION NITER=20 SIGL=4 file=example6classico3_its.ext NOPRIOR=1 PRINT=1 NOABORT
$EST METHOD=bayes INTERACTION NBURN=1000 NITER=10000 PRINT=50 RANMETHOD=3P file=example6classico3.ext
     OLKJDF=8.0 OSAMPLE_M1=8 OSAMPLE_M2=8 OSAMPLE_M3=8 NOPRIOR=0
$COV MATRIX=R UNCONDITIONAL
