Wed 06/17/2015
03:13 PM
;Model Desc: Receptor Mediated Clearance model with Dynamic Change in Receptors
;Project Name: nm7examples
;Project ID: NO PROJECT DESCRIPTION

$PROB RUN# example6 (from r2compl)
$INPUT C SET ID JID TIME DV=CONC DOSE=AMT RATE EVID MDV CMT
$DATA example6.csv IGNORE=C

; The new numerical integration solver is used, although ADVAN=9 is also efficient
; for this problem.
$SUBROUTINES ADVAN13 TRANS1 TOL=4
$MODEL NCOMPARTMENTS=3

$PRIOR NWPRI NTHETA=8, NETA=8, NTHP=0, NETP=8, NPEXP=1

$PK
include nonmem_reserved_general
; Request extra information for Bayesian analysis.  An extra call will then be made
; for accepted samples
BAYES_EXTRA_REQUEST=1
MU_1=THETA(1)
MU_2=THETA(2)
MU_3=THETA(3)
MU_4=THETA(4)
MU_5=THETA(5)
MU_6=THETA(6)
MU_7=THETA(7)
MU_8=THETA(8)
VC=EXP(MU_1+ETA(1))
K10=EXP(MU_2+ETA(2))
K12=EXP(MU_3+ETA(3))
K21=EXP(MU_4+ETA(4))
VM=EXP(MU_5+ETA(5))
KMC=EXP(MU_6+ETA(6))
K03=EXP(MU_7+ETA(7))
K30=EXP(MU_8+ETA(8))
S3=VC
S1=VC
KM=KMC*S1
F3=K03/K30
; When Bayes_extra=1, then this particular set of individual parameters were "accepted"
; So you may record them if you wish
IF(BAYES_EXTRA==1 .AND. NEWIND/=2) THEN
;IF(BAYES_EXTRA==1 .AND. ITER_REPORT>=0 .AND. TIME==0.0) THEN
" WRITE(50,'(I12,1X,F14.0,9(1X,1PG12.5))') ITER_REPORT,ID,VC,K10,K12,K21,VM,KMC,K03,K30,OBJI(NIREC,1)
ENDIF

$DES
DADT(1) = -(K10+K12)*A(1) + K21*A(2) - VM*A(1)*A(3)/(A(1)+KM)
DADT(2) = K12*A(1) - K21*A(2)
DADT(3) =  -VM*A(1)*A(3)/(A(1)+KM) - K30*A(3) + K03

$ERROR
CALLFL=0
ETYPE=1
IF(CMT.NE.1) ETYPE=0
IPRED=F
Y = F + F*ETYPE*EPS(1) + F*(1.0-ETYPE)*EPS(2)

$THETA
;Initial Thetas
( 4.0 )  ;[MU_1]
( -2.1 ) ;[MU_2]
( 0.7 )  ;[MU_3]
( -0.17 );[MU_4]
( 2.2 ) ;[MU_5]
( 0.14 )  ;[MU_6]
( 3.7 )  ;[MU_7]
( -0.7) ;[MU_8]
; degrees of freedom for OMEGA prior
(8 FIXED)           ;[dfo]

;Initial Omegas
$OMEGA BLOCK(8)
0.2 ;[p]
-0.0043  ;[f]
0.2 ;[p]
0.0048   ;[f]
-0.0023  ;[f]
0.2 ;[p]
0.0032   ;[f]
0.0059   ;[f]
-0.0014  ;[f]
0.2 ;[p]
0.0029   ;[f]
0.002703 ;[f]
-0.00026 ;[f]
-0.0032  ;[f]
0.2 ;[p]
-0.0025  ;[f]
0.00097  ;[f]
0.0024   ;[f]
0.00197  ;[f]
-0.0080  ;[f]
0.2 ;[p]
0.0031   ;[f]
-0.00571 ;[f]
0.0030   ;[f]
-0.0074  ;[f]
0.0025   ;[f]
0.0034   ;[f]
0.2 ;[p]
0.00973  ;[f]
0.00862  ;[f]
0.0041   ;[f]
0.0046   ;[f]
0.00061  ;[f]
-0.0056  ;[f]
0.0056   ;[f]
0.2 ;[p]

; Omega prior
$OMEGA BLOCK(8)
0.2 FIX
0.0 0.2
0.0 0.0 0.2
0.0 0.0 0.0 0.2
0.0 0.0 0.0 0.0 0.2
0.0 0.0 0.0 0.0 0.0 0.2
0.0 0.0 0.0 0.0 0.0 0.0 0.2
0.0 0.0 0.0 0.0 0.0 0.0 0.0 0.2

$SIGMA
0.1 ;[p]
0.1 ;[p]

;$EST METHOD=BAYES INTERACTION NBURN=4000 SIGL=4 NITER=10000 PRINT=25 CTYPE=3 NOABORT NOPRIOR=0
$EST METHOD=ITS INTERACTION SIGL=4 NITER=15 PRINT=1 NOABORT NOPRIOR=1
$EST METHOD=bayes INTERACTION NBURN=2000 NITER=0 PRINT=10 MASSRESET=1 NOPRIOR=0
$EST METHOD=NUTS INTERACTION  NBURN=1000 NITER=2000 PRINT=1 MASSRESET=0 ; OLKJDF=4.0
$COV MATRIX=R UNCONDITIONAL

NM-TRAN MESSAGES
 WARNINGS AND ERRORS (IF ANY) FOR PROBLEM    1
 (WARNING  2) NM-TRAN INFERS THAT THE DATA ARE POPULATION.
 (MU_WARNING 20) MU_001: MU_ VARIABLE SHOULD NOT BE DEFINED AFTER VERBATIM CODE.

1NONLINEAR MIXED EFFECTS MODEL PROGRAM (NONMEM) VERSION 7.4.0 alpha6 (nm74a6)
 ORIGINALLY DEVELOPED BY STUART BEAL, LEWIS SHEINER, AND ALISON BOECKMANN
 CURRENT DEVELOPERS ARE ROBERT BAUER, ICON DEVELOPMENT SOLUTIONS,
 AND ALISON BOECKMANN. IMPLEMENTATION, EFFICIENCY, AND STANDARDIZATION
 PERFORMED BY NOUS INFOSYSTEMS.
 PROBLEM NO.:         1
 RUN# example6 (from r2compl)
 TOT. NO. OF OBS RECS:     1568
 TOT. NO. OF INDIVIDUALS:     50
 GENERAL NONLINEAR KINETICS MODEL USING LSODA (ADVAN13)
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 #TBLN:      1
 #METH: Iterative Two Stage (No Prior)
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
 #TERM:
 OPTIMIZATION WAS NOT TESTED FOR CONVERGENCE

 ETABAR IS THE ARITHMETIC MEAN OF THE ETA-ESTIMATES,
 AND THE P-VALUE IS GIVEN FOR THE NULL HYPOTHESIS THAT THE TRUE MEAN IS 0.

 ETABAR:        -8.3154E-04 -3.0221E-03  2.3761E-03  1.4182E-03  1.4589E-03  2.0930E-03  5.5082E-04  1.1400E-03
 SE:             6.9303E-02  5.2691E-02  3.7772E-02  6.5151E-02  5.6769E-02  5.7216E-02  6.4186E-02  6.1426E-02
 N:                      50          50          50          50          50          50          50          50

 P VAL.:         9.9043E-01  9.5426E-01  9.4984E-01  9.8263E-01  9.7950E-01  9.7082E-01  9.9315E-01  9.8519E-01

 ETAshrink(%):   6.3693E-01  4.2179E+00  8.0369E+00  1.6147E+00  1.4914E+00  5.7569E+00  3.5184E-01  1.5657E+00
 EBVshrink(%):   6.3160E-01  5.4601E+00  9.8632E+00  2.1011E+00  1.5628E+00  6.3046E+00  4.5528E-01  1.7656E+00
 EPSshrink(%):   1.5671E+01  7.2294E+00


 #TERE:
 Elapsed estimation  time in seconds:    49.69
 Elapsed covariance  time in seconds:     0.19

 ********************                          ITERATIVE TWO STAGE (NO PRIOR)                        ********************
 #OBJT:**************                        FINAL VALUE OF OBJECTIVE FUNCTION                       ********************
 #OBJV:********************************************    -4709.838       **************************************************

 ********************                          ITERATIVE TWO STAGE (NO PRIOR)                        ********************
 ********************                             FINAL PARAMETER ESTIMATE                           ********************

 THETA - VECTOR OF FIXED EFFECTS PARAMETERS   *********
         TH 1      TH 2      TH 3      TH 4      TH 5      TH 6      TH 7      TH 8
         3.91E+00 -2.19E+00  5.58E-01 -1.86E-01  2.26E+00  2.10E-01  3.71E+00 -7.09E-01

 OMEGA - COV MATRIX FOR RANDOM EFFECTS - ETAS  ********
         ETA1      ETA2      ETA3      ETA4      ETA5      ETA6      ETA7      ETA8
 ETA1
+        2.48E-01
 ETA2
+       -3.44E-02  1.54E-01
 ETA3
+        4.73E-02 -1.41E-02  8.61E-02
 ETA4
+        3.19E-02  4.69E-02 -2.10E-02  2.24E-01
 ETA5
+        2.66E-02  2.73E-02 -2.69E-03 -3.32E-02  1.69E-01
 ETA6
+       -2.88E-02  1.12E-02  2.67E-02  1.88E-02 -8.06E-02  1.88E-01
 ETA7
+        2.89E-02 -3.37E-02  3.17E-02 -7.20E-02  2.37E-02  3.39E-03  2.12E-01
 ETA8
+        9.78E-02  8.19E-02  3.48E-02  4.44E-02  1.08E-03 -5.09E-02  5.51E-02  1.99E-01

 SIGMA - COV MATRIX FOR RANDOM EFFECTS - EPSILONS  ****
         EPS1      EPS2
 EPS1
+        9.27E-03
 EPS2
+        0.00E+00  2.25E-02

 OMEGA - CORR MATRIX FOR RANDOM EFFECTS - ETAS  *******
         ETA1      ETA2      ETA3      ETA4      ETA5      ETA6      ETA7      ETA8
 ETA1
+        4.98E-01
 ETA2
+       -1.76E-01  3.93E-01
 ETA3
+        3.24E-01 -1.22E-01  2.93E-01
 ETA4
+        1.35E-01  2.53E-01 -1.52E-01  4.73E-01
 ETA5
+        1.30E-01  1.69E-01 -2.23E-02 -1.71E-01  4.12E-01
 ETA6
+       -1.33E-01  6.56E-02  2.10E-01  9.19E-02 -4.52E-01  4.34E-01
 ETA7
+        1.26E-01 -1.86E-01  2.35E-01 -3.31E-01  1.25E-01  1.70E-02  4.60E-01
 ETA8
+        4.40E-01  4.67E-01  2.66E-01  2.10E-01  5.90E-03 -2.63E-01  2.69E-01  4.46E-01

 SIGMA - CORR MATRIX FOR RANDOM EFFECTS - EPSILONS  ***
         EPS1      EPS2
 EPS1
+        9.63E-02
 EPS2
+        0.00E+00  1.50E-01

 ********************                          ITERATIVE TWO STAGE (NO PRIOR)                        ********************
 ********************                          STANDARD ERROR OF ESTIMATE (S)                        ********************

 THETA - VECTOR OF FIXED EFFECTS PARAMETERS   *********
         TH 1      TH 2      TH 3      TH 4      TH 5      TH 6      TH 7      TH 8
         3.48E-01  2.25E-01  2.30E-01  3.11E-01  2.16E-01  2.65E-01  1.50E-01  3.84E-01

 OMEGA - COV MATRIX FOR RANDOM EFFECTS - ETAS  ********
         ETA1      ETA2      ETA3      ETA4      ETA5      ETA6      ETA7      ETA8
 ETA1
+        1.50E-01
 ETA2
+        2.24E-01  2.80E-01
 ETA3
+        1.05E-01  1.23E-01  1.82E-01
 ETA4
+        8.68E-02  1.31E-01  1.04E-01  1.68E-01
 ETA5
+        1.40E-01  9.08E-02  8.63E-02  1.66E-01  3.09E-01
 ETA6
+        1.12E-01  1.62E-01  1.34E-01  1.53E-01  8.28E-02  1.55E-01
 ETA7
+        1.61E-01  1.06E-01  1.19E-01  9.44E-02  1.02E-01  1.03E-01  1.45E-01
 ETA8
+        2.00E-01  1.48E-01  5.91E-02  9.29E-02  1.42E-01  2.01E-01  1.29E-01  2.64E-01

 SIGMA - COV MATRIX FOR RANDOM EFFECTS - EPSILONS  ****
         EPS1      EPS2
 EPS1
+        3.46E-03
 EPS2
+        0.00E+00  4.29E-03

 OMEGA - CORR MATRIX FOR RANDOM EFFECTS - ETAS  *******
         ETA1      ETA2      ETA3      ETA4      ETA5      ETA6      ETA7      ETA8
 ETA1
+        1.51E-01
 ETA2
+        1.04E+00  3.57E-01
 ETA3
+        7.08E-01  9.48E-01  3.09E-01
 ETA4
+        3.55E-01  6.30E-01  8.50E-01  1.78E-01
 ETA5
+        7.04E-01  5.66E-01  7.14E-01  9.45E-01  3.75E-01
 ETA6
+        5.44E-01  9.42E-01  1.03E+00  7.32E-01  8.18E-01  1.79E-01
 ETA7
+        6.86E-01  5.38E-01  9.70E-01  4.10E-01  5.98E-01  5.21E-01  1.58E-01
 ETA8
+        5.90E-01  7.45E-01  3.39E-01  3.62E-01  7.80E-01  9.14E-01  5.67E-01  2.96E-01

 SIGMA - CORR MATRIX FOR RANDOM EFFECTS - EPSILONS  ***
         EPS1      EPS2
 EPS1
+        1.80E-02
 EPS2
+       .........  1.43E-02
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 #TBLN:      2
 #METH: MCMC Bayesian Analysis
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
 #TERM:
 BURN-IN WAS NOT TESTED FOR CONVERGENCE
 STATISTICAL PORTION WAS NOT PERFORMED

 #TERE:
 Elapsed estimation  time in seconds:   571.85

 ********************                              MCMC BAYESIAN ANALYSIS                            ********************
 #OBJT:**************                       AVERAGE VALUE OF LIKELIHOOD FUNCTION                     ********************
 #OBJV:********************************************    -6480.300       **************************************************
 #OBJS:********************************************        0.000 (STD) **************************************************

 ********************                              MCMC BAYESIAN ANALYSIS                            ********************
 ********************                             FINAL PARAMETER ESTIMATE                           ********************

 THETA - VECTOR OF FIXED EFFECTS PARAMETERS   *********
         TH 1      TH 2      TH 3      TH 4      TH 5      TH 6      TH 7      TH 8
         3.91E+00 -2.33E+00  6.29E-01 -2.39E-01  2.32E+00  1.07E-01  3.77E+00 -6.01E-01

 OMEGA - COV MATRIX FOR RANDOM EFFECTS - ETAS  ********
         ETA1      ETA2      ETA3      ETA4      ETA5      ETA6      ETA7      ETA8
 ETA1
+        3.51E-01
 ETA2
+       -1.93E-02  2.33E-01
 ETA3
+        1.29E-01 -2.83E-02  1.68E-01
 ETA4
+        5.25E-02  7.64E-02  7.56E-03  2.71E-01
 ETA5
+        1.00E-01  2.62E-02 -1.37E-02  2.77E-02  3.09E-01
 ETA6
+       -9.53E-02  3.62E-02 -6.28E-02 -1.27E-02 -1.22E-01  2.59E-01
 ETA7
+        1.36E-01 -8.58E-02  9.11E-02 -6.76E-02  6.12E-02 -7.16E-02  3.20E-01
 ETA8
+        2.25E-01  7.66E-02  1.14E-01  1.10E-01  1.22E-01 -1.46E-01  1.00E-01  3.31E-01

 SIGMA - COV MATRIX FOR RANDOM EFFECTS - EPSILONS  ****
         EPS1      EPS2
 EPS1
+        8.13E-03
 EPS2
+        0.00E+00  2.47E-02

 OMEGA - CORR MATRIX FOR RANDOM EFFECTS - ETAS  *******
         ETA1      ETA2      ETA3      ETA4      ETA5      ETA6      ETA7      ETA8
 ETA1
+        5.92E-01
 ETA2
+       -6.75E-02  4.82E-01
 ETA3
+        5.32E-01 -1.43E-01  4.10E-01
 ETA4
+        1.71E-01  3.04E-01  3.55E-02  5.20E-01
 ETA5
+        3.05E-01  9.76E-02 -6.01E-02  9.60E-02  5.55E-01
 ETA6
+       -3.16E-01  1.47E-01 -3.01E-01 -4.81E-02 -4.31E-01  5.09E-01
 ETA7
+        4.06E-01 -3.14E-01  3.93E-01 -2.29E-01  1.95E-01 -2.48E-01  5.66E-01
 ETA8
+        6.59E-01  2.76E-01  4.83E-01  3.66E-01  3.81E-01 -4.97E-01  3.08E-01  5.75E-01

 SIGMA - CORR MATRIX FOR RANDOM EFFECTS - EPSILONS  ***
         EPS1      EPS2
 EPS1
+        9.02E-02
 EPS2
+        0.00E+00  1.57E-01
 #TBLN:      3
 #METH: MCMC Bayesian Analysis
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
 #TERM:
 BURN-IN WAS NOT TESTED FOR CONVERGENCE
 STATISTICAL PORTION WAS COMPLETED

 #TERE:
 Elapsed estimation  time in seconds:  3990.86
 Elapsed covariance  time in seconds:     0.02

 ********************                              MCMC BAYESIAN ANALYSIS                            ********************
 #OBJT:**************                       AVERAGE VALUE OF LIKELIHOOD FUNCTION                     ********************
 #OBJV:********************************************    -6496.897       **************************************************
 #OBJS:********************************************       36.037 (STD) **************************************************

 ********************                              MCMC BAYESIAN ANALYSIS                            ********************
 ********************                             FINAL PARAMETER ESTIMATE                           ********************

 THETA - VECTOR OF FIXED EFFECTS PARAMETERS   *********
         TH 1      TH 2      TH 3      TH 4      TH 5      TH 6      TH 7      TH 8
         3.91E+00 -2.23E+00  5.54E-01 -1.82E-01  2.27E+00  2.40E-01  3.71E+00 -7.03E-01

 OMEGA - COV MATRIX FOR RANDOM EFFECTS - ETAS  ********
         ETA1      ETA2      ETA3      ETA4      ETA5      ETA6      ETA7      ETA8
 ETA1
+        2.93E-01
 ETA2
+       -3.74E-02  2.39E-01
 ETA3
+        4.73E-02 -9.78E-03  1.60E-01
 ETA4
+        3.20E-02  6.35E-02 -1.04E-02  2.95E-01
 ETA5
+        2.79E-02  1.71E-02  6.50E-04 -3.47E-02  2.34E-01
 ETA6
+       -2.78E-02  4.53E-03  1.75E-02  1.60E-02 -7.86E-02  2.84E-01
 ETA7
+        3.27E-02 -5.97E-02  3.64E-02 -8.24E-02  2.93E-02  1.57E-03  2.95E-01
 ETA8
+        1.00E-01  7.53E-02  4.68E-02  5.21E-02  5.01E-03 -6.05E-02  7.15E-02  2.78E-01

 SIGMA - COV MATRIX FOR RANDOM EFFECTS - EPSILONS  ****
         EPS1      EPS2
 EPS1
+        9.35E-03
 EPS2
+        0.00E+00  2.24E-02

 OMEGA - CORR MATRIX FOR RANDOM EFFECTS - ETAS  *******
         ETA1      ETA2      ETA3      ETA4      ETA5      ETA6      ETA7      ETA8
 ETA1
+        5.38E-01
 ETA2
+       -1.37E-01  4.85E-01
 ETA3
+        2.20E-01 -5.17E-02  3.97E-01
 ETA4
+        1.08E-01  2.37E-01 -5.05E-02  5.39E-01
 ETA5
+        1.07E-01  7.28E-02  2.29E-03 -1.32E-01  4.80E-01
 ETA6
+       -9.61E-02  1.88E-02  8.30E-02  5.69E-02 -3.05E-01  5.29E-01
 ETA7
+        1.10E-01 -2.19E-01  1.68E-01 -2.79E-01  1.11E-01  4.17E-03  5.40E-01
 ETA8
+        3.48E-01  2.93E-01  2.19E-01  1.79E-01  1.93E-02 -2.14E-01  2.46E-01  5.24E-01

 SIGMA - CORR MATRIX FOR RANDOM EFFECTS - EPSILONS  ***
         EPS1      EPS2
 EPS1
+        9.66E-02
 EPS2
+        0.00E+00  1.50E-01

 ********************                              MCMC BAYESIAN ANALYSIS                            ********************
 ********************                STANDARD ERROR OF ESTIMATE (From Sample Variance)               ********************

 THETA - VECTOR OF FIXED EFFECTS PARAMETERS   *********
         TH 1      TH 2      TH 3      TH 4      TH 5      TH 6      TH 7      TH 8
         7.88E-02  7.86E-02  6.40E-02  8.05E-02  7.27E-02  8.07E-02  7.75E-02  7.71E-02

 OMEGA - COV MATRIX FOR RANDOM EFFECTS - ETAS  ********
         ETA1      ETA2      ETA3      ETA4      ETA5      ETA6      ETA7      ETA8
 ETA1
+        6.23E-02
 ETA2
+        4.27E-02  6.46E-02
 ETA3
+        3.42E-02  3.41E-02  4.18E-02
 ETA4
+        4.32E-02  4.50E-02  3.71E-02  6.74E-02
 ETA5
+        3.88E-02  3.69E-02  3.19E-02  4.08E-02  5.39E-02
 ETA6
+        4.46E-02  4.43E-02  3.79E-02  4.64E-02  4.27E-02  7.38E-02
 ETA7
+        4.47E-02  4.84E-02  3.69E-02  4.56E-02  4.03E-02  4.82E-02  6.71E-02
 ETA8
+        4.46E-02  4.35E-02  3.60E-02  4.60E-02  3.90E-02  4.73E-02  4.68E-02  6.24E-02

 SIGMA - COV MATRIX FOR RANDOM EFFECTS - EPSILONS  ****
         EPS1      EPS2
 EPS1
+        6.41E-04
 EPS2
+        0.00E+00  1.21E-03

 OMEGA - CORR MATRIX FOR RANDOM EFFECTS - ETAS  *******
         ETA1      ETA2      ETA3      ETA4      ETA5      ETA6      ETA7      ETA8
 ETA1
+        5.60E-02
 ETA2
+        1.48E-01  6.40E-02
 ETA3
+        1.45E-01  1.68E-01  5.06E-02
 ETA4
+        1.39E-01  1.50E-01  1.64E-01  6.07E-02
 ETA5
+        1.41E-01  1.48E-01  1.58E-01  1.46E-01  5.42E-02
 ETA6
+        1.47E-01  1.63E-01  1.67E-01  1.54E-01  1.43E-01  6.76E-02
 ETA7
+        1.42E-01  1.59E-01  1.58E-01  1.36E-01  1.44E-01  1.59E-01  6.02E-02
 ETA8
+        1.25E-01  1.50E-01  1.52E-01  1.46E-01  1.47E-01  1.53E-01  1.42E-01  5.80E-02

 SIGMA - CORR MATRIX FOR RANDOM EFFECTS - EPSILONS  ***
         EPS1      EPS2
 EPS1
+        3.30E-03
 EPS2
+        0.00E+00  4.04E-03
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 Elapsed postprocess time in seconds:     0.00
 #CPUT: Total CPU Time in Seconds,     4386.546
