Thu 11/03/2016
12:41 AM
;Model Desc: Receptor Mediated Clearance model with Dynamic Change in Receptors
;Project Name: nm7examples
;Project ID: NO PROJECT DESCRIPTION

$PROB RUN# example6 (from r2compl)
$INPUT C SET ID JID TIME DV=CONC DOSE=AMT RATE EVID MDV CMT
$DATA example6.csv IGNORE=C

; The new numerical integration solver is used, although ADVAN=9 is also efficient
; for this problem.
$SUBROUTINES ADVAN13 TRANS1 TOL=4
$MODEL NCOMPARTMENTS=3

$PRIOR NWPRI NTHETA=8, NETA=8, NTHP=0, NETP=8, NPEXP=1

$PK
MU_1=THETA(1)
MU_2=THETA(2)
MU_3=THETA(3)
MU_4=THETA(4)
MU_5=THETA(5)
MU_6=THETA(6)
MU_7=THETA(7)
MU_8=THETA(8)
VC=EXP(MU_1+ETA(1))
K10=EXP(MU_2+ETA(2))
K12=EXP(MU_3+ETA(3))
K21=EXP(MU_4+ETA(4))
VM=EXP(MU_5+ETA(5))
KMC=EXP(MU_6+ETA(6))
K03=EXP(MU_7+ETA(7))
K30=EXP(MU_8+ETA(8))
S3=VC
S1=VC
KM=KMC*S1
F3=K03/K30

$DES
DADT(1) = -(K10+K12)*A(1) + K21*A(2) - VM*A(1)*A(3)/(A(1)+KM)
DADT(2) = K12*A(1) - K21*A(2)
DADT(3) =  -VM*A(1)*A(3)/(A(1)+KM) - K30*A(3) + K03

$ERROR
CALLFL=0
ETYPE=1
IF(CMT.NE.1) ETYPE=0
IPRED=F
Y = F + F*ETYPE*EPS(1) + F*(1.0-ETYPE)*EPS(2)

$THETA
;Initial Thetas
( 4.0 )  ;[MU_1]
( -2.1 ) ;[MU_2]
( 0.7 )  ;[MU_3]
( -0.17 );[MU_4]
( 2.2 ) ;[MU_5]
( 0.14 )  ;[MU_6]
( 3.7 )  ;[MU_7]
( -0.7) ;[MU_8]
; degrees of freedom for OMEGA prior
(8 FIXED)           ;[dfo]

;Initial Omegas
$OMEGA BLOCK(8)
0.2 ;[p]
-0.0043  ;[f]
0.2 ;[p]
0.0048   ;[f]
-0.0023  ;[f]
0.2 ;[p]
0.0032   ;[f]
0.0059   ;[f]
-0.0014  ;[f]
0.2 ;[p]
0.0029   ;[f]
0.002703 ;[f]
-0.00026 ;[f]
-0.0032  ;[f]
0.2 ;[p]
-0.0025  ;[f]
0.00097  ;[f]
0.0024   ;[f]
0.00197  ;[f]
-0.0080  ;[f]
0.2 ;[p]
0.0031   ;[f]
-0.00571 ;[f]
0.0030   ;[f]
-0.0074  ;[f]
0.0025   ;[f]
0.0034   ;[f]
0.2 ;[p]
0.00973  ;[f]
0.00862  ;[f]
0.0041   ;[f]
0.0046   ;[f]
0.00061  ;[f]
-0.0056  ;[f]
0.0056   ;[f]
0.2 ;[p]

; Omega prior
$OMEGA BLOCK(8)
0.2 FIX
0.0 0.2
0.0 0.0 0.2
0.0 0.0 0.0 0.2
0.0 0.0 0.0 0.0 0.2
0.0 0.0 0.0 0.0 0.0 0.2
0.0 0.0 0.0 0.0 0.0 0.0 0.2
0.0 0.0 0.0 0.0 0.0 0.0 0.0 0.2

$SIGMA
0.1 ;[p]
(0.3);[p]

$EST METHOD=NUTS NBURN=1000 NITER=2000 PRINT=5 OLKJDF=8.0 NUTS_REG=1.0

NM-TRAN MESSAGES
 WARNINGS AND ERRORS (IF ANY) FOR PROBLEM    1
 (WARNING  2) NM-TRAN INFERS THAT THE DATA ARE POPULATION.
 (WARNING  121) INTERACTION IS IMPLIED WITH EM/BAYES ESTIMATION METHODS

1NONLINEAR MIXED EFFECTS MODEL PROGRAM (NONMEM) VERSION 7.4.0 alpha12 (nm74a12)
 ORIGINALLY DEVELOPED BY STUART BEAL, LEWIS SHEINER, AND ALISON BOECKMANN
 CURRENT DEVELOPERS ARE ROBERT BAUER, ICON DEVELOPMENT SOLUTIONS,
 AND ALISON BOECKMANN. IMPLEMENTATION, EFFICIENCY, AND STANDARDIZATION
 PERFORMED BY NOUS INFOSYSTEMS.
 PROBLEM NO.:         1
 RUN# example6 (from r2compl)
 TOT. NO. OF OBS RECS:     1568
 TOT. NO. OF INDIVIDUALS:     50
 GENERAL NONLINEAR KINETICS MODEL WITH STIFF/NONSTIFF EQUATIONS (ADVAN13)
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 #TBLN:      1
 #METH: NUTS Bayesian Analysis
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
 #TERM:
 STATISTICAL PORTION WAS COMPLETED

 TOTAL DATA POINTS NORMALLY DISTRIBUTED (N):         1568
 N*LOG(2PI) CONSTANT TO OBJECTIVE FUNCTION:    2881.79124012985
 OBJECTIVE FUNCTION VALUE WITHOUT CONSTANT:   -6596.90043184543
 OBJECTIVE FUNCTION VALUE WITH CONSTANT:      -3715.10919171558
 REPORTED OBJECTIVE FUNCTION DOES NOT CONTAIN CONSTANT

 TOTAL EFFECTIVE ETAS (NIND*NETA):                           400
 NIND*NETA*LOG(2PI) CONSTANT TO OBJECTIVE FUNCTION:    735.150826563738
 OBJECTIVE FUNCTION VALUE WITHOUT CONSTANT:   -6596.90043184543
 OBJECTIVE FUNCTION VALUE WITH CONSTANT:      -5861.74960528169
 REPORTED OBJECTIVE FUNCTION DOES NOT CONTAIN CONSTANT

 PRIOR CONSTANT TO OBJECTIVE FUNCTION:   -16.9020929079541
 OBJECTIVE FUNCTION VALUE WITHOUT CONSTANT:   -6596.90043184543
 OBJECTIVE FUNCTION VALUE WITH CONSTANT:      -6613.80252475338
 REPORTED OBJECTIVE FUNCTION DOES NOT CONTAIN CONSTANT


 #TERE:
 Elapsed estimation  time in seconds:  7905.64
 Elapsed covariance  time in seconds:     0.00

 ********************                              NUTS BAYESIAN ANALYSIS                            ********************
 #OBJT:**************                       AVERAGE VALUE OF LIKELIHOOD FUNCTION                     ********************
 #OBJV:********************************************    -6596.900       **************************************************
 #OBJS:********************************************       35.973 (STD) **************************************************

 ********************                              NUTS BAYESIAN ANALYSIS                            ********************
 ********************                             FINAL PARAMETER ESTIMATE                           ********************

 THETA - VECTOR OF FIXED EFFECTS PARAMETERS   *********
         TH 1      TH 2      TH 3      TH 4      TH 5      TH 6      TH 7      TH 8
         3.91E+00 -2.21E+00  5.57E-01 -1.79E-01  2.27E+00  2.37E-01  3.71E+00 -7.06E-01

 OMEGA - COV MATRIX FOR RANDOM EFFECTS - ETAS  ********
         ETA1      ETA2      ETA3      ETA4      ETA5      ETA6      ETA7      ETA8
 ETA1
+        2.64E-01
 ETA2
+       -3.06E-02  1.77E-01
 ETA3
+        2.84E-02 -1.04E-02  1.05E-01
 ETA4
+        2.26E-02  3.31E-02 -1.14E-02  2.48E-01
 ETA5
+        2.07E-02  1.90E-02 -1.14E-03 -2.33E-02  1.89E-01
 ETA6
+       -1.19E-02  1.09E-02  1.67E-02  1.10E-02 -5.58E-02  2.12E-01
 ETA7
+        1.25E-02 -3.58E-02  1.87E-02 -5.49E-02  1.82E-02  7.66E-03  2.25E-01
 ETA8
+        6.99E-02  6.24E-02  2.61E-02  3.22E-02 -5.50E-03 -4.16E-02  4.67E-02  1.92E-01

 SIGMA - COV MATRIX FOR RANDOM EFFECTS - EPSILONS  ****
         EPS1      EPS2
 EPS1
+        9.42E-03
 EPS2
+        0.00E+00  2.24E-02

 OMEGA - CORR MATRIX FOR RANDOM EFFECTS - ETAS  *******
         ETA1      ETA2      ETA3      ETA4      ETA5      ETA6      ETA7      ETA8
 ETA1
+        5.11E-01
 ETA2
+       -1.40E-01  4.17E-01
 ETA3
+        1.74E-01 -7.76E-02  3.21E-01
 ETA4
+        8.90E-02  1.59E-01 -7.42E-02  4.94E-01
 ETA5
+        9.39E-02  1.05E-01 -9.79E-03 -1.09E-01  4.32E-01
 ETA6
+       -5.44E-02  5.80E-02  1.16E-01  4.81E-02 -2.83E-01  4.56E-01
 ETA7
+        5.18E-02 -1.76E-01  1.23E-01 -2.34E-01  8.86E-02  3.50E-02  4.72E-01
 ETA8
+        3.12E-01  3.43E-01  1.83E-01  1.49E-01 -2.85E-02 -2.07E-01  2.24E-01  4.36E-01

 SIGMA - CORR MATRIX FOR RANDOM EFFECTS - EPSILONS  ***
         EPS1      EPS2
 EPS1
+        9.70E-02
 EPS2
+        0.00E+00  1.50E-01

 ********************                              NUTS BAYESIAN ANALYSIS                            ********************
 ********************                STANDARD ERROR OF ESTIMATE (From Sample Variance)               ********************

 THETA - VECTOR OF FIXED EFFECTS PARAMETERS   *********
         TH 1      TH 2      TH 3      TH 4      TH 5      TH 6      TH 7      TH 8
         7.57E-02  7.24E-02  5.46E-02  7.49E-02  6.56E-02  7.18E-02  6.73E-02  6.34E-02

 OMEGA - COV MATRIX FOR RANDOM EFFECTS - ETAS  ********
         ETA1      ETA2      ETA3      ETA4      ETA5      ETA6      ETA7      ETA8
 ETA1
+        5.53E-02
 ETA2
+        2.94E-02  4.96E-02
 ETA3
+        2.19E-02  1.88E-02  2.95E-02
 ETA4
+        3.13E-02  2.90E-02  2.26E-02  5.81E-02
 ETA5
+        2.75E-02  2.45E-02  1.83E-02  2.61E-02  4.01E-02
 ETA6
+        3.05E-02  2.66E-02  2.13E-02  2.94E-02  2.74E-02  5.73E-02
 ETA7
+        2.91E-02  2.84E-02  2.00E-02  2.98E-02  2.50E-02  2.68E-02  4.45E-02
 ETA8
+        2.82E-02  2.43E-02  1.91E-02  2.67E-02  2.28E-02  2.65E-02  2.52E-02  3.94E-02

 SIGMA - COV MATRIX FOR RANDOM EFFECTS - EPSILONS  ****
         EPS1      EPS2
 EPS1
+        6.56E-04
 EPS2
+        0.00E+00  1.19E-03

 OMEGA - CORR MATRIX FOR RANDOM EFFECTS - ETAS  *******
         ETA1      ETA2      ETA3      ETA4      ETA5      ETA6      ETA7      ETA8
 ETA1
+        5.28E-02
 ETA2
+        1.27E-01  5.73E-02
 ETA3
+        1.27E-01  1.36E-01  4.45E-02
 ETA4
+        1.18E-01  1.30E-01  1.37E-01  5.68E-02
 ETA5
+        1.20E-01  1.28E-01  1.29E-01  1.17E-01  4.51E-02
 ETA6
+        1.27E-01  1.34E-01  1.39E-01  1.25E-01  1.24E-01  6.07E-02
 ETA7
+        1.17E-01  1.29E-01  1.26E-01  1.15E-01  1.18E-01  1.20E-01  4.62E-02
 ETA8
+        1.10E-01  1.15E-01  1.22E-01  1.17E-01  1.16E-01  1.20E-01  1.10E-01  4.38E-02

 SIGMA - CORR MATRIX FOR RANDOM EFFECTS - EPSILONS  ***
         EPS1      EPS2
 EPS1
+        3.37E-03
 EPS2
+        0.00E+00  3.97E-03
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 Elapsed postprocess time in seconds:     0.00
 #CPUT: Total CPU Time in Seconds,     7855.025
