;Model Desc: Interoccasion Variability
;Project Name: nm7examples
;Project ID: NO PROJECT DESCRIPTION

$PROB run# example7 (from ad1tr2_occ)
$INPUT C SET ID  TIME  AMT RATE EVID MDV CMT DV
$DATA example7.csv IGNORE=C

$SUBROUTINES ADVAN1 TRANS2

$PRIOR NWPRI NTHETA=2, NETA=5, NTHP=0, NETP=5, NPEXP=1

$PK
MU_1=THETA(1)
MU_2=THETA(2)
V=DEXP(MU_1+ETA(1))
CLB=DEXP(MU_2+ETA(2))
DCL1=DEXP(ETA(3))
DCL2=DEXP(ETA(4))
DCL3=DEXP(ETA(5))
S1=V
DCL=DCL1
IF(TIME.GE.5.0) DCL=DCL2
IF(TIME.GE.10.0) DCL=DCL3
CL=CLB*DCL
VC=V

$ERROR
IPRED=F
Y = F+F*EPS(1)

;Initial Thetas
$THETA
 2.0  ;[MU_1]
 2.0  ;[MU_2]

;Initial omegas
$OMEGA BLOCK(2)
 .3 ;[p]
 -.01  ;[f]
 .3 ;[p]
$OMEGA BLOCK(1)
 .1  ;[p]
$OMEGA BLOCK(1) SAME
$OMEGA  BLOCK(1) SAME

$SIGMA
 0.1 ;[p]

; Degrees of freedom for Prior Omega blocks
$THETA (2.0 FIXED) (1.0 FIXED)
; Prior Omegas
$OMEGA BLOCK(2)
 .14 FIX
 0.0 .125
$OMEGA BLOCK(1) .0164 FIX
$OMEGA BLOCK(1) SAME
$OMEGA  BLOCK(1) SAME

$EST METHOD=ITS INTERACTION FILE=example7.ext   NITER=10000 PRINT=5 NOABORT SIGL=8 CTYPE=3 CITER=10
 NOPRIOR=1 CALPHA=0.05 NSIG=2
$EST METHOD=SAEM INTERACTION NBURN=30000 NITER=500 SIGL=8 ISAMPLE=2 PRINT=10 SEED=1556678 CTYPE=3
 CITER=10 CALPHA=0.05 NOPRIOR=1
$EST METHOD=IMP  INTERACTION EONLY=1 NITER=4 ISAMPLE=3000 PRINT=1 SIGL=10 NOPRIOR=1 MAPITER=0
$EST METHOD=BAYES INTERACTION FILE=example7.txt NBURN=10000 NITER=10000 PRINT=100 CTYPE=3 CITER=10
CALPHA=0.05 NOPRIOR=0
$EST METHOD=COND INTERACTION MAXEVAL=9999 NSIG=3 SIGL=10 PRINT=5 NOABORT NOPRIOR=1
     FILE=example7.ext
$COV MATRIX=R PRINT=E UNCONDITIONAL
