Sat 04/22/2017
10:21 AM
;Model Desc: Interoccasion Variability
;Project Name: nm7examples
;Project ID: NO PROJECT DESCRIPTION

$PROB run# example7r
$INPUT C SET ID  TIME  AMT RATE EVID MDV CMT DV OCC
$ABBR REPLACE ETA(OCC_CL)=ETA(3,4,5)
$DATA example7r.csv IGNORE=C

$SUBROUTINES ADVAN1 TRANS2

$PK
MU_1=THETA(1)
MU_2=THETA(2)
V=DEXP(MU_1+ETA(1))
S1=V
VC=V
CL=DEXP(MU_2+ETA(2))*EXP(ETA(OCC_CL))

$ERROR
IPRED=F
Y = F+F*EPS(1)

;Initial Thetas
$THETA
 2.0  ;[MU_1]
 2.0  ;[MU_2]

;Initial omegas
$OMEGA BLOCK(2)
 .3 ;[p]
 -.01  ;[f]
 .3 ;[p]
$OMEGA BLOCK(1)
 .1  ;[p]
$OMEGA BLOCK(1) SAME(2)

$SIGMA
 0.1 ;[p]

$PRIOR NWPRI
; Degrees of freedom for Prior Omega blocks
$OMEGAPD (2.0 FIXED) (1.0 FIXED)
; Prior Omegas
$OMEGAP BLOCK(2)
 .14 FIX
 0.0 .125
$OMEGAP BLOCK(1) .0164 FIX
$OMEGAP BLOCK(1) SAME(2)

$EST METHOD=ITS INTERACTION FILE=example7r.ext   NITER=10000
     PRINT=5 NOABORT SIGL=8 CTYPE=3 CITER=10
     NOPRIOR=1 CALPHA=0.05 NSIG=2

$EST METHOD=SAEM INTERACTION NBURN=30000 NITER=500 SIGL=8
     ISAMPLE=2 PRINT=10 SEED=1556678 CTYPE=3
     CITER=10 CALPHA=0.05 NOPRIOR=1

$EST METHOD=IMP  INTERACTION EONLY=1 NITER=4 ISAMPLE=3000
     PRINT=1 SIGL=10 NOPRIOR=1 MAPITER=0

$EST METHOD=BAYES INTERACTION FILE=example7r.txt NBURN=10000
     NITER=10000 PRINT=100 CTYPE=3 CITER=10
     CALPHA=0.05 NOPRIOR=0

$EST METHOD=COND INTERACTION MAXEVAL=9999 NSIG=3 SIGL=10 PRINT=5
     NOABORT NOPRIOR=1
     FILE=example7r.ext

$COV MATRIX=R PRINT=E UNCONDITIONAL

NM-TRAN MESSAGES
 WARNINGS AND ERRORS (IF ANY) FOR PROBLEM    1
 (WARNING  2) NM-TRAN INFERS THAT THE DATA ARE POPULATION.
 (WARNING  3) THERE MAY BE AN ERROR IN THE ABBREVIATED CODE. THE FOLLOWING
 ONE OR MORE RANDOM VARIABLES ARE DEFINED WITH "IF" STATEMENTS THAT DO NOT
 PROVIDE DEFINITIONS FOR BOTH THE "THEN" AND "ELSE" CASES. IF ALL
 CONDITIONS FAIL, THE VALUES OF THESE VARIABLES WILL BE ZERO.
   ETA(OCC_CL)

1NONLINEAR MIXED EFFECTS MODEL PROGRAM (NONMEM) VERSION 7.4.0 beta 2 (nm74b2)
 ORIGINALLY DEVELOPED BY STUART BEAL, LEWIS SHEINER, AND ALISON BOECKMANN
 CURRENT DEVELOPERS ARE ROBERT BAUER, ICON DEVELOPMENT SOLUTIONS,
 AND ALISON BOECKMANN. IMPLEMENTATION, EFFICIENCY, AND STANDARDIZATION
 PERFORMED BY NOUS INFOSYSTEMS.
 PROBLEM NO.:         1
 run# example7r
 TOT. NO. OF OBS RECS:     3750
 TOT. NO. OF INDIVIDUALS:      250
 ONE COMPARTMENT MODEL (ADVAN1)
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 #TBLN:      1
 #METH: Iterative Two Stage (No Prior)
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
 #TERM:
 OPTIMIZATION WAS COMPLETED

 ETABAR IS THE ARITHMETIC MEAN OF THE ETA-ESTIMATES,
 AND THE P-VALUE IS GIVEN FOR THE NULL HYPOTHESIS THAT THE TRUE MEAN IS 0.

 ETABAR:        -1.0237E-10 -1.5354E-10 -6.6951E-03  2.6073E-03  4.0878E-03
 SE:             2.3552E-02  2.1839E-02  6.6358E-03  6.6176E-03  6.8553E-03
 N:                     250         250         250         250         250

 P VAL.:         1.0000E+00  1.0000E+00  3.1301E-01  6.9359E-01  5.5098E-01

 ETASHRINKSD(%)  1.3846E-01  2.1757E+00  1.8793E+01  1.9015E+01  1.6106E+01
 ETASHRINKVR(%)  2.7672E-01  4.3041E+00  3.4054E+01  3.4415E+01  2.9619E+01
 EBVSHRINKSD(%)  1.3845E-01  2.1757E+00  1.7839E+01  1.7936E+01  1.7858E+01
 EBVSHRINKVR(%)  2.7671E-01  4.3041E+00  3.2496E+01  3.2655E+01  3.2526E+01
 EPSSHRINKSD(%)  1.4063E+01
 EPSSHRINKVR(%)  2.6148E+01


 TOTAL DATA POINTS NORMALLY DISTRIBUTED (N):         3750
 N*LOG(2PI) CONSTANT TO OBJECTIVE FUNCTION:    6892.03899903504
 OBJECTIVE FUNCTION VALUE WITHOUT CONSTANT:   -19599.6298724821
 OBJECTIVE FUNCTION VALUE WITH CONSTANT:      -12707.5908734470
 REPORTED OBJECTIVE FUNCTION DOES NOT CONTAIN CONSTANT

 TOTAL EFFECTIVE ETAS (NIND*NETA):                          1250


 #TERE:
 Elapsed estimation  time in seconds:    10.80
 Elapsed covariance  time in seconds:     0.55

 ********************                          ITERATIVE TWO STAGE (NO PRIOR)                        ********************
 #OBJT:**************                        FINAL VALUE OF OBJECTIVE FUNCTION                       ********************
 #OBJV:********************************************   -19599.630       **************************************************

 ********************                          ITERATIVE TWO STAGE (NO PRIOR)                        ********************
 ********************                             FINAL PARAMETER ESTIMATE                           ********************

 THETA - VECTOR OF FIXED EFFECTS PARAMETERS   *********
         TH 1      TH 2
         3.89E+00  3.68E+00

 OMEGA - COV MATRIX FOR RANDOM EFFECTS - ETAS  ********
         ETA1      ETA2      ETA3      ETA4      ETA5
 ETA1
+        1.40E-01
 ETA2
+       -8.07E-02  1.25E-01
 ETA3
+        0.00E+00  0.00E+00  1.68E-02
 ETA4
+        0.00E+00  0.00E+00  0.00E+00  1.68E-02
 ETA5
+        0.00E+00  0.00E+00  0.00E+00  0.00E+00  1.68E-02

 SIGMA - COV MATRIX FOR RANDOM EFFECTS - EPSILONS  ****
         EPS1
 EPS1
+        2.50E-03

 OMEGA - CORR MATRIX FOR RANDOM EFFECTS - ETAS  *******
         ETA1      ETA2      ETA3      ETA4      ETA5
 ETA1
+        3.74E-01
 ETA2
+       -6.11E-01  3.54E-01
 ETA3
+        0.00E+00  0.00E+00  1.29E-01
 ETA4
+        0.00E+00  0.00E+00  0.00E+00  1.29E-01
 ETA5
+        0.00E+00  0.00E+00  0.00E+00  0.00E+00  1.29E-01

 SIGMA - CORR MATRIX FOR RANDOM EFFECTS - EPSILONS  ***
         EPS1
 EPS1
+        5.00E-02

 ********************                          ITERATIVE TWO STAGE (NO PRIOR)                        ********************
 ********************                          STANDARD ERROR OF ESTIMATE (S)                        ********************

 THETA - VECTOR OF FIXED EFFECTS PARAMETERS   *********
         TH 1      TH 2
         2.40E-02  2.33E-02

 OMEGA - COV MATRIX FOR RANDOM EFFECTS - ETAS  ********
         ETA1      ETA2      ETA3      ETA4      ETA5
 ETA1
+        1.26E-02
 ETA2
+        1.11E-02  1.31E-02
 ETA3
+        0.00E+00  0.00E+00  1.14E-03
 ETA4
+        0.00E+00  0.00E+00  0.00E+00  1.14E-03
 ETA5
+        0.00E+00  0.00E+00  0.00E+00  0.00E+00  1.14E-03

 SIGMA - COV MATRIX FOR RANDOM EFFECTS - EPSILONS  ****
         EPS1
 EPS1
+        6.46E-05

 OMEGA - CORR MATRIX FOR RANDOM EFFECTS - ETAS  *******
         ETA1      ETA2      ETA3      ETA4      ETA5
 ETA1
+        1.69E-02
 ETA2
+        4.73E-02  1.86E-02
 ETA3
+       ......... .........  4.42E-03
 ETA4
+       ......... ......... ......... .........
 ETA5
+       ......... ......... ......... ......... .........

 SIGMA - CORR MATRIX FOR RANDOM EFFECTS - EPSILONS  ***
         EPS1
 EPS1
+        6.46E-04
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
 ********************                          ITERATIVE TWO STAGE (NO PRIOR)                        ********************
 ********************                    EIGENVALUES OF COR MATRIX OF ESTIMATE (S)                   ********************

             1         2         3         4         5         6         7
         1.54E-01  3.84E-01  5.57E-01  9.15E-01  1.03E+00  1.65E+00  2.31E+00
 #TBLN:      2
 #METH: Stochastic Approximation Expectation-Maximization (No Prior)
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
 #TERM:
 STOCHASTIC PORTION WAS COMPLETED
 REDUCED STOCHASTIC PORTION WAS COMPLETED

 ETABAR IS THE ARITHMETIC MEAN OF THE ETA-ESTIMATES,
 AND THE P-VALUE IS GIVEN FOR THE NULL HYPOTHESIS THAT THE TRUE MEAN IS 0.

 ETABAR:         1.2334E-06 -6.5093E-06 -6.9733E-03  2.6271E-03  4.1369E-03
 SE:             2.3574E-02  2.1955E-02  6.6241E-03  6.6095E-03  6.8601E-03
 N:                     250         250         250         250         250

 P VAL.:         9.9996E-01  9.9976E-01  2.9247E-01  6.9102E-01  5.4649E-01

 ETASHRINKSD(%)  1.3632E-01  1.8226E+00  1.6773E+01  1.6957E+01  1.3808E+01
 ETASHRINKVR(%)  2.7245E-01  3.6120E+00  3.0733E+01  3.1038E+01  2.5709E+01
 EBVSHRINKSD(%)  1.3618E-01  1.8229E+00  1.5699E+01  1.5820E+01  1.5718E+01
 EBVSHRINKVR(%)  2.7217E-01  3.6126E+00  2.8933E+01  2.9137E+01  2.8965E+01
 EPSSHRINKSD(%)  1.4000E+01
 EPSSHRINKVR(%)  2.6040E+01


 TOTAL DATA POINTS NORMALLY DISTRIBUTED (N):         3750
 N*LOG(2PI) CONSTANT TO OBJECTIVE FUNCTION:    6892.03899903504
 OBJECTIVE FUNCTION VALUE WITHOUT CONSTANT:   -28682.9831498863
 OBJECTIVE FUNCTION VALUE WITH CONSTANT:      -21790.9441508512
 REPORTED OBJECTIVE FUNCTION DOES NOT CONTAIN CONSTANT

 TOTAL EFFECTIVE ETAS (NIND*NETA):                          1250
 NIND*NETA*LOG(2PI) CONSTANT TO OBJECTIVE FUNCTION:    2297.34633301168
 OBJECTIVE FUNCTION VALUE WITHOUT CONSTANT:   -28682.9831498863
 OBJECTIVE FUNCTION VALUE WITH CONSTANT:      -26385.6368168746
 REPORTED OBJECTIVE FUNCTION DOES NOT CONTAIN CONSTANT


 #TERE:
 Elapsed estimation  time in seconds:    91.57
 Elapsed covariance  time in seconds:     0.37

 ********************           STOCHASTIC APPROXIMATION EXPECTATION-MAXIMIZATION (NO PRIOR)         ********************
 #OBJT:**************                        FINAL VALUE OF LIKELIHOOD FUNCTION                      ********************
 #OBJV:********************************************   -28682.983       **************************************************

 ********************           STOCHASTIC APPROXIMATION EXPECTATION-MAXIMIZATION (NO PRIOR)         ********************
 ********************                             FINAL PARAMETER ESTIMATE                           ********************

 THETA - VECTOR OF FIXED EFFECTS PARAMETERS   *********
         TH 1      TH 2
         3.89E+00  3.68E+00

 OMEGA - COV MATRIX FOR RANDOM EFFECTS - ETAS  ********
         ETA1      ETA2      ETA3      ETA4      ETA5
 ETA1
+        1.40E-01
 ETA2
+       -8.13E-02  1.26E-01
 ETA3
+        0.00E+00  0.00E+00  1.59E-02
 ETA4
+        0.00E+00  0.00E+00  0.00E+00  1.59E-02
 ETA5
+        0.00E+00  0.00E+00  0.00E+00  0.00E+00  1.59E-02

 SIGMA - COV MATRIX FOR RANDOM EFFECTS - EPSILONS  ****
         EPS1
 EPS1
+        2.50E-03

 OMEGA - CORR MATRIX FOR RANDOM EFFECTS - ETAS  *******
         ETA1      ETA2      ETA3      ETA4      ETA5
 ETA1
+        3.74E-01
 ETA2
+       -6.14E-01  3.54E-01
 ETA3
+        0.00E+00  0.00E+00  1.26E-01
 ETA4
+        0.00E+00  0.00E+00  0.00E+00  1.26E-01
 ETA5
+        0.00E+00  0.00E+00  0.00E+00  0.00E+00  1.26E-01

 SIGMA - CORR MATRIX FOR RANDOM EFFECTS - EPSILONS  ***
         EPS1
 EPS1
+        5.00E-02

 ********************           STOCHASTIC APPROXIMATION EXPECTATION-MAXIMIZATION (NO PRIOR)         ********************
 ********************                          STANDARD ERROR OF ESTIMATE (S)                        ********************

 THETA - VECTOR OF FIXED EFFECTS PARAMETERS   *********
         TH 1      TH 2
         2.39E-02  2.31E-02

 OMEGA - COV MATRIX FOR RANDOM EFFECTS - ETAS  ********
         ETA1      ETA2      ETA3      ETA4      ETA5
 ETA1
+        1.27E-02
 ETA2
+        1.11E-02  1.31E-02
 ETA3
+        0.00E+00  0.00E+00  1.03E-03
 ETA4
+        0.00E+00  0.00E+00  0.00E+00  1.03E-03
 ETA5
+        0.00E+00  0.00E+00  0.00E+00  0.00E+00  1.03E-03

 SIGMA - COV MATRIX FOR RANDOM EFFECTS - EPSILONS  ****
         EPS1
 EPS1
+        6.42E-05

 OMEGA - CORR MATRIX FOR RANDOM EFFECTS - ETAS  *******
         ETA1      ETA2      ETA3      ETA4      ETA5
 ETA1
+        1.70E-02
 ETA2
+        4.69E-02  1.85E-02
 ETA3
+       ......... .........  4.10E-03
 ETA4
+       ......... ......... ......... .........
 ETA5
+       ......... ......... ......... ......... .........

 SIGMA - CORR MATRIX FOR RANDOM EFFECTS - EPSILONS  ***
         EPS1
 EPS1
+        6.42E-04
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
 ********************           STOCHASTIC APPROXIMATION EXPECTATION-MAXIMIZATION (NO PRIOR)         ********************
 ********************                    EIGENVALUES OF COR MATRIX OF ESTIMATE (S)                   ********************

             1         2         3         4         5         6         7
         1.50E-01  3.83E-01  5.48E-01  9.22E-01  1.03E+00  1.63E+00  2.34E+00
 #TBLN:      3
 #METH: Objective Function Evaluation by Importance Sampling (No Prior)
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
 #TERM:
 EXPECTATION ONLY PROCESS COMPLETED

 ETABAR IS THE ARITHMETIC MEAN OF THE ETA-ESTIMATES,
 AND THE P-VALUE IS GIVEN FOR THE NULL HYPOTHESIS THAT THE TRUE MEAN IS 0.

 ETABAR:         5.5626E-06 -8.8798E-05 -6.9333E-03  2.7318E-03  4.1650E-03
 SE:             2.3578E-02  2.1932E-02  6.6311E-03  6.6165E-03  6.8461E-03
 N:                     250         250         250         250         250

 P VAL.:         9.9981E-01  9.9677E-01  2.9576E-01  6.7970E-01  5.4294E-01

 ETASHRINKSD(%)  1.1638E-01  1.9243E+00  1.6686E+01  1.6869E+01  1.3984E+01
 ETASHRINKVR(%)  2.3262E-01  3.8115E+00  3.0587E+01  3.0892E+01  2.6012E+01
 EBVSHRINKSD(%)  1.3821E-01  2.0686E+00  1.7949E+01  1.8055E+01  1.7996E+01
 EBVSHRINKVR(%)  2.7623E-01  4.0944E+00  3.2676E+01  3.2849E+01  3.2753E+01
 EPSSHRINKSD(%)  1.4014E+01
 EPSSHRINKVR(%)  2.6065E+01


 TOTAL DATA POINTS NORMALLY DISTRIBUTED (N):         3750
 N*LOG(2PI) CONSTANT TO OBJECTIVE FUNCTION:    6892.03899903504
 OBJECTIVE FUNCTION VALUE WITHOUT CONSTANT:   -19601.0924668718
 OBJECTIVE FUNCTION VALUE WITH CONSTANT:      -12709.0534678367
 REPORTED OBJECTIVE FUNCTION DOES NOT CONTAIN CONSTANT

 TOTAL EFFECTIVE ETAS (NIND*NETA):                          1250


 #TERE:
 Elapsed estimation  time in seconds:    34.57
 Elapsed covariance  time in seconds:     9.95

 ********************         OBJECTIVE FUNCTION EVALUATION BY IMPORTANCE SAMPLING (NO PRIOR)        ********************
 #OBJT:**************                        FINAL VALUE OF OBJECTIVE FUNCTION                       ********************
 #OBJV:********************************************   -19601.092       **************************************************

 ********************         OBJECTIVE FUNCTION EVALUATION BY IMPORTANCE SAMPLING (NO PRIOR)        ********************
 ********************                             FINAL PARAMETER ESTIMATE                           ********************

 THETA - VECTOR OF FIXED EFFECTS PARAMETERS   *********
         TH 1      TH 2
         3.89E+00  3.68E+00

 OMEGA - COV MATRIX FOR RANDOM EFFECTS - ETAS  ********
         ETA1      ETA2      ETA3      ETA4      ETA5
 ETA1
+        1.40E-01
 ETA2
+       -8.13E-02  1.26E-01
 ETA3
+        0.00E+00  0.00E+00  1.59E-02
 ETA4
+        0.00E+00  0.00E+00  0.00E+00  1.59E-02
 ETA5
+        0.00E+00  0.00E+00  0.00E+00  0.00E+00  1.59E-02

 SIGMA - COV MATRIX FOR RANDOM EFFECTS - EPSILONS  ****
         EPS1
 EPS1
+        2.50E-03

 OMEGA - CORR MATRIX FOR RANDOM EFFECTS - ETAS  *******
         ETA1      ETA2      ETA3      ETA4      ETA5
 ETA1
+        3.74E-01
 ETA2
+       -6.14E-01  3.54E-01
 ETA3
+        0.00E+00  0.00E+00  1.26E-01
 ETA4
+        0.00E+00  0.00E+00  0.00E+00  1.26E-01
 ETA5
+        0.00E+00  0.00E+00  0.00E+00  0.00E+00  1.26E-01

 SIGMA - CORR MATRIX FOR RANDOM EFFECTS - EPSILONS  ***
         EPS1
 EPS1
+        5.00E-02

 ********************         OBJECTIVE FUNCTION EVALUATION BY IMPORTANCE SAMPLING (NO PRIOR)        ********************
 ********************                          STANDARD ERROR OF ESTIMATE (R)                        ********************

 THETA - VECTOR OF FIXED EFFECTS PARAMETERS   *********
         TH 1      TH 2
         2.37E-02  2.29E-02

 OMEGA - COV MATRIX FOR RANDOM EFFECTS - ETAS  ********
         ETA1      ETA2      ETA3      ETA4      ETA5
 ETA1
+        1.27E-02
 ETA2
+        1.00E-02  1.17E-02
 ETA3
+        0.00E+00  0.00E+00  9.75E-04
 ETA4
+        0.00E+00  0.00E+00  0.00E+00  9.75E-04
 ETA5
+        0.00E+00  0.00E+00  0.00E+00  0.00E+00  9.75E-04

 SIGMA - COV MATRIX FOR RANDOM EFFECTS - EPSILONS  ****
         EPS1
 EPS1
+        6.72E-05

 OMEGA - CORR MATRIX FOR RANDOM EFFECTS - ETAS  *******
         ETA1      ETA2      ETA3      ETA4      ETA5
 ETA1
+        1.70E-02
 ETA2
+        4.10E-02  1.65E-02
 ETA3
+       ......... .........  3.87E-03
 ETA4
+       ......... ......... ......... .........
 ETA5
+       ......... ......... ......... ......... .........

 SIGMA - CORR MATRIX FOR RANDOM EFFECTS - EPSILONS  ***
         EPS1
 EPS1
+        6.73E-04
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
 ********************         OBJECTIVE FUNCTION EVALUATION BY IMPORTANCE SAMPLING (NO PRIOR)        ********************
 ********************                    EIGENVALUES OF COR MATRIX OF ESTIMATE (R)                   ********************

             1         2         3         4         5         6         7
         1.36E-01  4.02E-01  6.37E-01  9.97E-01  1.00E+00  1.60E+00  2.23E+00
 #TBLN:      4
 #METH: MCMC Bayesian Analysis
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
 #TERM:
 STATISTICAL PORTION WAS COMPLETED

 TOTAL DATA POINTS NORMALLY DISTRIBUTED (N):         3750
 N*LOG(2PI) CONSTANT TO OBJECTIVE FUNCTION:    6892.03899903504
 OBJECTIVE FUNCTION VALUE WITHOUT CONSTANT:   -28224.3380333645
 OBJECTIVE FUNCTION VALUE WITH CONSTANT:      -21332.2990343295
 REPORTED OBJECTIVE FUNCTION DOES NOT CONTAIN CONSTANT

 TOTAL EFFECTIVE ETAS (NIND*NETA):                          1250
 NIND*NETA*LOG(2PI) CONSTANT TO OBJECTIVE FUNCTION:    2297.34633301168
 OBJECTIVE FUNCTION VALUE WITHOUT CONSTANT:   -28224.3380333645
 OBJECTIVE FUNCTION VALUE WITH CONSTANT:      -25926.9917003529
 REPORTED OBJECTIVE FUNCTION DOES NOT CONTAIN CONSTANT

 PRIOR CONSTANT TO OBJECTIVE FUNCTION:    16.3289195783656
 OBJECTIVE FUNCTION VALUE WITHOUT CONSTANT:   -28224.3380333645
 OBJECTIVE FUNCTION VALUE WITH CONSTANT:      -28208.0091137862
 REPORTED OBJECTIVE FUNCTION DOES NOT CONTAIN CONSTANT


 #TERE:
 Elapsed estimation  time in seconds:   605.61
 Elapsed covariance  time in seconds:     0.00

 ********************                              MCMC BAYESIAN ANALYSIS                            ********************
 #OBJT:**************                       AVERAGE VALUE OF LIKELIHOOD FUNCTION                     ********************
 #OBJV:********************************************   -28224.338       **************************************************
 #OBJS:********************************************       59.333 (STD) **************************************************

 ********************                              MCMC BAYESIAN ANALYSIS                            ********************
 ********************                             FINAL PARAMETER ESTIMATE                           ********************

 THETA - VECTOR OF FIXED EFFECTS PARAMETERS   *********
         TH 1      TH 2
         3.89E+00  3.68E+00

 OMEGA - COV MATRIX FOR RANDOM EFFECTS - ETAS  ********
         ETA1      ETA2      ETA3      ETA4      ETA5
 ETA1
+        1.42E-01
 ETA2
+       -8.17E-02  1.27E-01
 ETA3
+        0.00E+00  0.00E+00  1.71E-02
 ETA4
+        0.00E+00  0.00E+00  0.00E+00  1.71E-02
 ETA5
+        0.00E+00  0.00E+00  0.00E+00  0.00E+00  1.71E-02

 SIGMA - COV MATRIX FOR RANDOM EFFECTS - EPSILONS  ****
         EPS1
 EPS1
+        2.51E-03

 OMEGA - CORR MATRIX FOR RANDOM EFFECTS - ETAS  *******
         ETA1      ETA2      ETA3      ETA4      ETA5
 ETA1
+        3.76E-01
 ETA2
+       -6.07E-01  3.56E-01
 ETA3
+        0.00E+00  0.00E+00  1.31E-01
 ETA4
+        0.00E+00  0.00E+00  0.00E+00  1.31E-01
 ETA5
+        0.00E+00  0.00E+00  0.00E+00  0.00E+00  1.31E-01

 SIGMA - CORR MATRIX FOR RANDOM EFFECTS - EPSILONS  ***
         EPS1
 EPS1
+        5.00E-02

 ********************                              MCMC BAYESIAN ANALYSIS                            ********************
 ********************                STANDARD ERROR OF ESTIMATE (From Sample Variance)               ********************

 THETA - VECTOR OF FIXED EFFECTS PARAMETERS   *********
         TH 1      TH 2
         2.35E-02  2.27E-02

 OMEGA - COV MATRIX FOR RANDOM EFFECTS - ETAS  ********
         ETA1      ETA2      ETA3      ETA4      ETA5
 ETA1
+        1.29E-02
 ETA2
+        1.02E-02  1.19E-02
 ETA3
+        0.00E+00  0.00E+00  1.10E-03
 ETA4
+        0.00E+00  0.00E+00  0.00E+00  1.10E-03
 ETA5
+        0.00E+00  0.00E+00  0.00E+00  0.00E+00  1.10E-03

 SIGMA - COV MATRIX FOR RANDOM EFFECTS - EPSILONS  ****
         EPS1
 EPS1
+        6.78E-05

 OMEGA - CORR MATRIX FOR RANDOM EFFECTS - ETAS  *******
         ETA1      ETA2      ETA3      ETA4      ETA5
 ETA1
+        1.70E-02
 ETA2
+        4.13E-02  1.66E-02
 ETA3
+        0.00E+00  0.00E+00  4.20E-03
 ETA4
+        0.00E+00  0.00E+00  0.00E+00  4.20E-03
 ETA5
+        0.00E+00  0.00E+00  0.00E+00  0.00E+00  4.20E-03

 SIGMA - CORR MATRIX FOR RANDOM EFFECTS - EPSILONS  ***
         EPS1
 EPS1
+        6.77E-04
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
 ********************                              MCMC BAYESIAN ANALYSIS                            ********************
 ********************           EIGENVALUES OF COR MATRIX OF ESTIMATE (From Sample Variance)         ********************

             1         2         3         4         5         6         7
         1.39E-01  4.23E-01  6.34E-01  9.86E-01  1.02E+00  1.58E+00  2.23E+00
 #TBLN:      5
 #METH: First Order Conditional Estimation with Interaction (No Prior)
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
 #TERM:
0MINIMIZATION SUCCESSFUL
 HOWEVER, PROBLEMS OCCURRED WITH THE MINIMIZATION.
 REGARD THE RESULTS OF THE ESTIMATION STEP CAREFULLY, AND ACCEPT THEM ONLY
 AFTER CHECKING THAT THE COVARIANCE STEP PRODUCES REASONABLE OUTPUT.
 NO. OF FUNCTION EVALUATIONS USED:      410
 NO. OF SIG. DIGITS IN FINAL EST.:  3.2

 ETABAR IS THE ARITHMETIC MEAN OF THE ETA-ESTIMATES,
 AND THE P-VALUE IS GIVEN FOR THE NULL HYPOTHESIS THAT THE TRUE MEAN IS 0.

 ETABAR:        -5.7327E-04  7.3265E-05 -6.7124E-03  2.5884E-03  4.0686E-03
 SE:             2.3551E-02  2.1838E-02  6.6359E-03  6.6176E-03  6.8554E-03
 N:                     250         250         250         250         250

 P VAL.:         9.8058E-01  9.9732E-01  3.1177E-01  6.9570E-01  5.5285E-01

 ETASHRINKSD(%)  3.8945E-02  2.0443E+00  1.8686E+01  1.8911E+01  1.5997E+01
 ETASHRINKVR(%)  7.7875E-02  4.0467E+00  3.3881E+01  3.4245E+01  2.9435E+01
 EBVSHRINKSD(%)  1.3875E-01  2.1761E+00  1.7839E+01  1.7937E+01  1.7858E+01
 EBVSHRINKVR(%)  2.7732E-01  4.3049E+00  3.2496E+01  3.2656E+01  3.2527E+01
 EPSSHRINKSD(%)  1.4070E+01
 EPSSHRINKVR(%)  2.6161E+01


 TOTAL DATA POINTS NORMALLY DISTRIBUTED (N):         3750
 N*LOG(2PI) CONSTANT TO OBJECTIVE FUNCTION:    6892.03899903504
 OBJECTIVE FUNCTION VALUE WITHOUT CONSTANT:   -19599.6349358620
 OBJECTIVE FUNCTION VALUE WITH CONSTANT:      -12707.5959368270
 REPORTED OBJECTIVE FUNCTION DOES NOT CONTAIN CONSTANT

 TOTAL EFFECTIVE ETAS (NIND*NETA):                          1250


 #TERE:
 Elapsed estimation  time in seconds:    39.98
 Elapsed covariance  time in seconds:     5.03
 Elapsed postprocess time in seconds:     0.00

 ********************          FIRST ORDER CONDITIONAL ESTIMATION WITH INTERACTION (NO PRIOR)        ********************
 #OBJT:**************                       MINIMUM VALUE OF OBJECTIVE FUNCTION                      ********************
 #OBJV:********************************************   -19599.635       **************************************************

 ********************          FIRST ORDER CONDITIONAL ESTIMATION WITH INTERACTION (NO PRIOR)        ********************
 ********************                             FINAL PARAMETER ESTIMATE                           ********************

 THETA - VECTOR OF FIXED EFFECTS PARAMETERS   *********
         TH 1      TH 2
         3.89E+00  3.68E+00

 OMEGA - COV MATRIX FOR RANDOM EFFECTS - ETAS  ********
         ETA1      ETA2      ETA3      ETA4      ETA5
 ETA1
+        1.39E-01
 ETA2
+       -8.06E-02  1.25E-01
 ETA3
+        0.00E+00  0.00E+00  1.67E-02
 ETA4
+        0.00E+00  0.00E+00  0.00E+00  1.67E-02
 ETA5
+        0.00E+00  0.00E+00  0.00E+00  0.00E+00  1.67E-02

 SIGMA - COV MATRIX FOR RANDOM EFFECTS - EPSILONS  ****
         EPS1
 EPS1
+        2.50E-03

 OMEGA - CORR MATRIX FOR RANDOM EFFECTS - ETAS  *******
         ETA1      ETA2      ETA3      ETA4      ETA5
 ETA1
+        3.73E-01
 ETA2
+       -6.12E-01  3.53E-01
 ETA3
+        0.00E+00  0.00E+00  1.29E-01
 ETA4
+        0.00E+00  0.00E+00  0.00E+00  1.29E-01
 ETA5
+        0.00E+00  0.00E+00  0.00E+00  0.00E+00  1.29E-01

 SIGMA - CORR MATRIX FOR RANDOM EFFECTS - EPSILONS  ***
         EPS1
 EPS1
+        5.00E-02

 ********************          FIRST ORDER CONDITIONAL ESTIMATION WITH INTERACTION (NO PRIOR)        ********************
 ********************                            STANDARD ERROR OF ESTIMATE                          ********************

 THETA - VECTOR OF FIXED EFFECTS PARAMETERS   *********
         TH 1      TH 2
         2.36E-02  2.29E-02

 OMEGA - COV MATRIX FOR RANDOM EFFECTS - ETAS  ********
         ETA1      ETA2      ETA3      ETA4      ETA5
 ETA1
+        1.25E-02
 ETA2
+        9.95E-03  1.17E-02
 ETA3
+       ......... .........  1.08E-03
 ETA4
+       ......... ......... ......... .........
 ETA5
+       ......... ......... ......... ......... .........

 SIGMA - COV MATRIX FOR RANDOM EFFECTS - EPSILONS  ****
         EPS1
 EPS1
+        6.76E-05

 OMEGA - CORR MATRIX FOR RANDOM EFFECTS - ETAS  *******
         ETA1      ETA2      ETA3      ETA4      ETA5
 ETA1
+        1.67E-02
 ETA2
+        4.12E-02  1.65E-02
 ETA3
+       ......... .........  4.16E-03
 ETA4
+       ......... ......... ......... .........
 ETA5
+       ......... ......... ......... ......... .........

 SIGMA - CORR MATRIX FOR RANDOM EFFECTS - EPSILONS  ***
         EPS1
 EPS1
+        6.75E-04
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
 ********************          FIRST ORDER CONDITIONAL ESTIMATION WITH INTERACTION (NO PRIOR)        ********************
 ********************                      EIGENVALUES OF COR MATRIX OF ESTIMATE                     ********************

             1         2         3         4         5         6         7
         1.38E-01  4.04E-01  6.44E-01  9.96E-01  1.01E+00  1.60E+00  2.22E+00
 Elapsed finaloutput time in seconds:     0.34
 #CPUT: Total CPU Time in Seconds,      762.767
