;Model Desc: Two compartment Model, Using ADVAN3, TRANS4
;Project Name: nm7examples
;Project ID: NO PROJECT DESCRIPTION

$PROB RUN# Example 8b (from samp5l)
$INPUT C SET ID JID TIME  DV=CONC AMT=DOSE RATE EVID MDV CMT CLX V1X QX V2X SDIX SDSX
$DATA example8.csv IGNORE=C
$abbr DECLARE INTEGER FIRST_WRITE INTEGER FIRST_WRITE2

$SUBROUTINES ADVAN3 TRANS4


$PK
include nonmem_reserved_general
; Request extra information for Bayesian analysis.  An extra call will then be made
; for accepted samples
BAYES_EXTRA_REQUEST=1
MU_1=THETA(1)
MU_2=THETA(2)
MU_3=THETA(3)
MU_4=THETA(4)
CL=DEXP(MU_1+ETA(1))
V1=DEXP(MU_2+ETA(2))
Q=DEXP(MU_3+ETA(3))
V2=DEXP(MU_4+ETA(4))
S1=V1
; When Bayes_extra=1, then this particular set of individual parameters were "accepted"
; So you may record them if you wish
IF(BAYES_EXTRA==1 .AND. ITER_REPORT>=0 .AND. TIME==0.0) THEN
IF(FIRST_WRITE==0) THEN
" OPEN(unit=53,FILE='C:\NONMEM\WORKA_'//TRIM(TFI(PNM_NODE_NUMBER)))
FIRST_WRITE=1
ENDIF
" WRITE(53,'(I12,1X,F14.0,5(1X,1PG12.5))') ITER_REPORT,ID,CL,V1,Q,V2,OBJI(NIREC,1)
ENDIF

$ERROR
include nonmem_reserved_general
BAYES_EXTRA_REQUEST=1
Y = F + F*EPS(1)
IF(BAYES_EXTRA==1 .AND. ITER_REPORT>=0 ) THEN
IF(FIRST_WRITE2==0) THEN
"OPEN(UNIT=54,FILE='C:\NONMEM\WORKB_'//TRIM(TFI(PNM_NODE_NUMBER)))
FIRST_WRITE2=1
ENDIF
" WRITE(54,'(I12,1X,F14.0,2(1X,1PG12.5))') ITER_REPORT,ID,TIME,F
ENDIF

; Initial values of THETA
$THETA
(2.0) ;[LN(CL)]
(2.0) ;[LN(V1)]
(2.0) ;[LN(Q)]
(2.0) ;[LN(V2)]
;INITIAL values of OMEGA
$OMEGA BLOCK(4)
0.15   ;[P]
0.01  ;[F]
0.15   ;[P]
0.01  ;[F]
0.01  ;[F]
0.15   ;[P]
0.01  ;[F]
0.01  ;[F]
0.01  ;[F]
0.15   ;[P]
;Initial value of SIGMA
$SIGMA
(0.6 )   ;[P]

$PRIOR NWPRI
; Prior information to the THETAS.
$THETAP (2.0 FIX) (2.0 FIX) (2.0 FIX) (2.0 FIX)
$THETAPV BLOCK(4)
10000 FIX
0.00 10000
0.00  0.00 10000
0.00  0.00 0.0 10000

; Prior information to the OMEGAS.
$OMEGAP BLOCK(4)
0.2 FIX
0.0  0.2
0.0  0.0 0.2
0.0  0.0 0.0 0.2
$OMEGAPD (4 FIX)

$EST METHOD=BAYES INTERACTION FILE=example8b.ext NBURN=10000 NITER=1000 PRINT=100 NOPRIOR=0
     CTYPE=3 CINTERVAL=100
