Mon 09/30/2013
04:01 PM
;Model Desc: Two compartment Model, Using ADVAN3, TRANS4
;Project Name: nm7examples
;Project ID: NO PROJECT DESCRIPTION

$PROB RUN# Example 9 (from samp5l)
$INPUT C SET ID JID TIME  DV=CONC AMT=DOSE RATE EVID MDV CMT CLX V1X QX V2X SDIX SDSX
$DATA example9.csv IGNORE=C

$SUBROUTINES ADVAN3 TRANS4 OTHER=aneal.f90

$PK
MU_1=THETA(1)
MU_2=THETA(2)
MU_3=THETA(3)
MU_4=THETA(4)
CL=DEXP(MU_1+ETA(1))
V1=DEXP(MU_2+ETA(2))
Q=DEXP(MU_3+ETA(3))
V2=DEXP(MU_4+ETA(4))
S1=V1

$ERROR
Y = F + F*EPS(1)

; Initial values of THETA
$THETA
(0.001, 2.0) ;[LN(CL)]
(0.001, 2.0) ;[LN(V1)]
(0.001, 2.0) ;[LN(Q)]
(0.001, 2.0) ;[LN(V2)]
;INITIAL values of OMEGA
$OMEGA BLOCK(4)
0.05   ;[P]
0.01  ;[F]
0.05   ;[P]
0.01  ;[F]
0.01  ;[F]
0.05   ;[P]
0.01  ;[F]
0.01  ;[F]
0.01  ;[F]
0.05   ;[P]
;Initial value of SIGMA
$SIGMA
(0.6 )   ;[P]

$EST METHOD=SAEM INTERACTION FILE=example9.ext NBURN=5000 NITER=500 PRINT=10 NOABORT SIGL=6
    CTYPE=3 CINTERVAL=100 CITER=10 CALPHA=0.05

NM-TRAN MESSAGES
 WARNINGS AND ERRORS (IF ANY) FOR PROBLEM    1
 (WARNING  2) NM-TRAN INFERS THAT THE DATA ARE POPULATION.

1NONLINEAR MIXED EFFECTS MODEL PROGRAM (NONMEM) VERSION 7.3beta7.0(P)
 ORIGINALLY DEVELOPED BY STUART BEAL, LEWIS SHEINER, AND ALISON BOECKMANN
 CURRENT DEVELOPERS ARE ROBERT BAUER, ICON DEVELOPMENT SOLUTIONS,
 AND ALISON BOECKMANN. IMPLEMENTATION, EFFICIENCY, AND STANDARDIZATION
 PERFORMED BY NOUS INFOSYSTEMS.
 PROBLEM NO.:         1
 RUN# Example 9 (from samp5l)
 TOT. NO. OF OBS RECS:      500
 TOT. NO. OF INDIVIDUALS:    100
 TWO COMPARTMENT MODEL (ADVAN3)
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 #TBLN:      1
 #METH: Stochastic Approximation Expectation-Maximization
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
 #TERM:
 STOCHASTIC PORTION WAS COMPLETED
 REDUCED STOCHASTIC PORTION WAS COMPLETED

 ETABAR IS THE ARITHMETIC MEAN OF THE ETA-ESTIMATES,
 AND THE P-VALUE IS GIVEN FOR THE NULL HYPOTHESIS THAT THE TRUE MEAN IS 0.

 ETABAR:        -1.7863E-05 -3.3604E-05 -3.5729E-05 -4.7628E-05
 SE:             3.9788E-02  2.8993E-02  3.1819E-02  3.2817E-02
 N:                     100         100         100         100

 P VAL.:         9.9964E-01  9.9908E-01  9.9910E-01  9.9884E-01

 ETAshrink(%):   3.5132E+00  2.2552E+01  2.7147E+01  1.6501E+01
 EBVshrink(%):   3.5095E+00  2.2549E+01  2.7145E+01  1.6493E+01
 EPSshrink(%):   3.0488E+01


 #TERE:
 Elapsed estimation time in seconds:    52.87

 ********************                STOCHASTIC APPROXIMATION EXPECTATION-MAXIMIZATION               ********************
 #OBJT:**************                        FINAL VALUE OF LIKELIHOOD FUNCTION                      ********************
 #OBJV:********************************************    -2483.840       **************************************************

 ********************                STOCHASTIC APPROXIMATION EXPECTATION-MAXIMIZATION               ********************
 ********************                             FINAL PARAMETER ESTIMATE                           ********************

 THETA - VECTOR OF FIXED EFFECTS PARAMETERS   *********
         TH 1      TH 2      TH 3      TH 4
         1.64E+00  1.56E+00  7.55E-01  2.36E+00

 OMEGA - COV MATRIX FOR RANDOM EFFECTS - ETAS  ********
            ETA1      ETA2      ETA3      ETA4
 ETA1
+        1.72E-01
 ETA2
+        2.81E-03  1.42E-01
 ETA3
+        1.95E-02 -3.81E-03  1.93E-01
 ETA4
+       -1.31E-02  1.65E-02  3.00E-02  1.56E-01

 SIGMA - COV MATRIX FOR RANDOM EFFECTS - EPSILONS  ****
            EPS1
 EPS1
+        5.66E-02

 OMEGA - CORR MATRIX FOR RANDOM EFFECTS - ETAS  *******
            ETA1      ETA2      ETA3      ETA4
 ETA1
+        4.14E-01
 ETA2
+        1.80E-02  3.76E-01
 ETA3
+        1.07E-01 -2.31E-02  4.39E-01
 ETA4
+       -8.00E-02  1.11E-01  1.73E-01  3.95E-01

 SIGMA - CORR MATRIX FOR RANDOM EFFECTS - EPSILONS  ***
            EPS1
 EPS1
+        2.38E-01
 #CPUT: Total CPU Time in Seconds,       49.031
