Fri 09/06/2013
08:03 PM
; Used for comparing single versus parallel computing for FOCE method.
;$SIZES LVR=30
;$SIZES LTH=15
;$SIZES LIM1=100
$PROB RUN# Example 1 (from samp5l)
$INPUT C SET ID JID TIME  DV=CONC AMT=DOSE RATE EVID MDV CMT CLX V1X QX V2X SDIX SDSX
$DATA example1b.csv IGNORE=C

$SUBROUTINES ADVAN3 TRANS4

$PK
MU_1=THETA(1)
MU_2=THETA(2)
MU_3=THETA(3)
MU_4=THETA(4)
CL=DEXP(MU_1+ETA(1))
V1=DEXP(MU_2+ETA(2))
Q=DEXP(MU_3+ETA(3))
V2=DEXP(MU_4+ETA(4))
S1=V1

$ERROR
Y = F + F*EPS(1)

; Initial values of THETA
$THETA
(0.001, 2.0) ;[LN(CL)]
(0.001, 2.0) ;[LN(V1)]
(0.001, 2.0) ;[LN(Q)]
(0.001, 2.0) ;[LN(V2)]
;INITIAL values of OMEGA
$OMEGA BLOCK(4)
0.15   ;[P]
0.01  ;[F]
0.15   ;[P]
0.01  ;[F]
0.01  ;[F]
0.15   ;[P]
0.01  ;[F]
0.01  ;[F]
0.01  ;[F]
0.15   ;[P]
;Initial value of SIGMA
$SIGMA
(0.6 )   ;[P]

;$EST METHOD=CHAIN FILE=foce_parallel.chn ISAMPLE=3 NSAMPLE=0
$EST METHOD=1 INTERACTION NSIG=3 PRINT=1 NOABORT MAXEVAL=9999 FORMAT=,1PE23.16 ; PARAFILE=parallel_file.pnm
     ATOL=5
;     MSFO=foce_parallel.msf
$COV MATRIX=S PRINT=E UNCONDITIONAL ; PARAFILE=OFF

NM-TRAN MESSAGES
 WARNINGS AND ERRORS (IF ANY) FOR PROBLEM    1
 (WARNING  2) NM-TRAN INFERS THAT THE DATA ARE POPULATION.

1NONLINEAR MIXED EFFECTS MODEL PROGRAM (NONMEM) VERSION 7.3beta7.0(N)
 ORIGINALLY DEVELOPED BY STUART BEAL, LEWIS SHEINER, AND ALISON BOECKMANN
 CURRENT DEVELOPERS ARE ROBERT BAUER, ICON DEVELOPMENT SOLUTIONS,
 AND ALISON BOECKMANN. IMPLEMENTATION, EFFICIENCY, AND STANDARDIZATION
 PERFORMED BY NOUS INFOSYSTEMS.
 PROBLEM NO.:         1
 RUN# Example 1 (from samp5l)
 TOT. NO. OF OBS RECS:      500
 TOT. NO. OF INDIVIDUALS:    100
 TWO COMPARTMENT MODEL (ADVAN3)
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 #TBLN:      1
 #METH: First Order Conditional Estimation with Interaction
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
 #TERM:
0MINIMIZATION SUCCESSFUL
 HOWEVER, PROBLEMS OCCURRED WITH THE MINIMIZATION.
 REGARD THE RESULTS OF THE ESTIMATION STEP CAREFULLY, AND ACCEPT THEM ONLY
 AFTER CHECKING THAT THE COVARIANCE STEP PRODUCES REASONABLE OUTPUT.
 NO. OF FUNCTION EVALUATIONS USED:      681
 NO. OF SIG. DIGITS IN FINAL EST.:  3.1

 ETABAR IS THE ARITHMETIC MEAN OF THE ETA-ESTIMATES,
 AND THE P-VALUE IS GIVEN FOR THE NULL HYPOTHESIS THAT THE TRUE MEAN IS 0.

 ETABAR:        -3.0636E-06 -1.1922E-02 -3.5070E-03 -1.1572E-02
 SE:             3.9193E-02  2.8850E-02  3.2738E-02  3.3063E-02
 N:                     100         100         100         100

 P VAL.:         9.9994E-01  6.7944E-01  9.1469E-01  7.2634E-01

 ETAshrink(%):   3.0462E+00  2.0020E+01  2.4029E+01  1.4178E+01
 EBVshrink(%):   3.3163E+00  1.9861E+01  2.4447E+01  1.5063E+01
 EPSshrink(%):   3.0942E+01


 #TERE:
 Elapsed estimation time in seconds:    67.20
 Elapsed covariance time in seconds:     1.76

 ********************               FIRST ORDER CONDITIONAL ESTIMATION WITH INTERACTION              ********************
 #OBJT:**************                       MINIMUM VALUE OF OBJECTIVE FUNCTION                      ********************
 #OBJV:********************************************    -1121.028       **************************************************

 ********************               FIRST ORDER CONDITIONAL ESTIMATION WITH INTERACTION              ********************
 ********************                             FINAL PARAMETER ESTIMATE                           ********************

 THETA - VECTOR OF FIXED EFFECTS PARAMETERS   *********
         TH 1      TH 2      TH 3      TH 4
         1.69E+00  1.61E+00  8.20E-01  2.39E+00

 OMEGA - COV MATRIX FOR RANDOM EFFECTS - ETAS  ********
            ETA1      ETA2      ETA3      ETA4
 ETA1
+        1.65E-01
 ETA2
+       -7.35E-04  1.31E-01
 ETA3
+        1.24E-02  1.60E-02  1.88E-01
 ETA4
+       -1.27E-02  1.39E-02  3.33E-02  1.50E-01

 SIGMA - COV MATRIX FOR RANDOM EFFECTS - EPSILONS  ****
            EPS1
 EPS1
+        5.72E-02

 OMEGA - CORR MATRIX FOR RANDOM EFFECTS - ETAS  *******
            ETA1      ETA2      ETA3      ETA4
 ETA1
+        4.06E-01
 ETA2
+       -4.99E-03  3.63E-01
 ETA3
+        7.06E-02  1.02E-01  4.33E-01
 ETA4
+       -8.09E-02  9.91E-02  1.98E-01  3.87E-01

 SIGMA - CORR MATRIX FOR RANDOM EFFECTS - EPSILONS  ***
            EPS1
 EPS1
+        2.39E-01

 ********************               FIRST ORDER CONDITIONAL ESTIMATION WITH INTERACTION              ********************
 ********************                            STANDARD ERROR OF ESTIMATE                          ********************

 THETA - VECTOR OF FIXED EFFECTS PARAMETERS   *********
         TH 1      TH 2      TH 3      TH 4
         4.63E-02  4.88E-02  6.47E-02  5.40E-02

 OMEGA - COV MATRIX FOR RANDOM EFFECTS - ETAS  ********
            ETA1      ETA2      ETA3      ETA4
 ETA1
+        2.90E-02
 ETA2
+        2.29E-02  3.49E-02
 ETA3
+        3.15E-02  3.83E-02  6.91E-02
 ETA4
+        2.71E-02  2.70E-02  4.89E-02  3.91E-02

 SIGMA - COV MATRIX FOR RANDOM EFFECTS - EPSILONS  ****
            EPS1
 EPS1
+        8.15E-03

 OMEGA - CORR MATRIX FOR RANDOM EFFECTS - ETAS  *******
            ETA1      ETA2      ETA3      ETA4
 ETA1
+        3.57E-02
 ETA2
+        1.56E-01  4.82E-02
 ETA3
+        1.73E-01  2.39E-01  7.97E-02
 ETA4
+        1.78E-01  1.83E-01  2.45E-01  5.05E-02

 SIGMA - CORR MATRIX FOR RANDOM EFFECTS - EPSILONS  ***
            EPS1
 EPS1
+        1.71E-02

 ********************               FIRST ORDER CONDITIONAL ESTIMATION WITH INTERACTION              ********************
 ********************                          COVARIANCE MATRIX OF ESTIMATE                         ********************

            TH 1      TH 2      TH 3      TH 4      OM11      OM12      OM13      OM14      OM22      OM23      OM24      OM33
             OM34      OM44      SG11
 TH 1
+        2.15E-03
 TH 2
+        3.34E-04  2.38E-03
 TH 3
+        4.15E-04  1.62E-04  4.19E-03
 TH 4
+       -3.68E-05  1.55E-04  1.56E-03  2.92E-03
 OM11
+       -2.57E-04  1.10E-04  1.06E-04 -5.12E-05  8.43E-04
 OM12
+        2.71E-05  1.72E-04  5.07E-05 -1.04E-04  2.86E-04  5.26E-04
 OM13
+       -1.84E-04  3.88E-05 -2.56E-04  2.46E-04  1.90E-04  2.60E-04  9.91E-04
 OM14
+       -1.95E-04 -1.95E-04  1.94E-04  2.09E-04  2.52E-04  1.92E-04  4.88E-04  7.37E-04
 OM22
+       -6.54E-05 -6.38E-05 -6.99E-05 -2.65E-05  1.31E-04  2.05E-04  3.69E-05  1.37E-04  1.22E-03
 OM23
+       -8.50E-05 -9.29E-05  1.25E-04  1.48E-04  2.15E-04  1.20E-05 -9.75E-05 -6.14E-06  3.51E-04  1.47E-03
 OM24
+       -2.59E-04 -9.67E-05  2.23E-04  2.09E-04  1.29E-04  9.21E-05  1.75E-05  9.77E-05  4.18E-04  5.51E-04  7.27E-04
 OM33
+       -4.66E-04 -3.56E-04  4.23E-04  9.57E-04  2.86E-04  1.83E-04  9.16E-04  5.10E-04  5.98E-04  3.70E-04  4.81E-04  4.77E-03
 OM34
+       -1.17E-04 -1.47E-04  7.18E-04  5.75E-04  2.91E-04  1.41E-04  3.93E-04  3.50E-04  4.22E-04  3.67E-04  4.08E-04  2.72E-03
          2.39E-03
 OM44
+       -3.59E-05 -4.53E-05  4.20E-04 -1.36E-04  2.76E-04  1.30E-04  1.27E-04  2.35E-04  3.35E-04  2.11E-04  2.96E-04  1.32E-03
          1.39E-03  1.53E-03
 SG11
+        5.91E-05  7.71E-05 -3.69E-05  1.12E-05 -6.52E-05 -4.35E-05 -5.75E-05 -8.52E-05 -8.08E-05 -1.30E-05 -5.44E-05 -1.60E-04
         -1.55E-04 -1.37E-04  6.65E-05

 ********************               FIRST ORDER CONDITIONAL ESTIMATION WITH INTERACTION              ********************
 ********************                          CORRELATION MATRIX OF ESTIMATE                        ********************

            TH 1      TH 2      TH 3      TH 4      OM11      OM12      OM13      OM14      OM22      OM23      OM24      OM33
             OM34      OM44      SG11
 TH 1
+        4.63E-02
 TH 2
+        1.48E-01  4.88E-02
 TH 3
+        1.38E-01  5.12E-02  6.47E-02
 TH 4
+       -1.47E-02  5.87E-02  4.45E-01  5.40E-02
 OM11
+       -1.91E-01  7.78E-02  5.65E-02 -3.26E-02  2.90E-02
 OM12
+        2.54E-02  1.54E-01  3.41E-02 -8.36E-02  4.30E-01  2.29E-02
 OM13
+       -1.26E-01  2.52E-02 -1.26E-01  1.45E-01  2.08E-01  3.60E-01  3.15E-02
 OM14
+       -1.55E-01 -1.48E-01  1.11E-01  1.43E-01  3.20E-01  3.09E-01  5.71E-01  2.71E-02
 OM22
+       -4.05E-02 -3.75E-02 -3.09E-02 -1.41E-02  1.30E-01  2.57E-01  3.35E-02  1.45E-01  3.49E-02
 OM23
+       -4.78E-02 -4.96E-02  5.03E-02  7.15E-02  1.93E-01  1.36E-02 -8.08E-02 -5.90E-03  2.63E-01  3.83E-02
 OM24
+       -2.07E-01 -7.35E-02  1.28E-01  1.44E-01  1.65E-01  1.49E-01  2.06E-02  1.34E-01  4.44E-01  5.33E-01  2.70E-02
 OM33
+       -1.46E-01 -1.06E-01  9.47E-02  2.57E-01  1.43E-01  1.16E-01  4.21E-01  2.72E-01  2.48E-01  1.40E-01  2.58E-01  6.91E-02
 OM34
+       -5.18E-02 -6.15E-02  2.27E-01  2.18E-01  2.05E-01  1.26E-01  2.55E-01  2.64E-01  2.47E-01  1.96E-01  3.09E-01  8.06E-01
          4.89E-02
 OM44
+       -1.98E-02 -2.37E-02  1.66E-01 -6.45E-02  2.43E-01  1.44E-01  1.03E-01  2.21E-01  2.45E-01  1.41E-01  2.81E-01  4.89E-01
          7.26E-01  3.91E-02
 SG11
+        1.57E-01  1.94E-01 -7.00E-02  2.55E-02 -2.76E-01 -2.32E-01 -2.24E-01 -3.85E-01 -2.84E-01 -4.14E-02 -2.47E-01 -2.85E-01
         -3.90E-01 -4.31E-01  8.15E-03
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
 ********************               FIRST ORDER CONDITIONAL ESTIMATION WITH INTERACTION              ********************
 ********************                      EIGENVALUES OF COR MATRIX OF ESTIMATE                     ********************

             1         2         3         4         5         6         7         8         9        10        11        12
             13        14        15
         1.14E-01  2.51E-01  3.00E-01  3.51E-01  4.72E-01  5.03E-01  5.84E-01  7.50E-01  9.18E-01  1.01E+00  1.24E+00  1.37E+00
          1.59E+00  1.77E+00  3.78E+00
 #CPUT: Total CPU Time in Seconds,       64.766
