Mon 09/30/2013
06:27 PM
$PROB  THEOPHYLLINE POPULATION DATA; Analysis of Individuals
; Modification of CONTROL5 control steam
$INPUT      ID DOSE=AMT TIME CP=DV WT
$DATA       THEOPP RECS=ID
;RECS=ID:  Data set will be read until ID changes or end-of-file

$SUBROUTINES  ADVAN2

$PK
;THETA(1)=MEAN ABSORPTION RATE CONSTANT (1/HR)
;THETA(2)=MEAN ELIMINATION RATE CONSTANT (1/HR)
;THETA(3)=SLOPE OF CLEARANCE VS WEIGHT RELATIONSHIP (LITERS/HR/KG)
;SCALING PARAMETER=VOLUME/WT SINCE DOSE IS WEIGHT-ADJUSTED
   CALLFL=1
   KA=THETA(1)
   K=THETA(2)
   CL=THETA(3)
   SC=CL/K

$THETA  (0.001,3) (0.001,.2) (0.001,.1)
$OMEGA .2
;For single subject data OMEGA is residual variance.

$ERROR
   Y=F+ERR(1)
;ERR must be used instead of EPS.

$EST MAXEVAL=450  PRINT=5

$COV SPECIAL MATRIX=R PRINT=E
;SPECIAL is required to obtain the variance-covariance matrix for single-subject data.

$TABLE ID DOSE WT TIME NOPRINT ONEHEADER FILE=indestb.tab NOTITLE

$TABLE ID KA K CL SC NOPRINT FIRSTONLY NOAPPEND FILE=indestb.par NOTITLE ONEHEADER

INCLUDE indestb.txt 11
; INCLUDE: Inserts copies of the file named indestb.txt for each additional individual.

NM-TRAN MESSAGES
 WARNINGS AND ERRORS (IF ANY) FOR PROBLEM    1
 (WARNING  1) NM-TRAN INFERS THAT THE DATA ARE SINGLE-SUBJECT.
  NONMEM RUN CANNOT BE PARALLELIZED.
 WARNINGS AND ERRORS (IF ANY) FOR PROBLEM    2
 (WARNING  1) NM-TRAN INFERS THAT THE DATA ARE SINGLE-SUBJECT.
  NONMEM RUN CANNOT BE PARALLELIZED.
 WARNINGS AND ERRORS (IF ANY) FOR PROBLEM    3
 (WARNING  1) NM-TRAN INFERS THAT THE DATA ARE SINGLE-SUBJECT.
  NONMEM RUN CANNOT BE PARALLELIZED.
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
1NONLINEAR MIXED EFFECTS MODEL PROGRAM (NONMEM) VERSION 7.3beta7.0(P)
 ORIGINALLY DEVELOPED BY STUART BEAL, LEWIS SHEINER, AND ALISON BOECKMANN
 CURRENT DEVELOPERS ARE ROBERT BAUER, ICON DEVELOPMENT SOLUTIONS,
 AND ALISON BOECKMANN. IMPLEMENTATION, EFFICIENCY, AND STANDARDIZATION
 PERFORMED BY NOUS INFOSYSTEMS.
 PROBLEM NO.:         1
 THEOPHYLLINE POPULATION DATA; Analysis of Individuals
 TOT. NO. OF OBS RECS:       11
 TOT. NO. OF INDIVIDUALS:     11
 ONE COMPARTMENT MODEL WITH FIRST-ORDER ABSORPTION (ADVAN2)
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 #TBLN:      1
 #METH: First Order
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
 #TERM:
0MINIMIZATION SUCCESSFUL
 NO. OF FUNCTION EVALUATIONS USED:      134
 NO. OF SIG. DIGITS IN FINAL EST.:  3.6

 #TERE:
 Elapsed estimation time in seconds:     0.04
 Elapsed covariance time in seconds:     0.00

 ********************                                   FIRST ORDER                                  ********************
 #OBJT:**************                       MINIMUM VALUE OF OBJECTIVE FUNCTION                      ********************
 #OBJV:********************************************        0.632       **************************************************

 ********************                                   FIRST ORDER                                  ********************
 ********************                             FINAL PARAMETER ESTIMATE                           ********************

 THETA - VECTOR OF FIXED EFFECTS PARAMETERS   *********
         TH 1      TH 2      TH 3
         1.78E+00  5.40E-02  1.99E-02

 OMEGA - COV MATRIX FOR RANDOM EFFECTS - ETAS  ********
            ETA1
 ETA1
+        3.90E-01

 OMEGA - CORR MATRIX FOR RANDOM EFFECTS - ETAS  *******
            ETA1
 ETA1
+        6.24E-01

 ********************                                   FIRST ORDER                                  ********************
 ********************                            STANDARD ERROR OF ESTIMATE                          ********************

 THETA - VECTOR OF FIXED EFFECTS PARAMETERS   *********
         TH 1      TH 2      TH 3
         2.30E-01  7.78E-03  2.17E-03

 OMEGA - COV MATRIX FOR RANDOM EFFECTS - ETAS  ********
            ETA1
 ETA1
+        1.66E-01

 OMEGA - CORR MATRIX FOR RANDOM EFFECTS - ETAS  *******
            ETA1
 ETA1
+        1.33E-01

 ********************                                   FIRST ORDER                                  ********************
 ********************                          COVARIANCE MATRIX OF ESTIMATE                         ********************

            TH 1      TH 2      TH 3      OM11
 TH 1
+        5.29E-02
 TH 2
+       -9.28E-04  6.06E-05
 TH 3
+       -1.99E-04  1.63E-05  4.71E-06
 OM11
+       -8.08E-07  2.95E-08 -1.45E-08  2.76E-02

 ********************                                   FIRST ORDER                                  ********************
 ********************                          CORRELATION MATRIX OF ESTIMATE                        ********************

            TH 1      TH 2      TH 3      OM11
 TH 1
+        2.30E-01
 TH 2
+       -5.18E-01  7.78E-03
 TH 3
+       -3.99E-01  9.62E-01  2.17E-03
 OM11
+       -2.12E-05  2.28E-05 -4.01E-05  1.66E-01
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
 ********************                                   FIRST ORDER                                  ********************
 ********************                      EIGENVALUES OF COR MATRIX OF ESTIMATE                     ********************

             1         2         3         4
         2.82E-02  6.83E-01  1.00E+00  2.29E+00

 PROBLEM NO.:         2
 THEOPHYLLINE POPULATION DATA; Analysis of Individuals
 TOT. NO. OF OBS RECS:       11
 TOT. NO. OF INDIVIDUALS:     11
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 #TBLN:      2
 #METH: First Order
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
 #TERM:
0MINIMIZATION SUCCESSFUL
 NO. OF FUNCTION EVALUATIONS USED:      123
 NO. OF SIG. DIGITS IN FINAL EST.:  3.2

 #TERE:
 Elapsed estimation time in seconds:     0.04
 Elapsed covariance time in seconds:     0.01

 ********************                                   FIRST ORDER                                  ********************
 #OBJT:**************                       MINIMUM VALUE OF OBJECTIVE FUNCTION                      ********************
 #OBJV:********************************************        8.729       **************************************************

 ********************                                   FIRST ORDER                                  ********************
 ********************                             FINAL PARAMETER ESTIMATE                           ********************

 THETA - VECTOR OF FIXED EFFECTS PARAMETERS   *********
         TH 1      TH 2      TH 3
         1.94E+00  1.02E-01  4.48E-02

 OMEGA - COV MATRIX FOR RANDOM EFFECTS - ETAS  ********
            ETA1
 ETA1
+        8.13E-01

 OMEGA - CORR MATRIX FOR RANDOM EFFECTS - ETAS  *******
            ETA1
 ETA1
+        9.02E-01

 ********************                                   FIRST ORDER                                  ********************
 ********************                            STANDARD ERROR OF ESTIMATE                          ********************

 THETA - VECTOR OF FIXED EFFECTS PARAMETERS   *********
         TH 1      TH 2      TH 3
         4.31E-01  2.08E-02  6.21E-03

 OMEGA - COV MATRIX FOR RANDOM EFFECTS - ETAS  ********
            ETA1
 ETA1
+        3.47E-01

 OMEGA - CORR MATRIX FOR RANDOM EFFECTS - ETAS  *******
            ETA1
 ETA1
+        1.92E-01

 ********************                                   FIRST ORDER                                  ********************
 ********************                          COVARIANCE MATRIX OF ESTIMATE                         ********************

            TH 1      TH 2      TH 3      OM11
 TH 1
+        1.86E-01
 TH 2
+       -5.23E-03  4.32E-04
 TH 3
+       -1.01E-03  1.18E-04  3.85E-05
 OM11
+        7.45E-05 -1.59E-06 -8.07E-08  1.20E-01

 ********************                                   FIRST ORDER                                  ********************
 ********************                          CORRELATION MATRIX OF ESTIMATE                        ********************

            TH 1      TH 2      TH 3      OM11
 TH 1
+        4.31E-01
 TH 2
+       -5.84E-01  2.08E-02
 TH 3
+       -3.78E-01  9.15E-01  6.21E-03
 OM11
+        4.98E-04 -2.21E-04 -3.75E-05  3.47E-01
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
 ********************                                   FIRST ORDER                                  ********************
 ********************                      EIGENVALUES OF COR MATRIX OF ESTIMATE                     ********************

             1         2         3         4
         5.42E-02  6.66E-01  1.00E+00  2.28E+00

 PROBLEM NO.:         3
 THEOPHYLLINE POPULATION DATA; Analysis of Individuals
 TOT. NO. OF OBS RECS:       11
 TOT. NO. OF INDIVIDUALS:     11
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 #TBLN:      3
 #METH: First Order
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
 #TERM:
0MINIMIZATION SUCCESSFUL
 NO. OF FUNCTION EVALUATIONS USED:      155
 NO. OF SIG. DIGITS IN FINAL EST.:  4.5

 #TERE:
 Elapsed estimation time in seconds:     0.06
 Elapsed covariance time in seconds:     0.01

 ********************                                   FIRST ORDER                                  ********************
 #OBJT:**************                       MINIMUM VALUE OF OBJECTIVE FUNCTION                      ********************
 #OBJV:********************************************      -24.501       **************************************************

 ********************                                   FIRST ORDER                                  ********************
 ********************                             FINAL PARAMETER ESTIMATE                           ********************

 THETA - VECTOR OF FIXED EFFECTS PARAMETERS   *********
         TH 1      TH 2      TH 3
         2.45E+00  8.14E-02  3.96E-02

 OMEGA - COV MATRIX FOR RANDOM EFFECTS - ETAS  ********
            ETA1
 ETA1
+        3.97E-02

 OMEGA - CORR MATRIX FOR RANDOM EFFECTS - ETAS  *******
            ETA1
 ETA1
+        1.99E-01

 ********************                                   FIRST ORDER                                  ********************
 ********************                            STANDARD ERROR OF ESTIMATE                          ********************

 THETA - VECTOR OF FIXED EFFECTS PARAMETERS   *********
         TH 1      TH 2      TH 3
         1.44E-01  3.81E-03  1.31E-03

 OMEGA - COV MATRIX FOR RANDOM EFFECTS - ETAS  ********
            ETA1
 ETA1
+        1.69E-02

 OMEGA - CORR MATRIX FOR RANDOM EFFECTS - ETAS  *******
            ETA1
 ETA1
+        4.25E-02

 ********************                                   FIRST ORDER                                  ********************
 ********************                          COVARIANCE MATRIX OF ESTIMATE                         ********************

            TH 1      TH 2      TH 3      OM11
 TH 1
+        2.07E-02
 TH 2
+       -3.09E-04  1.45E-05
 TH 3
+       -7.14E-05  4.66E-06  1.73E-06
 OM11
+       -1.94E-08 -2.76E-10 -3.81E-10  2.86E-04

 ********************                                   FIRST ORDER                                  ********************
 ********************                          CORRELATION MATRIX OF ESTIMATE                        ********************

            TH 1      TH 2      TH 3      OM11
 TH 1
+        1.44E-01
 TH 2
+       -5.65E-01  3.81E-03
 TH 3
+       -3.78E-01  9.31E-01  1.31E-03
 OM11
+       -7.99E-06 -4.28E-06 -1.71E-05  1.69E-02
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
 ********************                                   FIRST ORDER                                  ********************
 ********************                      EIGENVALUES OF COR MATRIX OF ESTIMATE                     ********************

             1         2         3         4
         4.46E-02  6.75E-01  1.00E+00  2.28E+00
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 #CPUT: Total CPU Time in Seconds,        0.827
