Mon 09/30/2013
07:09 PM
$PROB  THEOPHYLLINE   POPULATION DATA
$INPUT      ID DOSE=AMT TIME CP=DV WT
$DATA       THEOPP

$SUBROUTINES  ADVAN2

$PK
;THETA(1)=MEAN ABSORPTION RATE CONSTANT (1/HR)
;THETA(2)=MEAN ELIMINATION RATE CONSTANT (1/HR)
;THETA(3)=SLOPE OF CLEARANCE VS WEIGHT RELATIONSHIP (LITERS/HR/KG)
;SCALING PARAMETER=VOLUME/WT SINCE DOSE IS WEIGHT-ADJUSTED
   CALLFL=1
   KA=THETA(1)+ETA(1)
   K=THETA(2)+ETA(2)
   CL=THETA(3)+ETA(3)
   SC=CL/K

$THETA (0.0 FIXED)X3
$OMEGA (1.0E+06 FIXED)X3
$ETAS  3 .08 .04

$ERROR
   IPRED=F
   Y=F+EPS(1)

$SIGMA 0.2

$EST  METHOD=1 INTERACTION LAPLACE MAXEVAL=9999 PRINT=1 NOHABORT FNLETA=0 MCETA=1
$TABLE          ID DOSE TIME DV IPRED NOAPPEND NOPRINT FILE=INDESTMS.TAB
$TABLE          ID KA K CL NOAPPEND FIRSTONLY NOPRINT FILE=INDESTMS.PAR
$COV MATRIX=R

NM-TRAN MESSAGES
 WARNINGS AND ERRORS (IF ANY) FOR PROBLEM    1
 (WARNING  2) NM-TRAN INFERS THAT THE DATA ARE POPULATION.
 (WARNING  87) WITH "LAPLACIAN" AND "INTERACTION", "NUMERICAL" AND "SLOW"
 ARE ALSO REQUIRED ON $ESTIM RECORD, AND "SLOW" IS REQUIRED ON $COV
 RECORD. NM-TRAN HAS SUPPLIED THESE OPTIONS.

1NONLINEAR MIXED EFFECTS MODEL PROGRAM (NONMEM) VERSION 7.3beta7.0(P)
 ORIGINALLY DEVELOPED BY STUART BEAL, LEWIS SHEINER, AND ALISON BOECKMANN
 CURRENT DEVELOPERS ARE ROBERT BAUER, ICON DEVELOPMENT SOLUTIONS,
 AND ALISON BOECKMANN. IMPLEMENTATION, EFFICIENCY, AND STANDARDIZATION
 PERFORMED BY NOUS INFOSYSTEMS.
 PROBLEM NO.:         1
 THEOPHYLLINE   POPULATION DATA
 TOT. NO. OF OBS RECS:      132
 TOT. NO. OF INDIVIDUALS:     12
 ONE COMPARTMENT MODEL WITH FIRST-ORDER ABSORPTION (ADVAN2)
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 #TBLN:      1
 #METH: Laplacian Conditional Estimation with Interaction
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
 #TERM:
0MINIMIZATION SUCCESSFUL
 NO. OF FUNCTION EVALUATIONS USED:       13
 NO. OF SIG. DIGITS IN FINAL EST.:  3.2

 ETABAR IS THE ARITHMETIC MEAN OF THE ETA-ESTIMATES,
 AND THE P-VALUE IS GIVEN FOR THE NULL HYPOTHESIS THAT THE TRUE MEAN IS 0.

 ETABAR:         2.1899E+00  8.9247E-02  4.1568E-02
 SE:             6.3050E-01  4.0246E-03  2.7994E-03
 N:                      12          12          12

 P VAL.:         5.1422E-04  6.467E-109  7.3805E-50

 ETAshrink(%):   9.9772E+01  9.9999E+01  9.9999E+01
 EBVshrink(%):   5.7759E-05  1.0715E-08  1.0188E-09
 EPSshrink(%):   1.0000E-10


 #TERE:
 Elapsed estimation time in seconds:     0.11
 Elapsed covariance time in seconds:     0.01
 SKIPPING EXECUTION OF SLOW FNLMOD/FNLETA BY USER REQUEST

 ********************                LAPLACIAN CONDITIONAL ESTIMATION WITH INTERACTION               ********************
 #OBJT:**************                       MINIMUM VALUE OF OBJECTIVE FUNCTION                      ********************
 #OBJV:********************************************       -4.126       **************************************************

 ********************                LAPLACIAN CONDITIONAL ESTIMATION WITH INTERACTION               ********************
 ********************                             FINAL PARAMETER ESTIMATE                           ********************

 THETA - VECTOR OF FIXED EFFECTS PARAMETERS   *********
         TH 1      TH 2      TH 3
         0.00E+00  0.00E+00  0.00E+00

 OMEGA - COV MATRIX FOR RANDOM EFFECTS - ETAS  ********
            ETA1      ETA2      ETA3
 ETA1
+        1.00E+06
 ETA2
+        0.00E+00  1.00E+06
 ETA3
+        0.00E+00  0.00E+00  1.00E+06

 SIGMA - COV MATRIX FOR RANDOM EFFECTS - EPSILONS  ****
            EPS1
 EPS1
+        3.56E-01

 OMEGA - CORR MATRIX FOR RANDOM EFFECTS - ETAS  *******
            ETA1      ETA2      ETA3
 ETA1
+        1.00E+03
 ETA2
+        0.00E+00  1.00E+03
 ETA3
+        0.00E+00  0.00E+00  1.00E+03

 SIGMA - CORR MATRIX FOR RANDOM EFFECTS - EPSILONS  ***
            EPS1
 EPS1
+        5.97E-01

 ********************                LAPLACIAN CONDITIONAL ESTIMATION WITH INTERACTION               ********************
 ********************                            STANDARD ERROR OF ESTIMATE                          ********************

 THETA - VECTOR OF FIXED EFFECTS PARAMETERS   *********
         TH 1      TH 2      TH 3
        ......... ......... .........

 OMEGA - COV MATRIX FOR RANDOM EFFECTS - ETAS  ********
            ETA1      ETA2      ETA3
 ETA1
+       .........
 ETA2
+       ......... .........
 ETA3
+       ......... ......... .........

 SIGMA - COV MATRIX FOR RANDOM EFFECTS - EPSILONS  ****
            EPS1
 EPS1
+        4.39E-02

 OMEGA - CORR MATRIX FOR RANDOM EFFECTS - ETAS  *******
            ETA1      ETA2      ETA3
 ETA1
+       .........
 ETA2
+       ......... .........
 ETA3
+       ......... ......... .........

 SIGMA - CORR MATRIX FOR RANDOM EFFECTS - EPSILONS  ***
            EPS1
 EPS1
+        3.67E-02

 ********************                LAPLACIAN CONDITIONAL ESTIMATION WITH INTERACTION               ********************
 ********************                          COVARIANCE MATRIX OF ESTIMATE                         ********************

            TH 1      TH 2      TH 3      OM11      OM12      OM13      OM22      OM23      OM33      SG11
 TH 1
+       .........
 TH 2
+       ......... .........
 TH 3
+       ......... ......... .........
 OM11
+       ......... ......... ......... .........
 OM12
+       ......... ......... ......... ......... .........
 OM13
+       ......... ......... ......... ......... ......... .........
 OM22
+       ......... ......... ......... ......... ......... ......... .........
 OM23
+       ......... ......... ......... ......... ......... ......... ......... .........
 OM33
+       ......... ......... ......... ......... ......... ......... ......... ......... .........
 SG11
+       ......... ......... ......... ......... ......... ......... ......... ......... .........  1.92E-03

 ********************                LAPLACIAN CONDITIONAL ESTIMATION WITH INTERACTION               ********************
 ********************                          CORRELATION MATRIX OF ESTIMATE                        ********************

            TH 1      TH 2      TH 3      OM11      OM12      OM13      OM22      OM23      OM33      SG11
 TH 1
+       .........
 TH 2
+       ......... .........
 TH 3
+       ......... ......... .........
 OM11
+       ......... ......... ......... .........
 OM12
+       ......... ......... ......... ......... .........
 OM13
+       ......... ......... ......... ......... ......... .........
 OM22
+       ......... ......... ......... ......... ......... ......... .........
 OM23
+       ......... ......... ......... ......... ......... ......... ......... .........
 OM33
+       ......... ......... ......... ......... ......... ......... ......... ......... .........
 SG11
+       ......... ......... ......... ......... ......... ......... ......... ......... .........  4.39E-02
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 #CPUT: Total CPU Time in Seconds,        0.187
