; THIS IS THE FULL CONTROL STREAM FOR HELP FILE infn2.exa
$PROB  THEOPHYLLINE   POPULATION DATA
$INPUT      ID DOSE=AMT TIME CP=DV WT
$DATA       THEOPP
$SUBROUTINES  ADVAN2

$ABBR REPLACE INTVBL=WT
$ABBR REPLACE NULLVAL=0.0
 INCLUDE 'infnabbr'

$PK
;THETA(1)=MEAN ABSORPTION RATE CONSTANT (1/HR)
;THETA(2)=MEAN ELIMINATION RATE CONSTANT (1/HR)
;THETA(3)=SLOPE OF CLEARANCE VS WEIGHT RELATIONSHIP (LITERS/HR/KG)
;SCALING PARAMETER=VOLUME/WT SINCE DOSE IS WEIGHT-ADJUSTED
   KA=THETA(1)+ETA(1)
   K=THETA(2)+ETA(2)
   CL=THETA(3)*WT+ETA(3)
   SC=CL/K/WT

$THETA  (.1,3,5) (.008,.08,.5) (.004,.04,.9)
$OMEGA BLOCK(3)  6 .005 .0002 .3 .006 .4

$ERROR
   Y=F+EPS(1)

$SIGMA  .4
$TABLE ID DOSE TIME DV WT NOAPPEND FILE=THEOPPexa2
