Mon 09/30/2013
06:27 PM
; THIS IS THE FULL CONTROL STREAM FOR HELP FILE infn2.exa
$PROB  THEOPHYLLINE   POPULATION DATA
$INPUT      ID DOSE=AMT TIME CP=DV WT
$DATA       THEOPP
$SUBROUTINES  ADVAN2

$ABBR REPLACE INTVBL=WT
$ABBR REPLACE NULLVAL=0.0
 INCLUDE 'infnabbr'

$PK
;THETA(1)=MEAN ABSORPTION RATE CONSTANT (1/HR)
;THETA(2)=MEAN ELIMINATION RATE CONSTANT (1/HR)
;THETA(3)=SLOPE OF CLEARANCE VS WEIGHT RELATIONSHIP (LITERS/HR/KG)
;SCALING PARAMETER=VOLUME/WT SINCE DOSE IS WEIGHT-ADJUSTED
   KA=THETA(1)+ETA(1)
   K=THETA(2)+ETA(2)
   CL=THETA(3)*WT+ETA(3)
   SC=CL/K/WT

$THETA  (.1,3,5) (.008,.08,.5) (.004,.04,.9)
$OMEGA BLOCK(3)  6 .005 .0002 .3 .006 .4

$ERROR
   Y=F+EPS(1)

$SIGMA  .4
$TABLE ID DOSE TIME DV WT NOAPPEND FILE=THEOPPexa2

NM-TRAN MESSAGES
 WARNINGS AND ERRORS (IF ANY) FOR PROBLEM    1
 (WARNING  2) NM-TRAN INFERS THAT THE DATA ARE POPULATION.

1NONLINEAR MIXED EFFECTS MODEL PROGRAM (NONMEM) VERSION 7.3beta7.0(P)
 ORIGINALLY DEVELOPED BY STUART BEAL, LEWIS SHEINER, AND ALISON BOECKMANN
 CURRENT DEVELOPERS ARE ROBERT BAUER, ICON DEVELOPMENT SOLUTIONS,
 AND ALISON BOECKMANN. IMPLEMENTATION, EFFICIENCY, AND STANDARDIZATION
 PERFORMED BY NOUS INFOSYSTEMS.
 PROBLEM NO.:         1
 THEOPHYLLINE   POPULATION DATA
 TOT. NO. OF OBS RECS:      132
 TOT. NO. OF INDIVIDUALS:     12
 ONE COMPARTMENT MODEL WITH FIRST-ORDER ABSORPTION (ADVAN2)
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 #TBLN:      1
 #METH: First Order (Evaluation)
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
 ********************                             FIRST ORDER (EVALUATION)                           ********************
 #OBJT:**************                       MINIMUM VALUE OF OBJECTIVE FUNCTION                      ********************
 #OBJV:********************************************      110.244       **************************************************

 ********************                             FIRST ORDER (EVALUATION)                           ********************
 ********************                             FINAL PARAMETER ESTIMATE                           ********************

 THETA - VECTOR OF FIXED EFFECTS PARAMETERS   *********
         TH 1      TH 2      TH 3
         3.00E+00  8.00E-02  4.00E-02

 OMEGA - COV MATRIX FOR RANDOM EFFECTS - ETAS  ********
            ETA1      ETA2      ETA3
 ETA1
+        6.00E+00
 ETA2
+        5.00E-03  2.00E-04
 ETA3
+        3.00E-01  6.00E-03  4.00E-01

 SIGMA - COV MATRIX FOR RANDOM EFFECTS - EPSILONS  ****
            EPS1
 EPS1
+        4.00E-01

 OMEGA - CORR MATRIX FOR RANDOM EFFECTS - ETAS  *******
            ETA1      ETA2      ETA3
 ETA1
+        2.45E+00
 ETA2
+        1.44E-01  1.41E-02
 ETA3
+        1.94E-01  6.71E-01  6.32E-01

 SIGMA - CORR MATRIX FOR RANDOM EFFECTS - EPSILONS  ***
            EPS1
 EPS1
+        6.32E-01
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 #CPUT: Total CPU Time in Seconds,        0.109
