; EHC example using MTIME parameters
;
; The help example for MODEL TIME EXAMPLES contains this fragment of code for EHC:
;     $PK
;     MTIME(1)=THETA(8)
;     MTIME(2)=MTIME(1)+THETA(9)
;      ....
;     $DES
;     FLAG=MPAST(1)-MPAST(2)
;     DADT(1)=-KA*A(1)+K41*A(4)*FLAG
;     DADT(4)=K1G*A(2)-K41*A(4)*FLAG
;      ....
; The following provides a more complete example using this fragment.
; A steady-state dose would gives an incorrect result. This is because
; MTIME variables are ignored during Steady-State calculation, which is intended for
; a single repeated dose with no changes in the status of the system.
; Instead, the Steady-state dose is described as the first transient dose.
; using  $INPUT .... SS=DROP
;
$PROB  EHC using MTIME for the flag

$INPUT      ID DOSE=AMT TIME CP=DV WT SS=DROP II ADDL EVID
$DATA       mtimess.dat

$SUBROUTINES  ADVAN6 TOL=6
$MODEL COMP=(DEPOT,INITIALOFF,DEFDOSE) COMP=(CENTRAL,DEFOBS,NOOFF)
COMP=(PERIPH) COMP=(GALL )

$PK
; Save the value of II from the dose record.
   if (ii>0) inter=ii

   KA=THETA(1)*EXP(ETA(1))
   KE=THETA(2)*EXP(ETA(2))
   CL=THETA(3)*WT*EXP(ETA(3))
   S2=CL/KE/WT
   K41=THETA(4)*EXP(ETA(4))
   K23=THETA(5)*EXP(ETA(5))
   K32=THETA(6)*EXP(ETA(6))
   K1G=THETA(7)*EXP(ETA(7))

   if (newind<=1) then
   MTIME(1)=THETA(8)
   MTIME(2)=MTIME(1)+THETA(9)
   else
   mtime(1)=mtime(1)
   mtime(2)=mtime(2)
   endif

  ; Update mtime variables after mtime(2) is reached.
  ; New values are for the next dosing interval (TIME+II)
  IF (MNOW == 2) THEN
    MTIME(1) = MTIME(1)+inter
    MTIME(2) = MTIME(2)+inter
    MTDIFF=1
  ENDIF

$DES
   FLAG=MPAST(1)-MPAST(2)
   DADT(1)=-KA*A(1)+K41*A(4)*FLAG
   DADT(2)= KA*A(1)-KE*A(2)-K23*A(2)+K32*A(3)-K1G*A(2)
   DADT(3)= K23*A(2)-K32*A(3)
   DADT(4)= K1G*A(2)-K41*A(4)*FLAG

$ERROR
A1=A(1) ; for display in table
A2=A(2)
A3=A(3)
A4=A(4)
   Y=F+EPS(1)

$THETA 1 1 1
$THETA 10  ; rate of gall bladder emptying is large vs. other k's
$THETA 1 1 1
$THETA 3 5 ; start emptying at T+theta(8) ; lasts till T+theta(9)
$OMEGA 1 1 1 1 1 1 1
$SIGMA  .4

$TABLE TIME A1 A2 A3 A4 NOAPPEND FILE=mtimess.tab NOPRINT
