2018-08-20
오전 10:35
;Model Desc: Two compartment Model, Using ADVAN3, TRANS4
;Project Name: nm7examples
;Project ID: NO PROJECT DESCRIPTION

$PROB RUN# Example 8 (from samp5l)
$INPUT C SET ID JID TIME  DV=CONC AMT=DOSE RATE EVID MDV CMT
       CLX V1X QX V2X SDIX SDSX
$DATA example8.csv IGNORE=C
$SUBROUTINES ADVAN3 TRANS4

$PK
include nonmem_reserved_general
; Request extra information for Bayesian analysis.
; An extra call will then be made for accepted samples
BAYES_EXTRA_REQUEST=1
MU_1=THETA(1)
MU_2=THETA(2)
MU_3=THETA(3)
MU_4=THETA(4)
CL=DEXP(MU_1+ETA(1))
V1=DEXP(MU_2+ETA(2))
Q=DEXP(MU_3+ETA(3))
V2=DEXP(MU_4+ETA(4))
S1=V1
; When Bayes_extra=1, then this particular set of individual
; parameters were "accepted" So you may record them if you wish
  IF(BAYES_EXTRA==1 .AND. ITER_REPORT>=0 .AND. TIME==0.0) THEN
"  WRITE(51,98) ITER_REPORT,ID,CL,V1,Q,V2
" 98 FORMAT(I12,1X,F14.0,4(1X,1PG12.5))
ENDIF

$ERROR
include nonmem_reserved_general
BAYES_EXTRA_REQUEST=1
Y = F + F*EPS(1)
IF(BAYES_EXTRA==1 .AND. ITER_REPORT>=0 ) THEN
" WRITE(52,97) ITER_REPORT,ID,TIME,F
" 97 FORMAT(I12,1X,F14.0,2(1X,1PG12.5))
ENDIF

; Initial values of THETA
$THETA
(2.0) ;[LN(CL)]
(2.0) ;[LN(V1)]
(2.0) ;[LN(Q)]
(2.0) ;[LN(V2)]
;INITIAL values of OMEGA
$OMEGA BLOCK(4)
0.15   ;[P]
0.01  ;[F]
0.15   ;[P]
0.01  ;[F]
0.01  ;[F]
0.15   ;[P]
0.01  ;[F]
0.01  ;[F]
0.01  ;[F]
0.15   ;[P]
;Initial value of SIGMA
$SIGMA
(0.6 )   ;[P]

$PRIOR NWPRI
; Prior information to the Thetas.
$THETAP (2.0 FIX)x4
$THETAPV BLOCK(4) FIX VALUES(10000.0,0.0)

; Prior information to the OMEGAS.
$OMEGAP BLOCK(4)
0.2 FIX
0.0  0.2
0.0  0.0 0.2
0.0  0.0 0.0 0.2
$OMEGAPD (4 FIX)

$EST METHOD=BAYES INTERACTION FILE=example8.ext NBURN=10000
     NITER=1000 PRINT=100 NOPRIOR=0 CTYPE=3 CINTERVAL=100

NM-TRAN MESSAGES
 AN ERROR WAS FOUND IN THE CONTROL STATEMENTS.
AN ERROR WAS FOUND ON LINE 13 AT THE APPROXIMATE POSITION NOTED:
 include nonmem_reserved_general
         X
 THE CHARACTERS IN ERROR ARE: nonmem_reserved_general
  171  ERROR OPENING INCLUDE FILE.
