Mon 09/30/2013
03:02 PM
; This example is discussed in Repetition_1 example (repeti1.exa)
; in the online help directory.
; It demonstrates the use of RPT_ and RPTON
; When data item RPT_=n and PRED sets rpto=-n with the same record,
; repeated calls are made to PRED using this one record.
; This is used to compute the factorial of the value in KRPT.
;
$PROB
$INPT ID TIME DV MDV RPT_ KRPT
$DATA repeatf.dat IGNORE=@
$PRED
   F=THETA(1)*EXP(ETA(1)) ; default value

   prdfl=1 ; required with RPT_
   IF (RPT_.EQ.1) RPTO=-1     ; tells NONMEM to repeat this record
   RPTON=KRPT                 ; tells how many times to repeat this record.
   last=0                     ; when last=1, this is the last call with repeated record
   IF (RPTI .EQ. 0) THEN      ; not a repeated call
    factorial=1
    count=0                   ; count calls with repeated records
   ELSE                       ; repeated call
    count=count+1             ; count calls with repeated records
    factorial=factorial*count
    IF (count == rpton) last=1  ; identify the last call with repeated record
   ENDIF
   IF (last==1) F=factorial*EXP(ETA(2))  ; prediction=KRPT! (factorial of KRPT)

  Y=F+EPS(1)

$THETA 2
$OMEGA .1 .1
$SIGMA .1
$TABLE RPT_ KRPT PRED NOAPPEND FILE=repeatf.tab

NM-TRAN MESSAGES
 WARNINGS AND ERRORS (IF ANY) FOR PROBLEM    1
 (WARNING  2) NM-TRAN INFERS THAT THE DATA ARE POPULATION.

1NONLINEAR MIXED EFFECTS MODEL PROGRAM (NONMEM) VERSION 7.3beta7.0(P)
 ORIGINALLY DEVELOPED BY STUART BEAL, LEWIS SHEINER, AND ALISON BOECKMANN
 CURRENT DEVELOPERS ARE ROBERT BAUER, ICON DEVELOPMENT SOLUTIONS,
 AND ALISON BOECKMANN. IMPLEMENTATION, EFFICIENCY, AND STANDARDIZATION
 PERFORMED BY NOUS INFOSYSTEMS.
 PROBLEM NO.:         1

 TOT. NO. OF OBS RECS:        8
 TOT. NO. OF INDIVIDUALS:      2
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 #TBLN:      1
 #METH: First Order (Evaluation)
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
 ********************                             FIRST ORDER (EVALUATION)                           ********************
 #OBJT:**************                       MINIMUM VALUE OF OBJECTIVE FUNCTION                      ********************
 #OBJV:********************************************      284.944       **************************************************

 ********************                             FIRST ORDER (EVALUATION)                           ********************
 ********************                             FINAL PARAMETER ESTIMATE                           ********************

 THETA - VECTOR OF FIXED EFFECTS PARAMETERS   *********
         TH 1
         2.00E+00

 OMEGA - COV MATRIX FOR RANDOM EFFECTS - ETAS  ********
            ETA1      ETA2
 ETA1
+        1.00E-01
 ETA2
+        0.00E+00  1.00E-01

 SIGMA - COV MATRIX FOR RANDOM EFFECTS - EPSILONS  ****
            EPS1
 EPS1
+        1.00E-01

 OMEGA - CORR MATRIX FOR RANDOM EFFECTS - ETAS  *******
            ETA1      ETA2
 ETA1
+        3.16E-01
 ETA2
+        0.00E+00  3.16E-01

 SIGMA - CORR MATRIX FOR RANDOM EFFECTS - EPSILONS  ***
            EPS1
 EPS1
+        3.16E-01
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 #CPUT: Total CPU Time in Seconds,        0.109
