Mon 09/30/2013
03:02 PM
$PROBLEM ODE MODEL

$INPUT ID TIME DV AMT CMT FLAG SDE MDV

$DATA   sde.csv
        IGNORE=@

;$MSFI runODE.msf NPOPETAS=3

$SUBROUTINE ADVAN13 TOL 6 OTHER=sde.f90

$MODEL COMP = (ABS);
       COMP = (CENTRAL);
       COMP = (DFDX1)
       COMP = (DFDX2)
       COMP = (DPDT11)
       COMP = (DPDT21)
       COMP = (DPDT22)
$PK

  TVCL  = THETA(1)
  CL    = TVCL*EXP(ETA(1))

  TVVD  = THETA(2)
  VD    = TVVD*EXP(ETA(2))

  THL  = THETA(3)
  HLA  = THL*EXP(ETA(3))

  KA = LOG(2)/HLA
  SGW3=THETA(5)

$DES
" FIRST
" REAL*8 SGW(2)
 DADT(1) = - KA*A(1)
 DADT(2) = KA*A(1) - CL/VD*A(2)
; NEXT DERIVATIVES ARE ACUALLY PREDICTIVE VALUES FOR COMPARTMENTS 1 AND 2, RESPECTIVELY
;  Derivatives of these with respect to A() will be calcualted symbolically by DES routine created by NMTRAN
 DADT(3) = A(1)
 DADT(4) = LOG((DABS(A(2))+1.0D-300)/VD)
; DUMMY PLACEMENT FOR DERIVATIVES OF THE STOCHASTIC ERROR SYSTEM.  THESE ARE FILLED OUT BY SDE_DER
" SGW(1)=0.0D+00
" SGW(2)=SGW3
;  the DA() array THEN contains all derivatives of DADT (=DXDT) with respect to A(=X).
; Number of compartments=2, number of base model derivative equations=2
"LAST
"      CALL SDE_DER(DADT,A,DA,IR,SGW,2.0d+00,2d+00)

$ERROR
     IF(ICALL.EQ.4) THEN
       IF(DV.NE.0) Y = LOG(DV)
       RETURN
     ENDIF
     IPRED = LOG((DABS(A(2))+1.0D-300)/VD)
     W     = THETA(4)
     IRES  = DV - IPRED
     IWRES = IRES/W
     WS=0.0
     IF(CMT==2 .OR. CMT==0) THEN
; CENTRAL COMPARTMENT, PLASMA LEVELS
; EPS(2) = USER MODEL ERROR CONTRIBUTION
; EPS(4) = STOCHASTIC ERROR CONTRIBUTION.  THE WS IS JUST A PLACEHOLDER COEFFICIENT.  SDE_CADD WILL REPLACE THIS
; WITH THE CORRECT VALUE
     Y     = IPRED+W*EPS(2) + WS*EPS(4)
     ENDIF
     IF(CMT==1 ) THEN
; ABSORPTION COMPARTMENT.  IN THIS PROBLEM, THERE ARE NO OBSERVED VALUES FOR ABSORPTION COMPARTMENT.
; BUT PUT THESE IN AS PLACE HOLDERS ANYWAY.
; EPS(1) = USER MODEL ERROR CONTRIBUTION
; EPS(3) = STOCHASTIC ERROR CONTRIBUTION
     Y     = IPRED+W*EPS(1) + WS*EPS(3)
     ENDIF
; SDE_CADD WILL EVALUATE THE TRUE COEFFICIENTS (WS) TO THE STOCHASTIC COMPONENTS.
; Number of compartments=2, number of base model derivative equations=2
"LAST
"       CALL SDE_CADD(A,HH,TIME,DV,CMT,2.0D+00,2.0D+00,SDE)

$THETA (0,22.0    )     ; 1  CL
$THETA (0,62.0    )     ; 2  VD
$THETA (0,35.0    )     ; 3  HLA
$THETA (0, 0.2     )     ; 4  PK PROP MEAS ERROR
$THETA (0, 1.0)          ; 5 SGW3

$OMEGA 0.1               ;1 CL
$OMEGA 0.1                ;2 VD
$OMEGA 0.1                ;3 HLA

$SIGMA 1 FIX               ; PK-ABSORPTION
$SIGMA 1 FIX               ; PK-CENTRAL
$SIGMA 1 FIX               ; PK-ABSORPTION, STOCHASTIC.
$SIGMA 1 FIX               ; PK-CENTRAL, STOCHASTIC.

$SIM(1)
$EST MAXEVAL=9999 METHOD=1 INTERACTION SIGDIGITS=3 PRINT=1 NOABORT MSFO=runODE.msf
;$COV

;$TABLE ID TIME FLAG AMT CMT IPRED IRES
;       ONEHEADER NOPRINT FILE=sdtabODE

;$TABLE ID CL VD HLA ETA1 ETA2 ETA3
;       ONEHEADER NOPRINT FILE=patabODE

NM-TRAN MESSAGES
 WARNINGS AND ERRORS (IF ANY) FOR PROBLEM    1
 (WARNING  2) NM-TRAN INFERS THAT THE DATA ARE POPULATION.
 (WARNING  3) THERE MAY BE AN ERROR IN THE ABBREVIATED CODE. THE FOLLOWING
 ONE OR MORE RANDOM VARIABLES ARE DEFINED WITH "IF" STATEMENTS THAT DO NOT
 PROVIDE DEFINITIONS FOR BOTH THE "THEN" AND "ELSE" CASES. IF ALL
 CONDITIONS FAIL, THE VALUES OF THESE VARIABLES WILL BE ZERO.
   Y
 (WARNING  26) THE DERIVATIVE OF THE ABSOLUTE VALUE OF A RANDOM VARIABLE IS
 BEING COMPUTED. IF THE ABSOLUTE VALUE AFFECTS THE VALUE OF THE OBJECTIVE
 FUNCTION, THE USER SHOULD ENSURE THAT THE RANDOM VARIABLE IS ALWAYS
 POSITIVE OR ALWAYS NEGATIVE.
 (WARNING  45) $DES: VALUES HAVE NOT BEEN ASSIGNED TO ALL DADT VARIABLES.
 UNUSED COMPARTMENTS SHOULD BE OFF.

1NONLINEAR MIXED EFFECTS MODEL PROGRAM (NONMEM) VERSION 7.3beta7.0(P)
 ORIGINALLY DEVELOPED BY STUART BEAL, LEWIS SHEINER, AND ALISON BOECKMANN
 CURRENT DEVELOPERS ARE ROBERT BAUER, ICON DEVELOPMENT SOLUTIONS,
 AND ALISON BOECKMANN. IMPLEMENTATION, EFFICIENCY, AND STANDARDIZATION
 PERFORMED BY NOUS INFOSYSTEMS.
 PROBLEM NO.:         1
 ODE MODEL
 TOT. NO. OF OBS RECS:      460
 TOT. NO. OF INDIVIDUALS:     20
 GENERAL NONLINEAR KINETICS MODEL USING LSODA (ADVAN13)
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 SIMULATION STEP PERFORMED
 #TBLN:      1
 #METH: First Order Conditional Estimation with Interaction
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
 #TERM:
0MINIMIZATION TERMINATED
 DUE TO ROUNDING ERRORS (ERROR=134)
 NO. OF FUNCTION EVALUATIONS USED:      367
 NO. OF SIG. DIGITS UNREPORTABLE
0PARAMETER ESTIMATE IS NEAR ITS BOUNDARY

 ETABAR IS THE ARITHMETIC MEAN OF THE ETA-ESTIMATES,
 AND THE P-VALUE IS GIVEN FOR THE NULL HYPOTHESIS THAT THE TRUE MEAN IS 0.

 ETABAR:        -2.5682E-06  1.9543E-02 -1.5026E-06
 SE:             3.1185E-05  3.8574E-02  1.5543E-05
 N:                      20          20          20

 P VAL.:         9.3436E-01  6.1240E-01  9.2298E-01

 ETAshrink(%):   9.5475E+01  4.7017E+01  9.7745E+01
 EBVshrink(%):   9.5020E+01  4.9361E+01  9.7168E+01
 EPSshrink(%):   1.0000E+02  5.9749E-01  1.0000E+02  5.9749E-01


 #TERE:
 Elapsed estimation time in seconds:   180.63

 ********************               FIRST ORDER CONDITIONAL ESTIMATION WITH INTERACTION              ********************
 #OBJT:**************                       MINIMUM VALUE OF OBJECTIVE FUNCTION                      ********************
 #OBJV:********************************************     -640.857       **************************************************

 ********************               FIRST ORDER CONDITIONAL ESTIMATION WITH INTERACTION              ********************
 ********************                             FINAL PARAMETER ESTIMATE                           ********************

 THETA - VECTOR OF FIXED EFFECTS PARAMETERS   *********
         TH 1      TH 2      TH 3      TH 4      TH 5
         1.68E+01  2.49E+01  6.64E+01  3.00E-01  1.00E-02

 OMEGA - COV MATRIX FOR RANDOM EFFECTS - ETAS  ********
            ETA1      ETA2      ETA3
 ETA1
+        1.00E-05
 ETA2
+        0.00E+00  1.12E-01
 ETA3
+        0.00E+00  0.00E+00  1.00E-05

 SIGMA - COV MATRIX FOR RANDOM EFFECTS - EPSILONS  ****
            EPS1      EPS2      EPS3      EPS4
 EPS1
+        1.00E+00
 EPS2
+        0.00E+00  1.00E+00
 EPS3
+        0.00E+00  0.00E+00  1.00E+00
 EPS4
+        0.00E+00  0.00E+00  0.00E+00  1.00E+00

 OMEGA - CORR MATRIX FOR RANDOM EFFECTS - ETAS  *******
            ETA1      ETA2      ETA3
 ETA1
+        3.16E-03
 ETA2
+        0.00E+00  3.34E-01
 ETA3
+        0.00E+00  0.00E+00  3.16E-03

 SIGMA - CORR MATRIX FOR RANDOM EFFECTS - EPSILONS  ***
            EPS1      EPS2      EPS3      EPS4
 EPS1
+        1.00E+00
 EPS2
+        0.00E+00  1.00E+00
 EPS3
+        0.00E+00  0.00E+00  1.00E+00
 EPS4
+        0.00E+00  0.00E+00  0.00E+00  1.00E+00
 #CPUT: Total CPU Time in Seconds,      179.713
