Mon 09/30/2013
02:51 PM
$PROBLEM PK ODE HANDS ON ONE

$INPUT ID TIME DV AMT CMT FLAG MDV SDE

$DATA   sde9.csv
        IGNORE=@

$SUBROUTINE ADVAN6 TOL=6 OTHER=sde.f90
$ABBR DECLARE SGW(3)

$MODEL
       COMP = (CENTRAL);
       COMP = (DFDX1)
       COMP = (DPDT11)

$PK
  IF(NEWIND.NE.2) OT = 0

  MU_1  = THETA(1)
  CL    = EXP(MU_1+ETA(1))
  MU_2  = THETA(2)
  VD    = EXP(MU_2+ETA(2))
  SGW1 = THETA(4)

$DES
 FIRSTEM=1
 DADT(1) = - CL/VD*A(1)
; NEXT DERIVATIVES ARE ACUALLY PREDICTIVE VALUES FOR COMPARTMENTS 1 AND 2, RESPECTIVELY
;  Derivatives of these with respect to A() will be calcualted symbolically by DES routine created by NMTRAN
 DADT(2) = A(1)/VD
; DUMMY PLACEMENT FOR DERIVATIVES OF THE STOCHASTIC ERROR SYSTEM.  THESE ARE FILLED OUT BY SDE_DER
 SGW(1)=SGW1
;  the DA() array THEN contains all derivatives of DADT (=DXDT) with respect to A(=X).
; Number of compartments=1, number of base model derivative equations=1
"LAST
"      CALL SDE_DER(DADT,A,DA,IR,SGW,1.0d+00,1.0d+00)

$ERROR (OBS ONLY)

     IPRED = A(1)/VD
     IRES  = DV - IPRED
     W     = THETA(3)
     IWRES = IRES/W
     WS=1000.0
; CENTRAL COMPARTMENT, PLASMA LEVELS
; EPS(1) = USER MODEL ERROR CONTRIBUTION
; EPS(2) = STOCHASTIC ERROR CONTRIBUTION.  THE WS IS JUST A PLACEHOLDER COEFFICIENT.  SDE_CADD WILL REPLACE THIS
; WITH THE CORRECT VALUE
     Y     = IPRED+W*EPS(1) + WS*EPS(2)
; SDE_CADD WILL EVALUATE THE TRUE COEFFICIENTS (WS) TO THE STOCHASTIC COMPONENTS.
; Number of compartments=1, number of base model derivative equations=1
"LAST
"       CALL SDE_CADD(A,HH,TIME,DV,CMT,1.0D+00,1.0D+00,SDE)

$THETA (0,2.3)               ;1 CL
$THETA (0,3.5)               ;2 VD
$THETA (0, 2)               ;4 SIGMA
$THETA (0,1) ; SGW1

$OMEGA 0.1                  ;1 CL
$OMEGA 0.01                 ;2 VD

$SIGMA (1 FIX) (1 FIX)               ; PK

$EST METHOD=ITS INTERACTION NOABORT PRINT=1 CTYPE=3 OPTMAP=1 ETADER=2 SIGLO=6 SIGL=6 MCETA=1
$EST METHOD=IMP INTERACTION NOABORT PRINT=1 IACCEPT=1.0 CTYPE=3 OPTMAP=0 ETADER=0 SIGLO=6 SIGL=6 MCETA=1 MAPITER=0
$EST MAXEVAL=9999 METHOD=1 INTER NOABORT NSIG=1 PRINT=1 MSFO=sde12.msf OPTMAP=1 ETADER=2 SIGLO=6 SIGL=6 MCETA=1 SLOW
$COV MATRIX=R UNCONDITIONAL TOL=9 SIGL=8 SIGLO=8

$TABLE ID TIME FLAG AMT CMT IPRED IRES IWRES
       ONEHEADER NOPRINT FILE=sde9.fit

NM-TRAN MESSAGES
 WARNINGS AND ERRORS (IF ANY) FOR PROBLEM    1
 (WARNING  2) NM-TRAN INFERS THAT THE DATA ARE POPULATION.
 (WARNING  45) $DES: VALUES HAVE NOT BEEN ASSIGNED TO ALL DADT VARIABLES.
 UNUSED COMPARTMENTS SHOULD BE OFF.

1NONLINEAR MIXED EFFECTS MODEL PROGRAM (NONMEM) VERSION 7.3beta7.0(P)
 ORIGINALLY DEVELOPED BY STUART BEAL, LEWIS SHEINER, AND ALISON BOECKMANN
 CURRENT DEVELOPERS ARE ROBERT BAUER, ICON DEVELOPMENT SOLUTIONS,
 AND ALISON BOECKMANN. IMPLEMENTATION, EFFICIENCY, AND STANDARDIZATION
 PERFORMED BY NOUS INFOSYSTEMS.
 PROBLEM NO.:         1
 PK ODE HANDS ON ONE
 TOT. NO. OF OBS RECS:      540
 TOT. NO. OF INDIVIDUALS:     30
 GENERAL NONLINEAR KINETICS MODEL (ADVAN6)
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 #TBLN:      1
 #METH: Iterative Two Stage
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
 #TERM:
 OPTIMIZATION WAS COMPLETED

 ETABAR IS THE ARITHMETIC MEAN OF THE ETA-ESTIMATES,
 AND THE P-VALUE IS GIVEN FOR THE NULL HYPOTHESIS THAT THE TRUE MEAN IS 0.

 ETABAR:        -1.0344E-04 -9.0475E-05
 SE:             4.4523E-02  6.1727E-02
 N:                      30          30

 P VAL.:         9.9815E-01  9.9883E-01

 ETAshrink(%):   1.0512E+01  1.6503E+00
 EBVshrink(%):   1.0562E+01  1.6662E+00
 EPSshrink(%):   4.7877E+00  4.7877E+00


 #TERE:
 Elapsed estimation time in seconds:    26.76
 Elapsed covariance time in seconds:     0.83

 ********************                               ITERATIVE TWO STAGE                              ********************
 #OBJT:**************                        FINAL VALUE OF OBJECTIVE FUNCTION                       ********************
 #OBJV:********************************************     1210.775       **************************************************

 ********************                               ITERATIVE TWO STAGE                              ********************
 ********************                             FINAL PARAMETER ESTIMATE                           ********************

 THETA - VECTOR OF FIXED EFFECTS PARAMETERS   *********
         TH 1      TH 2      TH 3      TH 4
         2.40E+00  3.48E+00  9.10E-01  5.31E+01

 OMEGA - COV MATRIX FOR RANDOM EFFECTS - ETAS  ********
            ETA1      ETA2
 ETA1
+        7.68E-02
 ETA2
+        0.00E+00  1.22E-01

 SIGMA - COV MATRIX FOR RANDOM EFFECTS - EPSILONS  ****
            EPS1      EPS2
 EPS1
+        1.00E+00
 EPS2
+        0.00E+00  1.00E+00

 OMEGA - CORR MATRIX FOR RANDOM EFFECTS - ETAS  *******
            ETA1      ETA2
 ETA1
+        2.77E-01
 ETA2
+        0.00E+00  3.50E-01

 SIGMA - CORR MATRIX FOR RANDOM EFFECTS - EPSILONS  ***
            EPS1      EPS2
 EPS1
+        1.00E+00
 EPS2
+        0.00E+00  1.00E+00

 ********************                               ITERATIVE TWO STAGE                              ********************
 ********************                          STANDARD ERROR OF ESTIMATE (S)                        ********************

 THETA - VECTOR OF FIXED EFFECTS PARAMETERS   *********
         TH 1      TH 2      TH 3      TH 4
         6.47E-02  8.45E-02  8.59E-02  4.28E+00

 OMEGA - COV MATRIX FOR RANDOM EFFECTS - ETAS  ********
            ETA1      ETA2
 ETA1
+        3.55E-02
 ETA2
+        0.00E+00  4.11E-02

 SIGMA - COV MATRIX FOR RANDOM EFFECTS - EPSILONS  ****
            EPS1      EPS2
 EPS1
+        0.00E+00
 EPS2
+        0.00E+00  0.00E+00

 OMEGA - CORR MATRIX FOR RANDOM EFFECTS - ETAS  *******
            ETA1      ETA2
 ETA1
+        6.41E-02
 ETA2
+       .........  5.87E-02

 SIGMA - CORR MATRIX FOR RANDOM EFFECTS - EPSILONS  ***
            EPS1      EPS2
 EPS1
+       .........
 EPS2
+       ......... .........

 ********************                               ITERATIVE TWO STAGE                              ********************
 ********************                        COVARIANCE MATRIX OF ESTIMATE (S)                       ********************

            TH 1      TH 2      TH 3      TH 4      OM11      OM12      OM22      SG11      SG12      SG22
 TH 1
+        4.18E-03
 TH 2
+        9.00E-04  7.14E-03
 TH 3
+       -1.36E-03  1.73E-03  7.39E-03
 TH 4
+        8.06E-02 -6.77E-02 -1.95E-01  1.83E+01
 OM11
+       -8.09E-04 -8.16E-04  5.74E-04 -2.65E-02  1.26E-03
 OM12
+       ......... ......... ......... ......... ......... .........
 OM22
+       -7.27E-05 -1.65E-03  5.55E-05  2.55E-02  1.14E-04  0.00E+00  1.69E-03
 SG11
+       ......... ......... ......... ......... ......... ......... ......... .........
 SG12
+       ......... ......... ......... ......... ......... ......... ......... ......... .........
 SG22
+       ......... ......... ......... ......... ......... ......... ......... ......... ......... .........

 ********************                               ITERATIVE TWO STAGE                              ********************
 ********************                        CORRELATION MATRIX OF ESTIMATE (S)                      ********************

            TH 1      TH 2      TH 3      TH 4      OM11      OM12      OM22      SG11      SG12      SG22
 TH 1
+        6.47E-02
 TH 2
+        1.65E-01  8.45E-02
 TH 3
+       -2.45E-01  2.38E-01  8.59E-02
 TH 4
+        2.91E-01 -1.87E-01 -5.29E-01  4.28E+00
 OM11
+       -3.52E-01 -2.72E-01  1.88E-01 -1.75E-01  3.55E-02
 OM12
+       ......... ......... ......... ......... ......... .........
 OM22
+       -2.74E-02 -4.77E-01  1.57E-02  1.45E-01  7.85E-02  0.00E+00  4.11E-02
 SG11
+       ......... ......... ......... ......... ......... ......... ......... .........
 SG12
+       ......... ......... ......... ......... ......... ......... ......... ......... .........
 SG22
+       ......... ......... ......... ......... ......... ......... ......... ......... ......... .........
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 #TBLN:      2
 #METH: Importance Sampling
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
 #TERM:
 OPTIMIZATION WAS COMPLETED

 ETABAR IS THE ARITHMETIC MEAN OF THE ETA-ESTIMATES,
 AND THE P-VALUE IS GIVEN FOR THE NULL HYPOTHESIS THAT THE TRUE MEAN IS 0.

 ETABAR:         9.2001E-04  1.4583E-03
 SE:             4.5230E-02  6.2053E-02
 N:                      30          30

 P VAL.:         9.8377E-01  9.8125E-01

 ETAshrink(%):   1.0455E+01  1.4797E+00
 EBVshrink(%):   1.0247E+01  1.6728E+00
 EPSshrink(%):   5.0417E+00  5.0417E+00


 #TERE:
 Elapsed estimation time in seconds:    65.96
 Elapsed covariance time in seconds:    32.37

 ********************                               IMPORTANCE SAMPLING                              ********************
 #OBJT:**************                        FINAL VALUE OF OBJECTIVE FUNCTION                       ********************
 #OBJV:********************************************     1210.652       **************************************************

 ********************                               IMPORTANCE SAMPLING                              ********************
 ********************                             FINAL PARAMETER ESTIMATE                           ********************

 THETA - VECTOR OF FIXED EFFECTS PARAMETERS   *********
         TH 1      TH 2      TH 3      TH 4
         2.38E+00  3.48E+00  9.08E-01  5.31E+01

 OMEGA - COV MATRIX FOR RANDOM EFFECTS - ETAS  ********
            ETA1      ETA2
 ETA1
+        7.92E-02
 ETA2
+        0.00E+00  1.23E-01

 SIGMA - COV MATRIX FOR RANDOM EFFECTS - EPSILONS  ****
            EPS1      EPS2
 EPS1
+        1.00E+00
 EPS2
+        0.00E+00  1.00E+00

 OMEGA - CORR MATRIX FOR RANDOM EFFECTS - ETAS  *******
            ETA1      ETA2
 ETA1
+        2.81E-01
 ETA2
+        0.00E+00  3.51E-01

 SIGMA - CORR MATRIX FOR RANDOM EFFECTS - EPSILONS  ***
            EPS1      EPS2
 EPS1
+        1.00E+00
 EPS2
+        0.00E+00  1.00E+00

 ********************                               IMPORTANCE SAMPLING                              ********************
 ********************                          STANDARD ERROR OF ESTIMATE (R)                        ********************

 THETA - VECTOR OF FIXED EFFECTS PARAMETERS   *********
         TH 1      TH 2      TH 3      TH 4
         5.75E-02  6.52E-02  7.88E-02  3.94E+00

 OMEGA - COV MATRIX FOR RANDOM EFFECTS - ETAS  ********
            ETA1      ETA2
 ETA1
+        2.64E-02
 ETA2
+        0.00E+00  3.59E-02

 SIGMA - COV MATRIX FOR RANDOM EFFECTS - EPSILONS  ****
            EPS1      EPS2
 EPS1
+        0.00E+00
 EPS2
+        0.00E+00  0.00E+00

 OMEGA - CORR MATRIX FOR RANDOM EFFECTS - ETAS  *******
            ETA1      ETA2
 ETA1
+        4.69E-02
 ETA2
+       .........  5.12E-02

 SIGMA - CORR MATRIX FOR RANDOM EFFECTS - EPSILONS  ***
            EPS1      EPS2
 EPS1
+       .........
 EPS2
+       ......... .........

 ********************                               IMPORTANCE SAMPLING                              ********************
 ********************                        COVARIANCE MATRIX OF ESTIMATE (R)                       ********************

            TH 1      TH 2      TH 3      TH 4      OM11      OM12      OM22      SG11      SG12      SG22
 TH 1
+        3.30E-03
 TH 2
+       -7.22E-05  4.25E-03
 TH 3
+       -1.98E-04  1.71E-05  6.21E-03
 TH 4
+        1.19E-02  6.05E-03 -2.06E-01  1.55E+01
 OM11
+       -1.09E-04 -2.49E-05  1.90E-04 -1.46E-02  6.97E-04
 OM12
+       ......... ......... ......... ......... ......... .........
 OM22
+       -2.28E-05 -5.39E-05  1.34E-04 -8.67E-03  1.02E-04  0.00E+00  1.29E-03
 SG11
+       ......... ......... ......... ......... ......... ......... ......... .........
 SG12
+       ......... ......... ......... ......... ......... ......... ......... ......... .........
 SG22
+       ......... ......... ......... ......... ......... ......... ......... ......... ......... .........

 ********************                               IMPORTANCE SAMPLING                              ********************
 ********************                        CORRELATION MATRIX OF ESTIMATE (R)                      ********************

            TH 1      TH 2      TH 3      TH 4      OM11      OM12      OM22      SG11      SG12      SG22
 TH 1
+        5.75E-02
 TH 2
+       -1.93E-02  6.52E-02
 TH 3
+       -4.38E-02  3.33E-03  7.88E-02
 TH 4
+        5.25E-02  2.35E-02 -6.62E-01  3.94E+00
 OM11
+       -7.17E-02 -1.44E-02  9.14E-02 -1.40E-01  2.64E-02
 OM12
+       ......... ......... ......... ......... ......... .........
 OM22
+       -1.10E-02 -2.30E-02  4.74E-02 -6.13E-02  1.07E-01  0.00E+00  3.59E-02
 SG11
+       ......... ......... ......... ......... ......... ......... ......... .........
 SG12
+       ......... ......... ......... ......... ......... ......... ......... ......... .........
 SG22
+       ......... ......... ......... ......... ......... ......... ......... ......... ......... .........
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 #TBLN:      3
 #METH: First Order Conditional Estimation with Interaction
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
 #TERM:
0MINIMIZATION SUCCESSFUL
 HOWEVER, PROBLEMS OCCURRED WITH THE MINIMIZATION.
 REGARD THE RESULTS OF THE ESTIMATION STEP CAREFULLY, AND ACCEPT THEM ONLY
 AFTER CHECKING THAT THE COVARIANCE STEP PRODUCES REASONABLE OUTPUT.
 NO. OF FUNCTION EVALUATIONS USED:      243
 NO. OF SIG. DIGITS IN FINAL EST.:  2.2

 ETABAR IS THE ARITHMETIC MEAN OF THE ETA-ESTIMATES,
 AND THE P-VALUE IS GIVEN FOR THE NULL HYPOTHESIS THAT THE TRUE MEAN IS 0.

 ETABAR:         8.6111E-03 -1.5024E-03
 SE:             4.4295E-02  6.1638E-02
 N:                      30          30

 P VAL.:         8.4586E-01  9.8055E-01

 ETAshrink(%):   9.9538E+00  2.0403E-01
 EBVshrink(%):   1.0849E+01  1.7218E+00
 EPSshrink(%):   4.8855E+00  4.8855E+00


 #TERE:
 Elapsed estimation time in seconds:   123.01
0R MATRIX ALGORITHMICALLY SINGULAR
 AND ALGORITHMICALLY NON-POSITIVE-SEMIDEFINITE
0COVARIANCE STEP ABORTED
 Elapsed covariance time in seconds:    61.12

 ********************               FIRST ORDER CONDITIONAL ESTIMATION WITH INTERACTION              ********************
 #OBJT:**************                       MINIMUM VALUE OF OBJECTIVE FUNCTION                      ********************
 #OBJV:********************************************     1210.729       **************************************************

 ********************               FIRST ORDER CONDITIONAL ESTIMATION WITH INTERACTION              ********************
 ********************                             FINAL PARAMETER ESTIMATE                           ********************

 THETA - VECTOR OF FIXED EFFECTS PARAMETERS   *********
         TH 1      TH 2      TH 3      TH 4
         2.39E+00  3.48E+00  9.08E-01  5.33E+01

 OMEGA - COV MATRIX FOR RANDOM EFFECTS - ETAS  ********
            ETA1      ETA2
 ETA1
+        7.51E-02
 ETA2
+        0.00E+00  1.18E-01

 SIGMA - COV MATRIX FOR RANDOM EFFECTS - EPSILONS  ****
            EPS1      EPS2
 EPS1
+        1.00E+00
 EPS2
+        0.00E+00  1.00E+00

 OMEGA - CORR MATRIX FOR RANDOM EFFECTS - ETAS  *******
            ETA1      ETA2
 ETA1
+        2.74E-01
 ETA2
+        0.00E+00  3.44E-01

 SIGMA - CORR MATRIX FOR RANDOM EFFECTS - EPSILONS  ***
            EPS1      EPS2
 EPS1
+        1.00E+00
 EPS2
+        0.00E+00  1.00E+00
 #CPUT: Total CPU Time in Seconds,      309.600
