Fri 09/06/2013
11:54 PM
; Control problem for sde system.  No SDE matters done.  From Chris Tornoe
$PROBLEM PK ODE HANDS ON ONE

$INPUT ID TIME DV AMT CMT FLAG

$DATA   sde6.csv
        IGNORE=@

$SUBROUTINE ADVAN6 TOL 10 DP

$MODEL
       COMP = (CENTRAL);

$PK
  IF(NEWIND.NE.2) OT = 0

  TVCL  = THETA(1)
  CL    = TVCL*EXP(ETA(1))

  TVVD  = THETA(2)
  VD    = TVVD*EXP(ETA(2))

$DES
 DADT(1) = - CL/VD*A(1) ;+SGW1

$ERROR

     IPRED = A(1)/VD
     IRES  = DV - IPRED
     W     = THETA(3)
     IWRES = IRES/W
     Y     = IPRED+W*EPS(1)

$THETA (0,10)               ;1 CL
$THETA (0,32)               ;2 VD
$THETA (0, 2)               ;4 SIGMA

$OMEGA 0.1                  ;1 CL
$OMEGA 0.01                 ;2 VD

$SIGMA 1 FIX                ; PK

$EST MAXEVAL=9999 METHOD=1 LAPLACE NUMERICAL SLOW INTER NOABORT SIGDIGITS=3 PRINT=1 MSFO=sde6.msf
$COV MATRIX=R

$TABLE ID TIME FLAG AMT CMT IPRED IRES IWRES
       ONEHEADER NOPRINT FILE=sde6.fit

NM-TRAN MESSAGES
 WARNINGS AND ERRORS (IF ANY) FOR PROBLEM    1
 (WARNING  2) NM-TRAN INFERS THAT THE DATA ARE POPULATION.

1NONLINEAR MIXED EFFECTS MODEL PROGRAM (NONMEM) VERSION 7.3beta7.0(N)
 ORIGINALLY DEVELOPED BY STUART BEAL, LEWIS SHEINER, AND ALISON BOECKMANN
 CURRENT DEVELOPERS ARE ROBERT BAUER, ICON DEVELOPMENT SOLUTIONS,
 AND ALISON BOECKMANN. IMPLEMENTATION, EFFICIENCY, AND STANDARDIZATION
 PERFORMED BY NOUS INFOSYSTEMS.
 PROBLEM NO.:         1
 PK ODE HANDS ON ONE
 TOT. NO. OF OBS RECS:      540
 TOT. NO. OF INDIVIDUALS:     30
 GENERAL NONLINEAR KINETICS MODEL (ADVAN6)
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 #TBLN:      1
 #METH: Laplacian Conditional Estimation with Interaction
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
 #TERM:
0MINIMIZATION SUCCESSFUL
 NO. OF FUNCTION EVALUATIONS USED:      103
 NO. OF SIG. DIGITS IN FINAL EST.:  3.1

 ETABAR IS THE ARITHMETIC MEAN OF THE ETA-ESTIMATES,
 AND THE P-VALUE IS GIVEN FOR THE NULL HYPOTHESIS THAT THE TRUE MEAN IS 0.

 ETABAR:        -2.2962E-04 -3.5148E-03
 SE:             5.7272E-02  6.3132E-02
 N:                      30          30

 P VAL.:         9.9680E-01  9.5560E-01

 ETAshrink(%):   4.5268E-01  2.0259E-01
 EBVshrink(%):   1.5687E+00  1.5075E+00
 EPSshrink(%):   5.4770E+00


 #TERE:
 Elapsed estimation time in seconds:    14.44
 Elapsed covariance time in seconds:     5.62

 ********************                LAPLACIAN CONDITIONAL ESTIMATION WITH INTERACTION               ********************
 #OBJT:**************                       MINIMUM VALUE OF OBJECTIVE FUNCTION                      ********************
 #OBJV:********************************************     1363.132       **************************************************

 ********************                LAPLACIAN CONDITIONAL ESTIMATION WITH INTERACTION               ********************
 ********************                             FINAL PARAMETER ESTIMATE                           ********************

 THETA - VECTOR OF FIXED EFFECTS PARAMETERS   *********
         TH 1      TH 2      TH 3
         1.07E+01  3.24E+01  1.75E+00

 OMEGA - COV MATRIX FOR RANDOM EFFECTS - ETAS  ********
            ETA1      ETA2
 ETA1
+        1.03E-01
 ETA2
+        0.00E+00  1.24E-01

 SIGMA - COV MATRIX FOR RANDOM EFFECTS - EPSILONS  ****
            EPS1
 EPS1
+        1.00E+00

 OMEGA - CORR MATRIX FOR RANDOM EFFECTS - ETAS  *******
            ETA1      ETA2
 ETA1
+        3.21E-01
 ETA2
+        0.00E+00  3.52E-01

 SIGMA - CORR MATRIX FOR RANDOM EFFECTS - EPSILONS  ***
            EPS1
 EPS1
+        1.00E+00

 ********************                LAPLACIAN CONDITIONAL ESTIMATION WITH INTERACTION               ********************
 ********************                            STANDARD ERROR OF ESTIMATE                          ********************

 THETA - VECTOR OF FIXED EFFECTS PARAMETERS   *********
         TH 1      TH 2      TH 3
         6.41E-01  2.10E+00  5.65E-02

 OMEGA - COV MATRIX FOR RANDOM EFFECTS - ETAS  ********
            ETA1      ETA2
 ETA1
+        2.64E-02
 ETA2
+       .........  3.33E-02

 SIGMA - COV MATRIX FOR RANDOM EFFECTS - EPSILONS  ****
            EPS1
 EPS1
+       .........

 OMEGA - CORR MATRIX FOR RANDOM EFFECTS - ETAS  *******
            ETA1      ETA2
 ETA1
+        4.12E-02
 ETA2
+       .........  4.73E-02

 SIGMA - CORR MATRIX FOR RANDOM EFFECTS - EPSILONS  ***
            EPS1
 EPS1
+       .........

 ********************                LAPLACIAN CONDITIONAL ESTIMATION WITH INTERACTION               ********************
 ********************                          COVARIANCE MATRIX OF ESTIMATE                         ********************

            TH 1      TH 2      TH 3      OM11      OM12      OM22      SG11
 TH 1
+        4.10E-01
 TH 2
+        5.83E-02  4.40E+00
 TH 3
+        2.10E-04  2.92E-03  3.19E-03
 OM11
+        2.31E-03  5.80E-03 -3.89E-05  6.98E-04
 OM12
+       ......... ......... ......... ......... .........
 OM22
+       -1.76E-04  8.60E-04 -2.39E-05  1.05E-05 .........  1.11E-03
 SG11
+       ......... ......... ......... ......... ......... ......... .........

 ********************                LAPLACIAN CONDITIONAL ESTIMATION WITH INTERACTION               ********************
 ********************                          CORRELATION MATRIX OF ESTIMATE                        ********************

            TH 1      TH 2      TH 3      OM11      OM12      OM22      SG11
 TH 1
+        6.41E-01
 TH 2
+        4.34E-02  2.10E+00
 TH 3
+        5.80E-03  2.46E-02  5.65E-02
 OM11
+        1.37E-01  1.05E-01 -2.61E-02  2.64E-02
 OM12
+       ......... ......... ......... ......... .........
 OM22
+       -8.25E-03  1.23E-02 -1.27E-02  1.19E-02 .........  3.33E-02
 SG11
+       ......... ......... ......... ......... ......... ......... .........
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 #CPUT: Total CPU Time in Seconds,       17.469
