Mon 09/30/2013
07:11 PM
$PROBLEM PK ODE HANDS ON ONE

$INPUT ID TIME DV AMT CMT FLAG MDV SDE

$DATA   sde9.csv
        IGNORE=@

$SUBROUTINE ADVAN6 TOL=9 DP OTHER=sde.f90

; nde=number of base equations, ncmt=number of observation compartments
$ABBR DECLARE SGW(3) ; need at least ncmt of these
$MODEL
       COMP = (CENTRAL); there are nde base states
       COMP = (DFDX1)  ; need ncmt observation compartments
       COMP = (DPDT11) ; Will need (nde+1)*nde/2 of these

$PK
  IF(NEWIND.NE.2) OT = 0

  MU_1  = THETA(1)
  CL    = EXP(MU_1+ETA(1))
  MU_2  = THETA(2)
  VD    = EXP(MU_2+ETA(2))
  SGW1 = THETA(4)

$DES
 FIRSTEM=1
 DADT(1) = - CL/VD*A(1)
; NEXT DERIVATIVES ARE ACUALLY PREDICTIVE VALUES FOR COMPARTMENTS 1 AND 2, RESPECTIVELY
;  Derivatives of these with respect to A() will be calcualted symbolically by DES routine created by NMTRAN
 DADT(2) = A(1)/VD
; DUMMY PLACEMENT FOR DERIVATIVES OF THE STOCHASTIC ERROR SYSTEM.  THESE ARE FILLED OUT BY SDE_DER
SGW(1)=SGW1
;  the DA() array THEN contains all derivatives of DADT (=DXDT) with respect to A(=X).
; number of base model derivative equations (nde)=1, Number of compartments (ncmt)=1.
; DA is a reserved array, dimensioned DA(IR,*)
"LAST
"      CALL SDE_DER(DADT,A,DA,IR,SGW,1.0d+00,1.0d+00)

$ERROR (OBS ONLY)

     IPRED = A(1)/VD
     IRES  = DV - IPRED
     W     = THETA(3)
     IWRES = IRES/W
     WS=1000.0
; CENTRAL COMPARTMENT, PLASMA LEVELS
; EPS(1) = USER MODEL ERROR CONTRIBUTION
; EPS(2) = STOCHASTIC ERROR CONTRIBUTION.  THE WS IS JUST A PLACEHOLDER COEFFICIENT.  SDE_CADD WILL REPLACE THIS
; WITH THE CORRECT VALUE
     Y     = IPRED+W*EPS(1) + WS*EPS(2)
; SDE_CADD WILL EVALUATE THE TRUE COEFFICIENTS (WS) TO THE STOCHASTIC COMPONENTS.
;  In general, if you have nmcmt observation compartments, then first ncmt EPS() will pertain to
; measurement error, and the second ncmt set of EPS() will pertain to stochastic errors.
;  This means you cannot have L2 type correlations, and prop+additive should be packaged into a single EPS().
;  For two obervations, you may have:
;  IF(CMT==1) THEN
;  IPRED=A(1)/V
;  W=SQRT(THETA((5)*THETA(5)*IPED*IPRED+THETA(6)*THETA(6))
;  Y=IPRED+W*EPS(1)+WS*EPS(3)
;  ENDIF
;  IF(CMT==2) THEN
;  IPRED=A(2)/V
;  W=SQRT(THETA((7)*THETA(7)*IPED*IPRED+THETA(8)*THETA(8))
;  Y=IPRED+W*EPS(2)+WS*EPS(4)
;  ENDIF

; Number of compartments=1, number of base model derivative equations=1
"LAST
"       CALL SDE_CADD(A,HH,TIME,DV,CMT,1.0D+00,1.0D+00,SDE)

$THETA (0,2.3)               ;1 CL
$THETA (0,3.5)               ;2 VD
$THETA (0, 2)               ;4 SIGMA
$THETA (0,1) ; SGW1

$OMEGA 0.1                  ;1 CL
$OMEGA 0.01                 ;2 VD

$SIGMA (1 FIX) (1 FIX)               ; PK

$EST METHOD=ITS INTERACTION LAPLACE NUMERICAL SLOW NOABORT PRINT=1 CTYPE=3 SIGL=5
$EST METHOD=IMP INTERACTION NOABORT SIGL=5 PRINT=1 IACCEPT=1.0 CTYPE=3
$EST MAXEVAL=9999 METHOD=1 LAPLACE INTER NOABORT NUMERICAL SLOW NSIG=3 PRINT=1 MSFO=sde9.msf SIGL=9
$COV MATRIX=R UNCONDITIONAL

$TABLE ID TIME FLAG AMT CMT IPRED IRES IWRES
       ONEHEADER NOPRINT FILE=sde9.fit

NM-TRAN MESSAGES
 WARNINGS AND ERRORS (IF ANY) FOR PROBLEM    1
 (WARNING  2) NM-TRAN INFERS THAT THE DATA ARE POPULATION.
 (WARNING  45) $DES: VALUES HAVE NOT BEEN ASSIGNED TO ALL DADT VARIABLES.
 UNUSED COMPARTMENTS SHOULD BE OFF.

1NONLINEAR MIXED EFFECTS MODEL PROGRAM (NONMEM) VERSION 7.3beta7.0(P)
 ORIGINALLY DEVELOPED BY STUART BEAL, LEWIS SHEINER, AND ALISON BOECKMANN
 CURRENT DEVELOPERS ARE ROBERT BAUER, ICON DEVELOPMENT SOLUTIONS,
 AND ALISON BOECKMANN. IMPLEMENTATION, EFFICIENCY, AND STANDARDIZATION
 PERFORMED BY NOUS INFOSYSTEMS.
 PROBLEM NO.:         1
 PK ODE HANDS ON ONE
 TOT. NO. OF OBS RECS:      540
 TOT. NO. OF INDIVIDUALS:     30
 GENERAL NONLINEAR KINETICS MODEL (ADVAN6)
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 #TBLN:      1
 #METH: Iterative Two Stage
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
 #TERM:
 OPTIMIZATION WAS COMPLETED

 ETABAR IS THE ARITHMETIC MEAN OF THE ETA-ESTIMATES,
 AND THE P-VALUE IS GIVEN FOR THE NULL HYPOTHESIS THAT THE TRUE MEAN IS 0.

 ETABAR:        -2.9322E-03  3.9718E-04
 SE:             4.7980E-02  6.1953E-02
 N:                      30          30

 P VAL.:         9.5127E-01  9.9488E-01

 ETAshrink(%):   3.5824E+00  1.8821E+00
 EBVshrink(%):   4.2562E+00  1.7233E+00
 EPSshrink(%):   1.0000E-10  1.0000E-10


 #TERE:
 Elapsed estimation time in seconds:    20.51
 Elapsed covariance time in seconds:     0.07

 ********************                               ITERATIVE TWO STAGE                              ********************
 #OBJT:**************                        FINAL VALUE OF OBJECTIVE FUNCTION                       ********************
 #OBJV:********************************************     1253.058       **************************************************

 ********************                               ITERATIVE TWO STAGE                              ********************
 ********************                             FINAL PARAMETER ESTIMATE                           ********************

 THETA - VECTOR OF FIXED EFFECTS PARAMETERS   *********
         TH 1      TH 2      TH 3      TH 4
         2.40E+00  3.47E+00  1.03E+00  5.05E+01

 OMEGA - COV MATRIX FOR RANDOM EFFECTS - ETAS  ********
            ETA1      ETA2
 ETA1
+        7.69E-02
 ETA2
+        0.00E+00  1.24E-01

 SIGMA - COV MATRIX FOR RANDOM EFFECTS - EPSILONS  ****
            EPS1      EPS2
 EPS1
+        1.00E+00
 EPS2
+        0.00E+00  1.00E+00

 OMEGA - CORR MATRIX FOR RANDOM EFFECTS - ETAS  *******
            ETA1      ETA2
 ETA1
+        2.77E-01
 ETA2
+        0.00E+00  3.52E-01

 SIGMA - CORR MATRIX FOR RANDOM EFFECTS - EPSILONS  ***
            EPS1      EPS2
 EPS1
+        1.00E+00
 EPS2
+        0.00E+00  1.00E+00

 ********************                               ITERATIVE TWO STAGE                              ********************
 ********************                          STANDARD ERROR OF ESTIMATE (S)                        ********************

 THETA - VECTOR OF FIXED EFFECTS PARAMETERS   *********
         TH 1      TH 2      TH 3      TH 4
         5.85E-02  7.84E-02  7.50E-02  3.28E+00

 OMEGA - COV MATRIX FOR RANDOM EFFECTS - ETAS  ********
            ETA1      ETA2
 ETA1
+        2.72E-02
 ETA2
+        0.00E+00  3.90E-02

 SIGMA - COV MATRIX FOR RANDOM EFFECTS - EPSILONS  ****
            EPS1      EPS2
 EPS1
+        0.00E+00
 EPS2
+        0.00E+00  0.00E+00

 OMEGA - CORR MATRIX FOR RANDOM EFFECTS - ETAS  *******
            ETA1      ETA2
 ETA1
+        4.91E-02
 ETA2
+       .........  5.54E-02

 SIGMA - CORR MATRIX FOR RANDOM EFFECTS - EPSILONS  ***
            EPS1      EPS2
 EPS1
+       .........
 EPS2
+       ......... .........

 ********************                               ITERATIVE TWO STAGE                              ********************
 ********************                        COVARIANCE MATRIX OF ESTIMATE (S)                       ********************

            TH 1      TH 2      TH 3      TH 4      OM11      OM12      OM22      SG11      SG12      SG22
 TH 1
+        3.42E-03
 TH 2
+        8.56E-04  6.14E-03
 TH 3
+       -9.86E-04  1.27E-03  5.62E-03
 TH 4
+        4.50E-02 -3.91E-02 -1.65E-01  1.07E+01
 OM11
+       -4.65E-04 -3.41E-04  3.99E-04 -8.89E-03  7.41E-04
 OM12
+       ......... ......... ......... ......... ......... .........
 OM22
+       -2.37E-04 -1.19E-03  2.64E-04  6.89E-03  7.64E-05  0.00E+00  1.52E-03
 SG11
+       ......... ......... ......... ......... ......... ......... ......... .........
 SG12
+       ......... ......... ......... ......... ......... ......... ......... ......... .........
 SG22
+       ......... ......... ......... ......... ......... ......... ......... ......... ......... .........

 ********************                               ITERATIVE TWO STAGE                              ********************
 ********************                        CORRELATION MATRIX OF ESTIMATE (S)                      ********************

            TH 1      TH 2      TH 3      TH 4      OM11      OM12      OM22      SG11      SG12      SG22
 TH 1
+        5.85E-02
 TH 2
+        1.87E-01  7.84E-02
 TH 3
+       -2.25E-01  2.16E-01  7.50E-02
 TH 4
+        2.35E-01 -1.52E-01 -6.70E-01  3.28E+00
 OM11
+       -2.92E-01 -1.60E-01  1.96E-01 -9.97E-02  2.72E-02
 OM12
+       ......... ......... ......... ......... ......... .........
 OM22
+       -1.04E-01 -3.90E-01  9.04E-02  5.40E-02  7.21E-02  0.00E+00  3.90E-02
 SG11
+       ......... ......... ......... ......... ......... ......... ......... .........
 SG12
+       ......... ......... ......... ......... ......... ......... ......... ......... .........
 SG22
+       ......... ......... ......... ......... ......... ......... ......... ......... ......... .........
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 #TBLN:      2
 #METH: Importance Sampling
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
 #TERM:
 OPTIMIZATION WAS COMPLETED

 ETABAR IS THE ARITHMETIC MEAN OF THE ETA-ESTIMATES,
 AND THE P-VALUE IS GIVEN FOR THE NULL HYPOTHESIS THAT THE TRUE MEAN IS 0.

 ETABAR:         9.1845E-04  1.4574E-03
 SE:             4.5260E-02  6.2060E-02
 N:                      30          30

 P VAL.:         9.8381E-01  9.8126E-01

 ETAshrink(%):   1.0428E+01  1.4769E+00
 EBVshrink(%):   1.0221E+01  1.6700E+00
 EPSshrink(%):   4.9730E+00  4.9730E+00


 #TERE:
 Elapsed estimation time in seconds:    90.23
 Elapsed covariance time in seconds:    25.69

 ********************                               IMPORTANCE SAMPLING                              ********************
 #OBJT:**************                        FINAL VALUE OF OBJECTIVE FUNCTION                       ********************
 #OBJV:********************************************     1210.653       **************************************************

 ********************                               IMPORTANCE SAMPLING                              ********************
 ********************                             FINAL PARAMETER ESTIMATE                           ********************

 THETA - VECTOR OF FIXED EFFECTS PARAMETERS   *********
         TH 1      TH 2      TH 3      TH 4
         2.38E+00  3.48E+00  9.08E-01  5.30E+01

 OMEGA - COV MATRIX FOR RANDOM EFFECTS - ETAS  ********
            ETA1      ETA2
 ETA1
+        7.92E-02
 ETA2
+        0.00E+00  1.23E-01

 SIGMA - COV MATRIX FOR RANDOM EFFECTS - EPSILONS  ****
            EPS1      EPS2
 EPS1
+        1.00E+00
 EPS2
+        0.00E+00  1.00E+00

 OMEGA - CORR MATRIX FOR RANDOM EFFECTS - ETAS  *******
            ETA1      ETA2
 ETA1
+        2.81E-01
 ETA2
+        0.00E+00  3.51E-01

 SIGMA - CORR MATRIX FOR RANDOM EFFECTS - EPSILONS  ***
            EPS1      EPS2
 EPS1
+        1.00E+00
 EPS2
+        0.00E+00  1.00E+00

 ********************                               IMPORTANCE SAMPLING                              ********************
 ********************                          STANDARD ERROR OF ESTIMATE (R)                        ********************

 THETA - VECTOR OF FIXED EFFECTS PARAMETERS   *********
         TH 1      TH 2      TH 3      TH 4
         5.75E-02  6.52E-02  7.87E-02  3.91E+00

 OMEGA - COV MATRIX FOR RANDOM EFFECTS - ETAS  ********
            ETA1      ETA2
 ETA1
+        2.64E-02
 ETA2
+        0.00E+00  3.59E-02

 SIGMA - COV MATRIX FOR RANDOM EFFECTS - EPSILONS  ****
            EPS1      EPS2
 EPS1
+        0.00E+00
 EPS2
+        0.00E+00  0.00E+00

 OMEGA - CORR MATRIX FOR RANDOM EFFECTS - ETAS  *******
            ETA1      ETA2
 ETA1
+        4.69E-02
 ETA2
+       .........  5.12E-02

 SIGMA - CORR MATRIX FOR RANDOM EFFECTS - EPSILONS  ***
            EPS1      EPS2
 EPS1
+       .........
 EPS2
+       ......... .........

 ********************                               IMPORTANCE SAMPLING                              ********************
 ********************                        COVARIANCE MATRIX OF ESTIMATE (R)                       ********************

            TH 1      TH 2      TH 3      TH 4      OM11      OM12      OM22      SG11      SG12      SG22
 TH 1
+        3.30E-03
 TH 2
+       -7.23E-05  4.25E-03
 TH 3
+       -1.97E-04  1.82E-05  6.19E-03
 TH 4
+        1.17E-02  5.85E-03 -2.04E-01  1.53E+01
 OM11
+       -1.08E-04 -2.44E-05  1.89E-04 -1.39E-02  6.96E-04
 OM12
+       ......... ......... ......... ......... ......... .........
 OM22
+       -2.24E-05 -5.35E-05  1.33E-04 -8.04E-03  1.01E-04  0.00E+00  1.29E-03
 SG11
+       ......... ......... ......... ......... ......... ......... ......... .........
 SG12
+       ......... ......... ......... ......... ......... ......... ......... ......... .........
 SG22
+       ......... ......... ......... ......... ......... ......... ......... ......... ......... .........

 ********************                               IMPORTANCE SAMPLING                              ********************
 ********************                        CORRELATION MATRIX OF ESTIMATE (R)                      ********************

            TH 1      TH 2      TH 3      TH 4      OM11      OM12      OM22      SG11      SG12      SG22
 TH 1
+        5.75E-02
 TH 2
+       -1.93E-02  6.52E-02
 TH 3
+       -4.36E-02  3.55E-03  7.87E-02
 TH 4
+        5.20E-02  2.29E-02 -6.63E-01  3.91E+00
 OM11
+       -7.14E-02 -1.42E-02  9.10E-02 -1.35E-01  2.64E-02
 OM12
+       ......... ......... ......... ......... ......... .........
 OM22
+       -1.09E-02 -2.28E-02  4.72E-02 -5.73E-02  1.07E-01  0.00E+00  3.59E-02
 SG11
+       ......... ......... ......... ......... ......... ......... ......... .........
 SG12
+       ......... ......... ......... ......... ......... ......... ......... ......... .........
 SG22
+       ......... ......... ......... ......... ......... ......... ......... ......... ......... .........
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 #TBLN:      3
 #METH: Laplacian Conditional Estimation with Interaction
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
 #TERM:
0MINIMIZATION SUCCESSFUL
 HOWEVER, PROBLEMS OCCURRED WITH THE MINIMIZATION.
 REGARD THE RESULTS OF THE ESTIMATION STEP CAREFULLY, AND ACCEPT THEM ONLY
 AFTER CHECKING THAT THE COVARIANCE STEP PRODUCES REASONABLE OUTPUT.
 NO. OF FUNCTION EVALUATIONS USED:       78
 NO. OF SIG. DIGITS IN FINAL EST.:  3.3

 ETABAR IS THE ARITHMETIC MEAN OF THE ETA-ESTIMATES,
 AND THE P-VALUE IS GIVEN FOR THE NULL HYPOTHESIS THAT THE TRUE MEAN IS 0.

 ETABAR:        -2.2602E-02 -1.2133E-02
 SE:             4.7680E-02  6.1783E-02
 N:                      30          30

 P VAL.:         6.3548E-01  8.4431E-01

 ETAshrink(%):   6.5983E+00  9.5901E-01
 EBVshrink(%):   5.8915E+00  3.1448E+00
 EPSshrink(%):   1.0000E-10  1.0000E-10


 #TERE:
 Elapsed estimation time in seconds:    54.40

0PRED EXIT CODE = 1
0INDIVIDUAL NO.      17   ID= 1.70000000000000E+01   (WITHIN-INDIVIDUAL) DATA REC NO.   2
 THETA=
  2.43E+00   3.48E+00   9.31E-01   5.35E+01
 ETA=
  2.35E+01   4.34E-01
 OCCURS DURING SEARCH FOR ETA AT A NONZERO VALUE OF ETA
 NUMERICAL DIFFICULTIES WITH INTEGRATION ROUTINE.
 NO. OF REQUIRED SIGNIFICANT DIGITS IN SOLUTION VECTOR
 TO DIFFERENTIAL EQUATIONS,   9, MAY BE TOO LARGE.
0PROGRAM TERMINATED BY OBJ
 Elapsed covariance time in seconds:    23.49
 MESSAGE ISSUED FROM COVARIANCE STEP

 ********************                LAPLACIAN CONDITIONAL ESTIMATION WITH INTERACTION               ********************
 #OBJT:**************                       MINIMUM VALUE OF OBJECTIVE FUNCTION                      ********************
 #OBJV:********************************************     1248.852       **************************************************

 ********************                LAPLACIAN CONDITIONAL ESTIMATION WITH INTERACTION               ********************
 ********************                             FINAL PARAMETER ESTIMATE                           ********************

 THETA - VECTOR OF FIXED EFFECTS PARAMETERS   *********
         TH 1      TH 2      TH 3      TH 4
         2.43E+00  3.49E+00  9.31E-01  5.35E+01

 OMEGA - COV MATRIX FOR RANDOM EFFECTS - ETAS  ********
            ETA1      ETA2
 ETA1
+        8.09E-02
 ETA2
+        0.00E+00  1.21E-01

 SIGMA - COV MATRIX FOR RANDOM EFFECTS - EPSILONS  ****
            EPS1      EPS2
 EPS1
+        1.00E+00
 EPS2
+        0.00E+00  1.00E+00

 OMEGA - CORR MATRIX FOR RANDOM EFFECTS - ETAS  *******
            ETA1      ETA2
 ETA1
+        2.84E-01
 ETA2
+        0.00E+00  3.48E-01

 SIGMA - CORR MATRIX FOR RANDOM EFFECTS - EPSILONS  ***
            EPS1      EPS2
 EPS1
+        1.00E+00
 EPS2
+        0.00E+00  1.00E+00
 #CPUT: Total CPU Time in Seconds,      213.737
