Wed 08/26/2015
05:02 PM
; Used for comparing single versus parallel computing for FOCE method.
;$SIZES LVR=30
;$SIZES LTH=15
;$SIZES LIM1=100
$PROB RUN# Example 1 (from samp5l)
$INPUT C SET ID JID TIME  DV=CONC AMT=DOSE RATE EVID MDV CMT CLX V1X QX V2X SDIX SDSX
$DATA example1.csv IGNORE=C

$SUBROUTINES ADVAN3 TRANS4

$PK
MU_1=THETA(1)
MU_2=THETA(2)
MU_3=THETA(3)
MU_4=THETA(4)
CL=DEXP(MU_1+ETA(1))
V1=DEXP(MU_2+ETA(2))
Q=DEXP(MU_3+ETA(3))
V2=DEXP(MU_4+ETA(4))
S1=V1

LCL=LOG(CL)
LV1=LOG(V1)
LQ=LOG(Q)
LV2=LOG(V2)
RECNO=NDREC

$ERROR
IPRE=F
Y = F + F*EPS(1)

; Initial values of THETA
$THETA 2 2 2 2
;(0.001, 2.0) ;[LN(CL)]
;(0.001, 2.0) ;[LN(V1)]
;(0.001, 2.0) ;[LN(Q)]
;(0.001, 2.0) ;[LN(V2)]
;INITIAL values of OMEGA
$OMEGA BLOCK(4)
0.15   ;[P]
0.01  ;[F]
0.15   ;[P]
0.01  ;[F]
0.01  ;[F]
0.15   ;[P]
0.01  ;[F]
0.01  ;[F]
0.01  ;[F]
0.15   ;[P]
;Initial value of SIGMA
$SIGMA
(0.6 )   ;[P]

$EST METHOD=1 INTERACTION NSIG=3 PRINT=1 NOABORT  MAXEVAL=9999 SIGL=10  MCETA=10 ; FAST
$COV MATRIX=R PRINT=E UNCONDITIONAL
$TABLE ID RECNO TIME IPRE CL V1 Q V2 LCL LV1 LQ LV2 VARCALC=1 NOAPPEND NOPRINT FILE=setest.tab

NM-TRAN MESSAGES
 WARNINGS AND ERRORS (IF ANY) FOR PROBLEM    1
 (WARNING  2) NM-TRAN INFERS THAT THE DATA ARE POPULATION.

1NONLINEAR MIXED EFFECTS MODEL PROGRAM (NONMEM) VERSION 7.4.0 alpha8 (nm74a8)
 ORIGINALLY DEVELOPED BY STUART BEAL, LEWIS SHEINER, AND ALISON BOECKMANN
 CURRENT DEVELOPERS ARE ROBERT BAUER, ICON DEVELOPMENT SOLUTIONS,
 AND ALISON BOECKMANN. IMPLEMENTATION, EFFICIENCY, AND STANDARDIZATION
 PERFORMED BY NOUS INFOSYSTEMS.
 PROBLEM NO.:         1
 RUN# Example 1 (from samp5l)
 TOT. NO. OF OBS RECS:      500
 TOT. NO. OF INDIVIDUALS:    100
 TWO COMPARTMENT MODEL (ADVAN3)
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 #TBLN:      1
 #METH: First Order Conditional Estimation with Interaction
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
 #TERM:
0MINIMIZATION SUCCESSFUL
 NO. OF FUNCTION EVALUATIONS USED:      327
 NO. OF SIG. DIGITS IN FINAL EST.:  3.1

 ETABAR IS THE ARITHMETIC MEAN OF THE ETA-ESTIMATES,
 AND THE P-VALUE IS GIVEN FOR THE NULL HYPOTHESIS THAT THE TRUE MEAN IS 0.

 ETABAR:         1.4154E-05 -1.1905E-02 -3.4507E-03 -1.1554E-02
 SE:             3.9192E-02  2.8853E-02  3.2735E-02  3.3064E-02
 N:                     100         100         100         100

 P VAL.:         9.9971E-01  6.7989E-01  9.1605E-01  7.2674E-01

 ETAshrink(%):   3.0488E+00  2.0018E+01  2.4031E+01  1.4178E+01
 EBVshrink(%):   3.3159E+00  1.9857E+01  2.4449E+01  1.5062E+01
 EPSshrink(%):   3.0941E+01


 #TERE:
 Elapsed estimation  time in seconds:    10.95
 Elapsed covariance  time in seconds:     2.04
 Elapsed postprocess time in seconds:     0.20

 ********************               FIRST ORDER CONDITIONAL ESTIMATION WITH INTERACTION              ********************
 #OBJT:**************                       MINIMUM VALUE OF OBJECTIVE FUNCTION                      ********************
 #OBJV:********************************************    -1121.028       **************************************************

 ********************               FIRST ORDER CONDITIONAL ESTIMATION WITH INTERACTION              ********************
 ********************                             FINAL PARAMETER ESTIMATE                           ********************

 THETA - VECTOR OF FIXED EFFECTS PARAMETERS   *********
         TH 1      TH 2      TH 3      TH 4
         1.69E+00  1.61E+00  8.19E-01  2.39E+00

 OMEGA - COV MATRIX FOR RANDOM EFFECTS - ETAS  ********
         ETA1      ETA2      ETA3      ETA4
 ETA1
+        1.65E-01
 ETA2
+       -7.51E-04  1.31E-01
 ETA3
+        1.24E-02  1.59E-02  1.88E-01
 ETA4
+       -1.27E-02  1.39E-02  3.33E-02  1.50E-01

 SIGMA - COV MATRIX FOR RANDOM EFFECTS - EPSILONS  ****
         EPS1
 EPS1
+        5.72E-02

 OMEGA - CORR MATRIX FOR RANDOM EFFECTS - ETAS  *******
         ETA1      ETA2      ETA3      ETA4
 ETA1
+        4.06E-01
 ETA2
+       -5.10E-03  3.63E-01
 ETA3
+        7.05E-02  1.01E-01  4.33E-01
 ETA4
+       -8.10E-02  9.90E-02  1.98E-01  3.87E-01

 SIGMA - CORR MATRIX FOR RANDOM EFFECTS - EPSILONS  ***
         EPS1
 EPS1
+        2.39E-01

 ********************               FIRST ORDER CONDITIONAL ESTIMATION WITH INTERACTION              ********************
 ********************                            STANDARD ERROR OF ESTIMATE                          ********************

 THETA - VECTOR OF FIXED EFFECTS PARAMETERS   *********
         TH 1      TH 2      TH 3      TH 4
         4.32E-02  4.78E-02  7.04E-02  5.18E-02

 OMEGA - COV MATRIX FOR RANDOM EFFECTS - ETAS  ********
         ETA1      ETA2      ETA3      ETA4
 ETA1
+        2.71E-02
 ETA2
+        2.14E-02  3.15E-02
 ETA3
+        3.05E-02  3.54E-02  7.83E-02
 ETA4
+        2.39E-02  2.35E-02  4.62E-02  3.97E-02

 SIGMA - COV MATRIX FOR RANDOM EFFECTS - EPSILONS  ****
         EPS1
 EPS1
+        8.27E-03

 OMEGA - CORR MATRIX FOR RANDOM EFFECTS - ETAS  *******
         ETA1      ETA2      ETA3      ETA4
 ETA1
+        3.34E-02
 ETA2
+        1.46E-01  4.34E-02
 ETA3
+        1.65E-01  2.28E-01  9.04E-02
 ETA4
+        1.57E-01  1.63E-01  2.24E-01  5.13E-02

 SIGMA - CORR MATRIX FOR RANDOM EFFECTS - EPSILONS  ***
         EPS1
 EPS1
+        1.73E-02

 ********************               FIRST ORDER CONDITIONAL ESTIMATION WITH INTERACTION              ********************
 ********************                          COVARIANCE MATRIX OF ESTIMATE                         ********************

            TH 1      TH 2      TH 3      TH 4      OM11      OM12      OM13      OM14      OM22      OM23      OM24      OM33
             OM34      OM44      SG11
 TH 1
+        1.87E-03
 TH 2
+        2.46E-04  2.29E-03
 TH 3
+        5.79E-04  2.35E-04  4.96E-03
 TH 4
+        2.44E-04  3.27E-04  1.97E-03  2.68E-03
 OM11
+        7.37E-05  1.38E-04  2.01E-04  1.65E-04  7.35E-04
 OM12
+        7.91E-05  1.30E-04  2.61E-04  1.71E-04  1.39E-04  4.58E-04
 OM13
+        1.12E-04  1.87E-04  3.85E-05  2.14E-04  2.76E-04  1.59E-04  9.29E-04
 OM14
+        9.37E-05  1.32E-04  2.36E-04  2.14E-04  1.49E-04  1.46E-04  4.30E-04  5.71E-04
 OM22
+       -3.86E-06  3.71E-05 -2.48E-04 -7.22E-05  2.03E-05  9.69E-05  1.07E-04  6.76E-05  9.92E-04
 OM23
+        5.64E-05  9.62E-05  8.31E-04  2.48E-04  6.02E-05  1.69E-04 -5.94E-05  2.29E-05 -4.95E-05  1.25E-03
 OM24
+        3.11E-05 -1.40E-05  3.13E-04  1.84E-04  3.75E-05  5.74E-05  5.28E-05  9.99E-05  1.38E-04  3.36E-04  5.51E-04
 OM33
+        2.57E-04  1.73E-05  9.10E-04  6.96E-04  3.61E-04  3.56E-04  1.09E-03  6.81E-04  3.91E-04 -3.21E-06  2.50E-04  6.13E-03
 OM34
+        1.57E-04  6.72E-05  3.50E-04  3.11E-04  2.04E-04  2.11E-04  5.84E-04  4.53E-04  2.63E-04 -3.07E-05  2.21E-04  2.96E-03
          2.13E-03
 OM44
+        1.06E-04  1.38E-04  1.28E-04  2.23E-04  1.42E-04  1.48E-04  3.58E-04  2.95E-04  2.20E-04 -1.31E-05  2.50E-04  1.56E-03
          1.33E-03  1.58E-03
 SG11
+        5.84E-06  1.02E-05 -8.01E-06 -1.73E-05 -3.62E-05 -4.17E-05 -8.33E-05 -6.23E-05 -7.71E-05  1.68E-05 -2.55E-05 -3.75E-04
         -2.22E-04 -1.55E-04  6.84E-05

 ********************               FIRST ORDER CONDITIONAL ESTIMATION WITH INTERACTION              ********************
 ********************                          CORRELATION MATRIX OF ESTIMATE                        ********************

            TH 1      TH 2      TH 3      TH 4      OM11      OM12      OM13      OM14      OM22      OM23      OM24      OM33
             OM34      OM44      SG11
 TH 1
+        4.32E-02
 TH 2
+        1.19E-01  4.78E-02
 TH 3
+        1.90E-01  6.99E-02  7.04E-02
 TH 4
+        1.09E-01  1.32E-01  5.39E-01  5.18E-02
 OM11
+        6.29E-02  1.07E-01  1.05E-01  1.18E-01  2.71E-02
 OM12
+        8.55E-02  1.27E-01  1.73E-01  1.54E-01  2.40E-01  2.14E-02
 OM13
+        8.46E-02  1.28E-01  1.79E-02  1.36E-01  3.34E-01  2.43E-01  3.05E-02
 OM14
+        9.08E-02  1.16E-01  1.40E-01  1.73E-01  2.30E-01  2.85E-01  5.90E-01  2.39E-02
 OM22
+       -2.84E-03  2.46E-02 -1.12E-01 -4.43E-02  2.38E-02  1.44E-01  1.11E-01  8.99E-02  3.15E-02
 OM23
+        3.69E-02  5.68E-02  3.33E-01  1.35E-01  6.27E-02  2.23E-01 -5.50E-02  2.71E-02 -4.44E-02  3.54E-02
 OM24
+        3.06E-02 -1.25E-02  1.89E-01  1.51E-01  5.88E-02  1.14E-01  7.38E-02  1.78E-01  1.87E-01  4.04E-01  2.35E-02
 OM33
+        7.59E-02  4.63E-03  1.65E-01  1.72E-01  1.70E-01  2.13E-01  4.57E-01  3.64E-01  1.59E-01 -1.16E-03  1.36E-01  7.83E-02
 OM34
+        7.87E-02  3.05E-02  1.08E-01  1.30E-01  1.63E-01  2.13E-01  4.15E-01  4.11E-01  1.81E-01 -1.88E-02  2.04E-01  8.19E-01
          4.62E-02
 OM44
+        6.17E-02  7.27E-02  4.58E-02  1.08E-01  1.32E-01  1.74E-01  2.96E-01  3.10E-01  1.75E-01 -9.34E-03  2.68E-01  5.03E-01
          7.23E-01  3.97E-02
 SG11
+        1.63E-02  2.57E-02 -1.37E-02 -4.04E-02 -1.61E-01 -2.36E-01 -3.30E-01 -3.16E-01 -2.96E-01  5.73E-02 -1.31E-01 -5.80E-01
         -5.81E-01 -4.72E-01  8.27E-03
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
 ********************               FIRST ORDER CONDITIONAL ESTIMATION WITH INTERACTION              ********************
 ********************                      EIGENVALUES OF COR MATRIX OF ESTIMATE                     ********************

             1         2         3         4         5         6         7         8         9        10        11        12
             13        14        15
         1.19E-01  3.30E-01  3.88E-01  4.32E-01  4.59E-01  5.74E-01  7.53E-01  8.12E-01  8.66E-01  8.79E-01  1.00E+00  1.17E+00
          1.36E+00  1.94E+00  3.91E+00
 #CPUT: Total CPU Time in Seconds,        9.594
