Fri 06/26/2015
06:44 PM
; Used for comparing single versus parallel computing for FOCE method.
$PROB RUN# Example 1 (from samp5l)
$INPUT C SET ID JID TIME  DV=CONC AMT=DOSE RATE EVID MDV CMT CLX V1X QX V2X SDIX SDSX
$DATA example1b.csv IGNORE=C

$SUBROUTINES ADVAN3 TRANS4

$PK
MU_1=THETA(1)
MU_2=THETA(2)
MU_3=THETA(3)
MU_4=THETA(4)
CL=DEXP(MU_1+ETA(1))
V1=DEXP(MU_2+ETA(2))
Q=DEXP(MU_3+ETA(3))
V2=DEXP(MU_4+ETA(4))
S1=V1

$ERROR
Y = F + F*EPS(1)

; Initial values of THETA
$THETA
(0.001, 2.0) ;[LN(CL)]
(0.001, 2.0) ;[LN(V1)]
(0.001, 2.0) ;[LN(Q)]
(0.001, 2.0) ;[LN(V2)]
;INITIAL values of OMEGA
$OMEGA BLOCK(4)
0.15   ;[P]
0.01  ;[F]
0.15   ;[P]
0.01  ;[F]
0.01  ;[F]
0.15   ;[P]
0.01  ;[F]
0.01  ;[F]
0.01  ;[F]
0.15   ;[P]
;Initial value of SIGMA
$SIGMA
(0.6 )   ;[P]

$EST METHOD=1 INTERACTION NSIG=3 NOABORT MAXEVAL=9999  PRINT=1
$COV MATRIX=R PRINT=E UNCONDITIONAL SIRSAMPLE=1000
     SIRPRINT=100 IACCEPT=1.0 SIRDF=0.0 IACCEPTL=0.01 RANMETHOD=3
;     FILE=sirsample.sir format=,E13.6

NM-TRAN MESSAGES
 WARNINGS AND ERRORS (IF ANY) FOR PROBLEM    1
 (WARNING  2) NM-TRAN INFERS THAT THE DATA ARE POPULATION.

1NONLINEAR MIXED EFFECTS MODEL PROGRAM (NONMEM) VERSION 7.4.0 alpha7 (nm74a7)
 ORIGINALLY DEVELOPED BY STUART BEAL, LEWIS SHEINER, AND ALISON BOECKMANN
 CURRENT DEVELOPERS ARE ROBERT BAUER, ICON DEVELOPMENT SOLUTIONS,
 AND ALISON BOECKMANN. IMPLEMENTATION, EFFICIENCY, AND STANDARDIZATION
 PERFORMED BY NOUS INFOSYSTEMS.
 PROBLEM NO.:         1
 RUN# Example 1 (from samp5l)
 TOT. NO. OF OBS RECS:      500
 TOT. NO. OF INDIVIDUALS:    100
 TWO COMPARTMENT MODEL (ADVAN3)
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 #TBLN:      1
 #METH: First Order Conditional Estimation with Interaction
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
 #TERM:
0MINIMIZATION SUCCESSFUL
 NO. OF FUNCTION EVALUATIONS USED:      258
 NO. OF SIG. DIGITS IN FINAL EST.:  3.4

 ETABAR IS THE ARITHMETIC MEAN OF THE ETA-ESTIMATES,
 AND THE P-VALUE IS GIVEN FOR THE NULL HYPOTHESIS THAT THE TRUE MEAN IS 0.

 ETABAR:        -1.8270E-05 -1.1911E-02 -3.4822E-03 -1.1582E-02
 SE:             3.9192E-02  2.8850E-02  3.2737E-02  3.3063E-02
 N:                     100         100         100         100

 P VAL.:         9.9963E-01  6.7970E-01  9.1529E-01  7.2612E-01

 ETAshrink(%):   3.0460E+00  2.0021E+01  2.4030E+01  1.4177E+01
 EBVshrink(%):   3.3163E+00  1.9861E+01  2.4448E+01  1.5063E+01
 EPSshrink(%):   3.0942E+01


 #TERE:
 Elapsed estimation  time in seconds:     8.93
 Elapsed covariance  time in seconds:     2.99
 Elapsed postprocess time in seconds:     0.00

 ********************               FIRST ORDER CONDITIONAL ESTIMATION WITH INTERACTION              ********************
 #OBJT:**************                       MINIMUM VALUE OF OBJECTIVE FUNCTION                      ********************
 #OBJV:********************************************    -1121.028       **************************************************

 ********************               FIRST ORDER CONDITIONAL ESTIMATION WITH INTERACTION              ********************
 ********************                             FINAL PARAMETER ESTIMATE                           ********************

 THETA - VECTOR OF FIXED EFFECTS PARAMETERS   *********
         TH 1      TH 2      TH 3      TH 4
         1.69E+00  1.61E+00  8.20E-01  2.39E+00

 OMEGA - COV MATRIX FOR RANDOM EFFECTS - ETAS  ********
         ETA1      ETA2      ETA3      ETA4
 ETA1
+        1.65E-01
 ETA2
+       -7.44E-04  1.31E-01
 ETA3
+        1.24E-02  1.60E-02  1.88E-01
 ETA4
+       -1.27E-02  1.39E-02  3.33E-02  1.50E-01

 SIGMA - COV MATRIX FOR RANDOM EFFECTS - EPSILONS  ****
         EPS1
 EPS1
+        5.72E-02

 OMEGA - CORR MATRIX FOR RANDOM EFFECTS - ETAS  *******
         ETA1      ETA2      ETA3      ETA4
 ETA1
+        4.06E-01
 ETA2
+       -5.05E-03  3.63E-01
 ETA3
+        7.05E-02  1.02E-01  4.33E-01
 ETA4
+       -8.10E-02  9.91E-02  1.98E-01  3.87E-01

 SIGMA - CORR MATRIX FOR RANDOM EFFECTS - EPSILONS  ***
         EPS1
 EPS1
+        2.39E-01

 ********************               FIRST ORDER CONDITIONAL ESTIMATION WITH INTERACTION              ********************
 ********************                            STANDARD ERROR OF ESTIMATE                          ********************

 THETA - VECTOR OF FIXED EFFECTS PARAMETERS   *********
         TH 1      TH 2      TH 3      TH 4
         4.31E-02  4.77E-02  7.04E-02  5.17E-02

 OMEGA - COV MATRIX FOR RANDOM EFFECTS - ETAS  ********
         ETA1      ETA2      ETA3      ETA4
 ETA1
+        2.71E-02
 ETA2
+        2.14E-02  3.15E-02
 ETA3
+        3.05E-02  3.54E-02  7.83E-02
 ETA4
+        2.39E-02  2.35E-02  4.62E-02  3.98E-02

 SIGMA - COV MATRIX FOR RANDOM EFFECTS - EPSILONS  ****
         EPS1
 EPS1
+        8.28E-03

 OMEGA - CORR MATRIX FOR RANDOM EFFECTS - ETAS  *******
         ETA1      ETA2      ETA3      ETA4
 ETA1
+        3.34E-02
 ETA2
+        1.45E-01  4.35E-02
 ETA3
+        1.65E-01  2.28E-01  9.04E-02
 ETA4
+        1.57E-01  1.63E-01  2.24E-01  5.14E-02

 SIGMA - CORR MATRIX FOR RANDOM EFFECTS - EPSILONS  ***
         EPS1
 EPS1
+        1.73E-02

 ********************               FIRST ORDER CONDITIONAL ESTIMATION WITH INTERACTION              ********************
 ********************                          COVARIANCE MATRIX OF ESTIMATE                         ********************

            TH 1      TH 2      TH 3      TH 4      OM11      OM12      OM13      OM14      OM22      OM23      OM24      OM33
             OM34      OM44      SG11
 TH 1
+        1.86E-03
 TH 2
+        2.41E-04  2.28E-03
 TH 3
+        5.75E-04  2.32E-04  4.96E-03
 TH 4
+        2.43E-04  3.25E-04  1.96E-03  2.68E-03
 OM11
+        7.35E-05  1.38E-04  2.00E-04  1.65E-04  7.35E-04
 OM12
+        7.87E-05  1.30E-04  2.60E-04  1.71E-04  1.39E-04  4.58E-04
 OM13
+        1.11E-04  1.86E-04  3.74E-05  2.14E-04  2.76E-04  1.59E-04  9.30E-04
 OM14
+        9.34E-05  1.31E-04  2.35E-04  2.14E-04  1.49E-04  1.46E-04  4.30E-04  5.71E-04
 OM22
+       -3.73E-06  3.69E-05 -2.49E-04 -7.25E-05  2.04E-05  9.70E-05  1.07E-04  6.80E-05  9.93E-04
 OM23
+        5.58E-05  9.56E-05  8.30E-04  2.47E-04  5.93E-05  1.68E-04 -6.13E-05  2.13E-05 -5.17E-05  1.25E-03
 OM24
+        3.10E-05 -1.41E-05  3.13E-04  1.83E-04  3.71E-05  5.69E-05  5.21E-05  9.95E-05  1.38E-04  3.35E-04  5.51E-04
 OM33
+        2.56E-04  1.54E-05  9.04E-04  6.94E-04  3.62E-04  3.56E-04  1.09E-03  6.83E-04  3.93E-04 -1.26E-05  2.47E-04  6.14E-03
 OM34
+        1.57E-04  6.59E-05  3.47E-04  3.10E-04  2.04E-04  2.11E-04  5.86E-04  4.55E-04  2.65E-04 -3.65E-05  2.20E-04  2.97E-03
          2.14E-03
 OM44
+        1.06E-04  1.37E-04  1.26E-04  2.23E-04  1.42E-04  1.48E-04  3.59E-04  2.96E-04  2.21E-04 -1.73E-05  2.49E-04  1.57E-03
          1.33E-03  1.58E-03
 SG11
+        5.69E-06  1.03E-05 -7.12E-06 -1.70E-05 -3.61E-05 -4.16E-05 -8.33E-05 -6.25E-05 -7.73E-05  1.84E-05 -2.50E-05 -3.76E-04
         -2.23E-04 -1.56E-04  6.86E-05

 ********************               FIRST ORDER CONDITIONAL ESTIMATION WITH INTERACTION              ********************
 ********************                          CORRELATION MATRIX OF ESTIMATE                        ********************

            TH 1      TH 2      TH 3      TH 4      OM11      OM12      OM13      OM14      OM22      OM23      OM24      OM33
             OM34      OM44      SG11
 TH 1
+        4.31E-02
 TH 2
+        1.17E-01  4.77E-02
 TH 3
+        1.89E-01  6.90E-02  7.04E-02
 TH 4
+        1.09E-01  1.32E-01  5.39E-01  5.17E-02
 OM11
+        6.28E-02  1.06E-01  1.05E-01  1.18E-01  2.71E-02
 OM12
+        8.53E-02  1.27E-01  1.72E-01  1.54E-01  2.40E-01  2.14E-02
 OM13
+        8.46E-02  1.28E-01  1.74E-02  1.36E-01  3.34E-01  2.44E-01  3.05E-02
 OM14
+        9.06E-02  1.15E-01  1.40E-01  1.73E-01  2.30E-01  2.85E-01  5.90E-01  2.39E-02
 OM22
+       -2.74E-03  2.45E-02 -1.12E-01 -4.44E-02  2.38E-02  1.44E-01  1.11E-01  9.03E-02  3.15E-02
 OM23
+        3.65E-02  5.66E-02  3.33E-01  1.35E-01  6.17E-02  2.21E-01 -5.68E-02  2.51E-02 -4.63E-02  3.54E-02
 OM24
+        3.06E-02 -1.26E-02  1.89E-01  1.51E-01  5.83E-02  1.13E-01  7.28E-02  1.77E-01  1.87E-01  4.03E-01  2.35E-02
 OM33
+        7.59E-02  4.13E-03  1.64E-01  1.71E-01  1.70E-01  2.12E-01  4.58E-01  3.65E-01  1.59E-01 -4.53E-03  1.34E-01  7.83E-02
 OM34
+        7.86E-02  2.99E-02  1.06E-01  1.30E-01  1.63E-01  2.13E-01  4.15E-01  4.12E-01  1.82E-01 -2.23E-02  2.02E-01  8.20E-01
          4.62E-02
 OM44
+        6.16E-02  7.21E-02  4.49E-02  1.08E-01  1.32E-01  1.74E-01  2.96E-01  3.11E-01  1.76E-01 -1.23E-02  2.67E-01  5.04E-01
          7.23E-01  3.98E-02
 SG11
+        1.59E-02  2.62E-02 -1.22E-02 -3.96E-02 -1.61E-01 -2.35E-01 -3.30E-01 -3.16E-01 -2.96E-01  6.27E-02 -1.29E-01 -5.80E-01
         -5.82E-01 -4.73E-01  8.28E-03
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
 ********************               FIRST ORDER CONDITIONAL ESTIMATION WITH INTERACTION              ********************
 ********************                      EIGENVALUES OF COR MATRIX OF ESTIMATE                     ********************

             1         2         3         4         5         6         7         8         9        10        11        12
             13        14        15
         1.19E-01  3.30E-01  3.88E-01  4.32E-01  4.58E-01  5.73E-01  7.53E-01  8.11E-01  8.67E-01  8.80E-01  1.00E+00  1.17E+00
          1.36E+00  1.94E+00  3.91E+00
 #TBLN:      2
 #METH: Importance Sampling of Variance-Covariance (SIR)
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
 #TERM:
 STATISTICAL PORTION WAS COMPLETED

 #TERE:
 Elapsed estimation  time in seconds:    24.85
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 #OBJV:********************************************        0.769       **************************************************
 #OBJS:********************************************        3.499 (STD) **************************************************

 ********************                 IMPORTANCE SAMPLING OF VARIANCE-COVARIANCE (SIR)               ********************
 ********************                             FINAL PARAMETER ESTIMATE                           ********************

 THETA - VECTOR OF FIXED EFFECTS PARAMETERS   *********
         TH 1      TH 2      TH 3      TH 4
         1.68E+00  1.61E+00  7.77E-01  2.38E+00

 OMEGA - COV MATRIX FOR RANDOM EFFECTS - ETAS  ********
         ETA1      ETA2      ETA3      ETA4
 ETA1
+        1.81E-01
 ETA2
+        1.07E-03  1.48E-01
 ETA3
+        3.17E-02  1.42E-02  2.51E-01
 ETA4
+       -1.08E-02  1.85E-02  5.20E-02  1.76E-01

 SIGMA - COV MATRIX FOR RANDOM EFFECTS - EPSILONS  ****
         EPS1
 EPS1
+        5.73E-02

 OMEGA - CORR MATRIX FOR RANDOM EFFECTS - ETAS  *******
         ETA1      ETA2      ETA3      ETA4
 ETA1
+        4.24E-01
 ETA2
+        1.65E-03  3.82E-01
 ETA3
+        1.18E-01  8.26E-02  4.90E-01
 ETA4
+       -7.01E-02  1.11E-01  2.13E-01  4.17E-01

 SIGMA - CORR MATRIX FOR RANDOM EFFECTS - EPSILONS  ***
         EPS1
 EPS1
+        2.39E-01

 ********************                 IMPORTANCE SAMPLING OF VARIANCE-COVARIANCE (SIR)               ********************
 ********************                STANDARD ERROR OF ESTIMATE (From Sample Variance)               ********************

 THETA - VECTOR OF FIXED EFFECTS PARAMETERS   *********
         TH 1      TH 2      TH 3      TH 4
         4.14E-02  4.33E-02  8.16E-02  5.27E-02

 OMEGA - COV MATRIX FOR RANDOM EFFECTS - ETAS  ********
         ETA1      ETA2      ETA3      ETA4
 ETA1
+        2.92E-02
 ETA2
+        2.18E-02  3.59E-02
 ETA3
+        5.48E-02  3.54E-02  1.01E-01
 ETA4
+        2.29E-02  2.52E-02  4.73E-02  4.02E-02

 SIGMA - COV MATRIX FOR RANDOM EFFECTS - EPSILONS  ****
         EPS1
 EPS1
+        8.01E-03

 OMEGA - CORR MATRIX FOR RANDOM EFFECTS - ETAS  *******
         ETA1      ETA2      ETA3      ETA4
 ETA1
+        3.44E-02
 ETA2
+        1.34E-01  4.76E-02
 ETA3
+        2.17E-01  2.05E-01  1.01E-01
 ETA4
+        1.37E-01  1.51E-01  1.88E-01  4.73E-02

 SIGMA - CORR MATRIX FOR RANDOM EFFECTS - EPSILONS  ***
         EPS1
 EPS1
+        1.66E-02

 ********************                 IMPORTANCE SAMPLING OF VARIANCE-COVARIANCE (SIR)               ********************
 ********************               COVARIANCE MATRIX OF ESTIMATE (From Sample Variance)             ********************

            TH 1      TH 2      TH 3      TH 4      OM11      OM12      OM13      OM14      OM22      OM23      OM24      OM33
             OM34      OM44      SG11
 TH 1
+        1.71E-03
 TH 2
+       -1.78E-06  1.87E-03
 TH 3
+        9.07E-04  2.00E-04  6.66E-03
 TH 4
+        5.76E-05  5.21E-04  2.47E-03  2.77E-03
 OM11
+       -7.37E-05  1.55E-04 -4.73E-04 -5.87E-05  8.50E-04
 OM12
+       -4.47E-07  1.45E-04 -2.90E-04 -5.09E-06  2.11E-04  4.77E-04
 OM13
+        4.87E-06  2.90E-05 -2.54E-03 -9.28E-04  6.02E-04  4.37E-04  3.00E-03
 OM14
+        6.43E-05  1.79E-04 -3.37E-04 -4.34E-05  1.60E-04  1.88E-04  6.44E-04  5.26E-04
 OM22
+        1.18E-04  2.54E-06 -5.81E-04 -3.88E-04  1.96E-04  6.77E-05  4.53E-04  6.22E-05  1.29E-03
 OM23
+        1.62E-04 -5.64E-05  9.32E-04  2.71E-04 -4.12E-05  3.91E-05 -2.50E-04 -1.03E-04 -1.17E-04  1.26E-03
 OM24
+        1.21E-04  4.20E-05  6.81E-05  7.59E-05  1.42E-05  4.82E-05  2.55E-04  8.80E-05  1.82E-04  3.30E-04  6.36E-04
 OM33
+       -3.42E-04  7.92E-05 -3.78E-03 -1.26E-03  7.63E-04  3.89E-04  3.83E-03  8.24E-04  6.36E-04 -6.63E-05  5.22E-04  1.01E-02
 OM34
+       -2.57E-04  2.03E-04 -9.82E-04 -2.73E-04  1.74E-04  3.61E-05  1.05E-03  3.59E-04  1.79E-04 -7.55E-05  1.94E-04  3.60E-03
          2.24E-03
 OM44
+       -9.16E-05  1.85E-04 -8.81E-04 -3.48E-04  1.41E-04  8.15E-05  8.23E-04  2.87E-04  2.82E-04 -6.29E-05  2.55E-04  2.07E-03
          1.40E-03  1.62E-03
 SG11
+       -1.86E-06  1.69E-06  1.91E-04  9.96E-05 -6.27E-05 -3.90E-05 -2.29E-04 -6.46E-05 -1.16E-04  2.02E-05 -3.49E-05 -4.86E-04
         -1.89E-04 -1.53E-04  6.42E-05

 ********************                 IMPORTANCE SAMPLING OF VARIANCE-COVARIANCE (SIR)               ********************
 ********************              CORRELATION MATRIX OF ESTIMATE (From Sample Variance)             ********************

            TH 1      TH 2      TH 3      TH 4      OM11      OM12      OM13      OM14      OM22      OM23      OM24      OM33
             OM34      OM44      SG11
 TH 1
+        4.14E-02
 TH 2
+       -9.96E-04  4.33E-02
 TH 3
+        2.69E-01  5.66E-02  8.16E-02
 TH 4
+        2.64E-02  2.29E-01  5.76E-01  5.27E-02
 OM11
+       -6.11E-02  1.23E-01 -1.99E-01 -3.82E-02  2.92E-02
 OM12
+       -4.94E-04  1.54E-01 -1.63E-01 -4.42E-03  3.31E-01  2.18E-02
 OM13
+        2.15E-03  1.23E-02 -5.69E-01 -3.22E-01  3.77E-01  3.65E-01  5.48E-02
 OM14
+        6.77E-02  1.80E-01 -1.80E-01 -3.60E-02  2.40E-01  3.75E-01  5.13E-01  2.29E-02
 OM22
+        7.96E-02  1.64E-03 -1.98E-01 -2.05E-01  1.87E-01  8.64E-02  2.30E-01  7.56E-02  3.59E-02
 OM23
+        1.11E-01 -3.68E-02  3.22E-01  1.45E-01 -3.99E-02  5.05E-02 -1.29E-01 -1.27E-01 -9.24E-02  3.54E-02
 OM24
+        1.16E-01  3.85E-02  3.31E-02  5.71E-02  1.93E-02  8.76E-02  1.85E-01  1.52E-01  2.01E-01  3.69E-01  2.52E-02
 OM33
+       -8.21E-02  1.82E-02 -4.60E-01 -2.38E-01  2.60E-01  1.77E-01  6.96E-01  3.58E-01  1.76E-01 -1.86E-02  2.06E-01  1.01E-01
 OM34
+       -1.31E-01  9.89E-02 -2.54E-01 -1.09E-01  1.26E-01  3.49E-02  4.04E-01  3.31E-01  1.05E-01 -4.50E-02  1.63E-01  7.56E-01
          4.73E-02
 OM44
+       -5.50E-02  1.06E-01 -2.68E-01 -1.64E-01  1.20E-01  9.27E-02  3.73E-01  3.11E-01  1.95E-01 -4.42E-02  2.51E-01  5.11E-01
          7.38E-01  4.02E-02
 SG11
+       -5.62E-03  4.87E-03  2.92E-01  2.36E-01 -2.69E-01 -2.23E-01 -5.22E-01 -3.52E-01 -4.05E-01  7.12E-02 -1.73E-01 -6.03E-01
         -4.99E-01 -4.74E-01  8.01E-03
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
 ********************                 IMPORTANCE SAMPLING OF VARIANCE-COVARIANCE (SIR)               ********************
 ********************           EIGENVALUES OF COR MATRIX OF ESTIMATE (From Sample Variance)         ********************

             1         2         3         4         5         6         7         8         9        10        11        12
             13        14        15
         9.89E-02  2.24E-01  2.87E-01  3.78E-01  4.72E-01  5.26E-01  6.08E-01  6.87E-01  8.00E-01  9.47E-01  1.04E+00  1.32E+00
          1.48E+00  1.81E+00  4.33E+00
 #CPUT: Total CPU Time in Seconds,       33.774
