Sun 09/04/2016
11:48 PM
$PROBLEM Stan model
$DATA full2.csv IGNORE=@
$INPUT DV TIME MDV EVID AMT CMT DRUG SARM ID

$THETAI
THETA(4:5)=LOG(EXP(THETAI(4:5))+1.0)
THETA(9:10)=LOG(EXP(THETAI(9:10))+1.0)

$THETAR
THETAR(4:5)=LOG(EXP(THETA(4:5))-1.0)
THETAR(9:10)=LOG(EXP(THETA(9:10))-1.0)

$PRED
include nonmem_reserved_general
MUFIRSTREC=1
OBJQUICK=2
ALPHAC=50.0
; MU REFERENCE NEEDED TO do Gibbs sampling
LALPHA0=THETA(1)
LALPHAS=THETA(2)
LKAPPA=THETA(3)
LEMAX1=THETA(4)
LEMAX2=THETA(5)
STIM=0.0
IF(SARM==2) STIM=LEMAX1
IF(SARM==3) STIM=LEMAX2
MU_1=LALPHA0
MU_2=(LKAPPA+LALPHAS)/2.0+STIM
MU_3=(LKAPPA-LALPHAS)/2.0
G0=ALPHAC*EXP(MU_1+ETA(1))
KIN=EXP(MU_2+ETA(2))
KOUT=EXP(MU_3+ETA(3))
ALPHA=KIN/KOUT
F=ALPHA+(G0-ALPHA)*EXP(-KOUT*TIME)
Y=F+EPS(1)

$THETA 0.01 4.0 -5.0 -1.1 -1.6

$OMEGA BLOCK(3) VALUES(0.5,0.001)

$SIGMA 25.0

$PRIOR NWPRI

$THETAP (0.0 FIXED) (3.738 FIXED) (-4.451 FIXED) (-1.386 FIXED) (-1.386 FIXED)

$THETAPV BLOCK(5)
0.0086529 FIXED
0.0 0.042795
0.0 0.0 0.125065
0.0 0.0 0.0  0.67427
0.0 0.0 0.0  0.0   0.67427

$OMEGAP BLOCK(3)
0.01 FIX
0.0  0.16
0.0  0.0 0.04

$OMEGAPD (3 FIX)

$SIGMAP BLOCK(1)
16.0 FIX

$SIGMAPD (2 FIX)

$EST METHOD=BAYES NBURN=2000 NITER=2000 PRINT=50 MASSRESET=1
file=stanrb9e_bayes.ext KAPPA=0.75
$EST METHOD=NUTS NBURN=500 NITER=2000 PRINT=20 file=stanrb9e.ext
     OLKJDF=1.0 MASSRESET=0 KAPPA=1.0 MADAPT=250

NM-TRAN MESSAGES
 WARNINGS AND ERRORS (IF ANY) FOR PROBLEM    1
 (WARNING  2) NM-TRAN INFERS THAT THE DATA ARE POPULATION.
 (WARNING  121) INTERACTION IS IMPLIED WITH EM/BAYES ESTIMATION METHODS
 (MU_WARNING 20) MU_001: MU_ VARIABLE SHOULD NOT BE DEFINED AFTER VERBATIM CODE.
 (MU_WARNING 6) THETA(003): SHOULD BE ASSOCIATED WITH ONLY ONE MU_.
 (MU_WARNING 6) THETA(002): SHOULD BE ASSOCIATED WITH ONLY ONE MU_.

1NONLINEAR MIXED EFFECTS MODEL PROGRAM (NONMEM) VERSION 7.4.0 alpha12 (nm74a12)
 ORIGINALLY DEVELOPED BY STUART BEAL, LEWIS SHEINER, AND ALISON BOECKMANN
 CURRENT DEVELOPERS ARE ROBERT BAUER, ICON DEVELOPMENT SOLUTIONS,
 AND ALISON BOECKMANN. IMPLEMENTATION, EFFICIENCY, AND STANDARDIZATION
 PERFORMED BY NOUS INFOSYSTEMS.
 PROBLEM NO.:         1
 Stan model
 TOT. NO. OF OBS RECS:     9000
 TOT. NO. OF INDIVIDUALS:    900
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 #TBLN:      1
 #METH: MCMC Bayesian Analysis
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
 #TERM:
 STATISTICAL PORTION WAS COMPLETED

 TOTAL DATA POINTS NORMALLY DISTRIBUTED (N):         9000
 N*LOG(2PI) CONSTANT TO OBJECTIVE FUNCTION:    16540.8935976841
 OBJECTIVE FUNCTION VALUE WITHOUT CONSTANT:    27095.8443384039
 OBJECTIVE FUNCTION VALUE WITH CONSTANT:       43636.7379360880
 REPORTED OBJECTIVE FUNCTION DOES NOT CONTAIN CONSTANT

 TOTAL EFFECTIVE ETAS (NIND*NETA):                          2700
 NIND*NETA*LOG(2PI) CONSTANT TO OBJECTIVE FUNCTION:    4962.26807930523
 OBJECTIVE FUNCTION VALUE WITHOUT CONSTANT:    27095.8443384039
 OBJECTIVE FUNCTION VALUE WITH CONSTANT:       32058.1124177091
 REPORTED OBJECTIVE FUNCTION DOES NOT CONTAIN CONSTANT

 PRIOR CONSTANT TO OBJECTIVE FUNCTION:    16.0970839384867
 OBJECTIVE FUNCTION VALUE WITHOUT CONSTANT:    27095.8443384039
 OBJECTIVE FUNCTION VALUE WITH CONSTANT:       27111.9414223424
 REPORTED OBJECTIVE FUNCTION DOES NOT CONTAIN CONSTANT


 #TERE:
 Elapsed estimation  time in seconds:   220.21
 Elapsed covariance  time in seconds:     0.00

 ********************                              MCMC BAYESIAN ANALYSIS                            ********************
 #OBJT:**************                       AVERAGE VALUE OF LIKELIHOOD FUNCTION                     ********************
 #OBJV:********************************************    27095.844       **************************************************
 #OBJS:********************************************      250.590 (STD) **************************************************

 ********************                              MCMC BAYESIAN ANALYSIS                            ********************
 ********************                             FINAL PARAMETER ESTIMATE                           ********************

 THETA - VECTOR OF FIXED EFFECTS PARAMETERS   *********
         TH 1      TH 2      TH 3      TH 4      TH 5
         9.84E-03  3.67E+00 -4.99E+00 -9.14E-01 -1.17E+00

 OMEGA - COV MATRIX FOR RANDOM EFFECTS - ETAS  ********
         ETA1      ETA2      ETA3
 ETA1
+        9.99E-03
 ETA2
+        2.51E-02  1.62E-01
 ETA3
+       -5.79E-04 -4.06E-02  4.81E-02

 SIGMA - COV MATRIX FOR RANDOM EFFECTS - EPSILONS  ****
         EPS1
 EPS1
+        1.56E+01

 OMEGA - CORR MATRIX FOR RANDOM EFFECTS - ETAS  *******
         ETA1      ETA2      ETA3
 ETA1
+        9.99E-02
 ETA2
+        6.24E-01  4.02E-01
 ETA3
+       -2.65E-02 -4.65E-01  2.19E-01

 SIGMA - CORR MATRIX FOR RANDOM EFFECTS - EPSILONS  ***
         EPS1
 EPS1
+        3.95E+00

 ********************                              MCMC BAYESIAN ANALYSIS                            ********************
 ********************                STANDARD ERROR OF ESTIMATE (From Sample Variance)               ********************

 THETA - VECTOR OF FIXED EFFECTS PARAMETERS   *********
         TH 1      TH 2      TH 3      TH 4      TH 5
         4.02E-03  2.83E-02  4.02E-02  1.28E-01  1.66E-01

 OMEGA - COV MATRIX FOR RANDOM EFFECTS - ETAS  ********
         ETA1      ETA2      ETA3
 ETA1
+        6.71E-04
 ETA2
+        2.51E-03  1.29E-02
 ETA3
+        1.80E-03  5.92E-03  6.61E-03

 SIGMA - COV MATRIX FOR RANDOM EFFECTS - EPSILONS  ****
         EPS1
 EPS1
+        2.71E-01

 OMEGA - CORR MATRIX FOR RANDOM EFFECTS - ETAS  *******
         ETA1      ETA2      ETA3
 ETA1
+        3.35E-03
 ETA2
+        4.50E-02  1.61E-02
 ETA3
+        8.15E-02  8.32E-02  1.50E-02

 SIGMA - CORR MATRIX FOR RANDOM EFFECTS - EPSILONS  ***
         EPS1
 EPS1
+        3.42E-02

 ********************                              MCMC BAYESIAN ANALYSIS                            ********************
 ********************               COVARIANCE MATRIX OF ESTIMATE (From Sample Variance)             ********************

            TH 1      TH 2      TH 3      TH 4      TH 5      OM11      OM12      OM13      OM22      OM23      OM33      SG11
 TH 1
+        1.61E-05
 TH 2
+        2.65E-05  7.98E-04
 TH 3
+        2.68E-05  6.55E-04  1.61E-03
 TH 4
+        1.00E-05 -2.35E-03 -2.56E-03  1.64E-02
 TH 5
+        1.91E-05 -3.10E-03 -3.34E-03  1.01E-02  2.74E-02
 OM11
+       -1.63E-07 -5.72E-07 -2.90E-06  2.63E-06  6.68E-07  4.50E-07
 OM12
+       -2.39E-07  4.57E-09 -1.88E-05 -1.36E-05 -2.32E-06  7.85E-07  6.30E-06
 OM13
+       -2.42E-08  2.09E-06 -2.00E-06 -1.93E-05 -6.05E-06 -1.09E-07  1.84E-06  3.24E-06
 OM22
+       -8.96E-06  1.60E-05 -8.59E-05 -1.90E-04 -1.85E-04  1.32E-06  1.95E-05  7.42E-06  1.68E-04
 OM23
+       -1.86E-06  4.26E-06 -2.78E-06 -2.17E-05 -4.07E-05 -3.28E-07  3.69E-06  6.35E-06  2.33E-05  3.50E-05
 OM33
+        4.54E-06  1.34E-06  2.96E-05  5.48E-05  6.13E-06 -1.67E-07  4.83E-07  4.97E-07 -1.58E-05  7.53E-06  4.37E-05
 SG11
+        5.83E-05 -1.09E-04 -4.14E-04  1.00E-03  1.52E-03 -7.97E-06  3.64E-05 -8.29E-06  6.32E-05 -4.94E-05 -8.73E-05  7.34E-02

 ********************                              MCMC BAYESIAN ANALYSIS                            ********************
 ********************              CORRELATION MATRIX OF ESTIMATE (From Sample Variance)             ********************

            TH 1      TH 2      TH 3      TH 4      TH 5      OM11      OM12      OM13      OM22      OM23      OM33      SG11
 TH 1
+        4.02E-03
 TH 2
+        2.34E-01  2.83E-02
 TH 3
+        1.66E-01  5.77E-01  4.02E-02
 TH 4
+        1.95E-02 -6.49E-01 -4.99E-01  1.28E-01
 TH 5
+        2.87E-02 -6.62E-01 -5.02E-01  4.77E-01  1.66E-01
 OM11
+       -6.05E-02 -3.02E-02 -1.08E-01  3.07E-02  6.02E-03  6.71E-04
 OM12
+       -2.37E-02  6.44E-05 -1.87E-01 -4.24E-02 -5.57E-03  4.66E-01  2.51E-03
 OM13
+       -3.35E-03  4.11E-02 -2.76E-02 -8.39E-02 -2.03E-02 -9.02E-02  4.07E-01  1.80E-03
 OM22
+       -1.72E-01  4.36E-02 -1.65E-01 -1.14E-01 -8.61E-02  1.52E-01  6.01E-01  3.19E-01  1.29E-02
 OM23
+       -7.83E-02  2.55E-02 -1.17E-02 -2.87E-02 -4.16E-02 -8.26E-02  2.48E-01  5.96E-01  3.05E-01  5.92E-03
 OM33
+        1.71E-01  7.18E-03  1.12E-01  6.47E-02  5.60E-03 -3.77E-02  2.91E-02  4.18E-02 -1.85E-01  1.93E-01  6.61E-03
 SG11
+        5.35E-02 -1.42E-02 -3.81E-02  2.89E-02  3.38E-02 -4.39E-02  5.34E-02 -1.70E-02  1.80E-02 -3.08E-02 -4.87E-02  2.71E-01
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 #TBLN:      2
 #METH: NUTS Bayesian Analysis
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
 #TERM:
 STATISTICAL PORTION WAS COMPLETED

 TOTAL DATA POINTS NORMALLY DISTRIBUTED (N):         9000
 N*LOG(2PI) CONSTANT TO OBJECTIVE FUNCTION:    16540.8935976841
 OBJECTIVE FUNCTION VALUE WITHOUT CONSTANT:    26817.2183861768
 OBJECTIVE FUNCTION VALUE WITH CONSTANT:       43358.1119838609
 REPORTED OBJECTIVE FUNCTION DOES NOT CONTAIN CONSTANT

 TOTAL EFFECTIVE ETAS (NIND*NETA):                          2700
 NIND*NETA*LOG(2PI) CONSTANT TO OBJECTIVE FUNCTION:    4962.26807930523
 OBJECTIVE FUNCTION VALUE WITHOUT CONSTANT:    26817.2183861768
 OBJECTIVE FUNCTION VALUE WITH CONSTANT:       31779.4864654820
 REPORTED OBJECTIVE FUNCTION DOES NOT CONTAIN CONSTANT

 PRIOR CONSTANT TO OBJECTIVE FUNCTION:   -4.85471119897507
 OBJECTIVE FUNCTION VALUE WITHOUT CONSTANT:    26817.2183861768
 OBJECTIVE FUNCTION VALUE WITH CONSTANT:       26812.3636749778
 REPORTED OBJECTIVE FUNCTION DOES NOT CONTAIN CONSTANT


 #TERE:
 Elapsed estimation  time in seconds:   758.28
 Elapsed covariance  time in seconds:     0.00

 ********************                              NUTS BAYESIAN ANALYSIS                            ********************
 #OBJT:**************                       AVERAGE VALUE OF LIKELIHOOD FUNCTION                     ********************
 #OBJV:********************************************    26817.218       **************************************************
 #OBJS:********************************************      361.036 (STD) **************************************************

 ********************                              NUTS BAYESIAN ANALYSIS                            ********************
 ********************                             FINAL PARAMETER ESTIMATE                           ********************

 THETA - VECTOR OF FIXED EFFECTS PARAMETERS   *********
         TH 1      TH 2      TH 3      TH 4      TH 5
         1.02E-02  3.67E+00 -4.99E+00 -9.19E-01 -1.17E+00

 OMEGA - COV MATRIX FOR RANDOM EFFECTS - ETAS  ********
         ETA1      ETA2      ETA3
 ETA1
+        9.97E-03
 ETA2
+        2.59E-02  1.59E-01
 ETA3
+        1.48E-04 -4.23E-02  4.75E-02

 SIGMA - COV MATRIX FOR RANDOM EFFECTS - EPSILONS  ****
         EPS1
 EPS1
+        1.57E+01

 OMEGA - CORR MATRIX FOR RANDOM EFFECTS - ETAS  *******
         ETA1      ETA2      ETA3
 ETA1
+        9.98E-02
 ETA2
+        6.52E-01  3.98E-01
 ETA3
+        5.35E-03 -4.95E-01  2.17E-01

 SIGMA - CORR MATRIX FOR RANDOM EFFECTS - EPSILONS  ***
         EPS1
 EPS1
+        3.96E+00

 ********************                              NUTS BAYESIAN ANALYSIS                            ********************
 ********************                STANDARD ERROR OF ESTIMATE (From Sample Variance)               ********************

 THETA - VECTOR OF FIXED EFFECTS PARAMETERS   *********
         TH 1      TH 2      TH 3      TH 4      TH 5
         3.96E-03  2.83E-02  4.38E-02  1.34E-01  1.65E-01

 OMEGA - COV MATRIX FOR RANDOM EFFECTS - ETAS  ********
         ETA1      ETA2      ETA3
 ETA1
+        6.79E-04
 ETA2
+        2.51E-03  1.26E-02
 ETA3
+        1.87E-03  6.42E-03  6.85E-03

 SIGMA - COV MATRIX FOR RANDOM EFFECTS - EPSILONS  ****
         EPS1
 EPS1
+        2.69E-01

 OMEGA - CORR MATRIX FOR RANDOM EFFECTS - ETAS  *******
         ETA1      ETA2      ETA3
 ETA1
+        3.40E-03
 ETA2
+        4.33E-02  1.58E-02
 ETA3
+        8.54E-02  9.88E-02  1.56E-02

 SIGMA - CORR MATRIX FOR RANDOM EFFECTS - EPSILONS  ***
         EPS1
 EPS1
+        3.40E-02

 ********************                              NUTS BAYESIAN ANALYSIS                            ********************
 ********************               COVARIANCE MATRIX OF ESTIMATE (From Sample Variance)             ********************

            TH 1      TH 2      TH 3      TH 4      TH 5      OM11      OM12      OM13      OM22      OM23      OM33      SG11
 TH 1
+        1.56E-05
 TH 2
+        3.06E-05  8.03E-04
 TH 3
+        3.64E-05  6.62E-04  1.92E-03
 TH 4
+        7.76E-06 -2.48E-03 -2.82E-03  1.79E-02
 TH 5
+       -2.44E-05 -3.19E-03 -3.20E-03  1.06E-02  2.72E-02
 OM11
+       -1.89E-07 -3.86E-07 -3.49E-06 -3.86E-07  1.96E-06  4.61E-07
 OM12
+       -3.54E-07  3.31E-07 -2.72E-05 -6.85E-06 -8.73E-06  8.60E-07  6.32E-06
 OM13
+        1.95E-07  1.28E-06 -5.00E-06 -3.08E-06  5.01E-06 -4.60E-08  1.84E-06  3.49E-06
 OM22
+       -4.07E-06  1.64E-05 -1.64E-04 -1.04E-04 -1.67E-04  1.61E-06  2.00E-05  6.10E-06  1.58E-04
 OM23
+        3.62E-07  4.28E-06 -4.45E-05  6.42E-06 -3.93E-05 -7.10E-08  4.76E-06  7.18E-06  2.80E-05  4.12E-05
 OM33
+        3.78E-06 -1.37E-05 -1.16E-05  1.09E-04  9.15E-05 -2.29E-07  2.20E-06  3.32E-06  2.34E-06  1.77E-05  4.69E-05
 SG11
+       -4.54E-05  1.77E-04  1.72E-04  4.10E-04 -3.02E-03 -1.70E-05  3.37E-06 -9.70E-06 -1.23E-04 -7.38E-05 -1.34E-04  7.23E-02

 ********************                              NUTS BAYESIAN ANALYSIS                            ********************
 ********************              CORRELATION MATRIX OF ESTIMATE (From Sample Variance)             ********************

            TH 1      TH 2      TH 3      TH 4      TH 5      OM11      OM12      OM13      OM22      OM23      OM33      SG11
 TH 1
+        3.96E-03
 TH 2
+        2.73E-01  2.83E-02
 TH 3
+        2.10E-01  5.33E-01  4.38E-02
 TH 4
+        1.47E-02 -6.55E-01 -4.81E-01  1.34E-01
 TH 5
+       -3.75E-02 -6.81E-01 -4.42E-01  4.81E-01  1.65E-01
 OM11
+       -7.04E-02 -2.01E-02 -1.17E-01 -4.24E-03  1.75E-02  6.79E-04
 OM12
+       -3.56E-02  4.64E-03 -2.47E-01 -2.04E-02 -2.11E-02  5.04E-01  2.51E-03
 OM13
+        2.63E-02  2.42E-02 -6.11E-02 -1.23E-02  1.62E-02 -3.62E-02  3.93E-01  1.87E-03
 OM22
+       -8.17E-02  4.59E-02 -2.97E-01 -6.20E-02 -8.03E-02  1.88E-01  6.31E-01  2.59E-01  1.26E-02
 OM23
+        1.43E-02  2.35E-02 -1.58E-01  7.47E-03 -3.71E-02 -1.63E-02  2.95E-01  5.99E-01  3.47E-01  6.42E-03
 OM33
+        1.39E-01 -7.08E-02 -3.87E-02  1.19E-01  8.10E-02 -4.92E-02  1.28E-01  2.59E-01  2.71E-02  4.02E-01  6.85E-03
 SG11
+       -4.27E-02  2.33E-02  1.46E-02  1.14E-02 -6.81E-02 -9.32E-02  4.99E-03 -1.93E-02 -3.64E-02 -4.28E-02 -7.28E-02  2.69E-01
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 Elapsed postprocess time in seconds:     0.00
 #CPUT: Total CPU Time in Seconds,      956.770
