Sat 09/07/2013
08:40 PM
$PROB RUN# Example 1 (from samp5l)
$INPUT ID TIME  DV=CONC AMT=DOSE RATE EVID MDV CMT SID CID
$DATA superid2.csv

$SUBROUTINES ADVAN1 TRANS2

$PK
MU_1=THETA(1)
MU_2=THETA(2)
CL=DEXP(MU_1+ETA(1)+ETA(3)+ETA(5))
V=DEXP(MU_2+ETA(2)+ETA(4)+ETA(6))
S1=V

$ERROR
Y = F + F*EPS(1)

; Initial values of THETA
$THETA 5.0 5.0
$OMEGA BLOCK(2)
0.03
0.00001 0.03

;$OMEGA 0.03 0.03
$OMEGA BLOCK(2)
0.1
0.00001 0.1

$OMEGA BLOCK(2)
0.3
0.00001 0.3

$SIGMA
0.1

$LEVEL
SID=(3[1],4[2])
CID=(5[3],6[4])

$PRIOR NWPRI NTHETA=2 NETA=6 NTHP=0 NETP=6
$OMEGA BLOCK(2)
0.01 FIX
0.0 0.01

;$OMEGA 0.03 0.03
$OMEGA BLOCK(2)
0.03 FIX
0.0 0.03

$OMEGA BLOCK(2)
0.1 FIX
0.0 0.1

$THETA (2 FIX) (2 FIX) (2 FIX)

$EST METHOD=ITS INTERACTION PRINT=1 NSIG=3 NITER=12 SIGL=5 FNLETA=0 NOABORT SIGLO=8 MCETA=10 NOPRIOR=1
;$EST METHOD=IMP INTERACTION PRINT=1 NSIG=3 NITER=500 CTYPE=3 ISAMPLE=300 MCETA=3 FNLETA=0 NOABORT SIGL=5 SIGLO=8
;$EST METHOD=1 INTERACTION PRINT=1 MAXEVAL=9999 NSIG=3 FNLETA=0 SIGL=10
$EST METHOD=BAYES INTERACTION PRINT=10 NSIG=3 NBURN=1000 NITER=1000 CTYPE=3 FNLETA=0 NOABORT NOPRIOR=0
$COV MATRIX=R UNCONDITIONAL
$TABLE  ID TIME CONC DOSE RATE EVID MDV CMT SID CID CL V ETA1 ETA2 ETA3 ETA4 ETA5 ETA6
NOAPPEND ONEHEADER FILE=superid2_5.tab  NOPRINT

NM-TRAN MESSAGES
 WARNINGS AND ERRORS (IF ANY) FOR PROBLEM    1
 (WARNING  2) NM-TRAN INFERS THAT THE DATA ARE POPULATION.
 (MU_WARNING 12) MU_001: SHOULD NOT BE ASSOCIATED WITH ETA(003)
 (MU_WARNING 11) MU_001: SHOULD NOT BE ASSOCIATED WITH MORE THAN ONE ETA.
 (MU_WARNING 12) MU_001: SHOULD NOT BE ASSOCIATED WITH ETA(005)
 (MU_WARNING 11) MU_001: SHOULD NOT BE ASSOCIATED WITH MORE THAN ONE ETA.
 (MU_WARNING 12) MU_002: SHOULD NOT BE ASSOCIATED WITH ETA(004)
 (MU_WARNING 11) MU_002: SHOULD NOT BE ASSOCIATED WITH MORE THAN ONE ETA.
 (MU_WARNING 12) MU_002: SHOULD NOT BE ASSOCIATED WITH ETA(006)
 (MU_WARNING 11) MU_002: SHOULD NOT BE ASSOCIATED WITH MORE THAN ONE ETA.

1NONLINEAR MIXED EFFECTS MODEL PROGRAM (NONMEM) VERSION 7.3beta7.0(N)
 ORIGINALLY DEVELOPED BY STUART BEAL, LEWIS SHEINER, AND ALISON BOECKMANN
 CURRENT DEVELOPERS ARE ROBERT BAUER, ICON DEVELOPMENT SOLUTIONS,
 AND ALISON BOECKMANN. IMPLEMENTATION, EFFICIENCY, AND STANDARDIZATION
 PERFORMED BY NOUS INFOSYSTEMS.
 PROBLEM NO.:         1
 RUN# Example 1 (from samp5l)
 TOT. NO. OF OBS RECS:    17500
 TOT. NO. OF INDIVIDUALS:   2500
 ONE COMPARTMENT MODEL (ADVAN1)
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 #TBLN:      1
 #METH: Iterative Two Stage (No Prior)
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
 #TERM:
 OPTIMIZATION WAS NOT TESTED FOR CONVERGENCE

 ETABAR IS THE ARITHMETIC MEAN OF THE ETA-ESTIMATES,
 AND THE P-VALUE IS GIVEN FOR THE NULL HYPOTHESIS THAT THE TRUE MEAN IS 0.

 ETABAR:        -6.3099E-05 -3.4199E-05  7.2164E-19 -8.6042E-18 -1.9398E-16  2.0335E-16
 SE:             1.6659E-03  1.7466E-03  9.8889E-03  1.0710E-02  6.1692E-02  5.5552E-02
 N:                    2500        2500         250         250          25          25

 P VAL.:         9.6979E-01  9.8438E-01  1.0000E+00  1.0000E+00  1.0000E+00  1.0000E+00

 ETAshrink(%):   1.0829E+01  1.0598E+01  4.3017E-05  4.1794E-05  3.5868E-05  3.2798E-05
 EBVshrink(%):   1.0827E+01  1.0596E+01  0.0000E+00  0.0000E+00  0.0000E+00  0.0000E+00
 EPSshrink(%):   1.1823E+01


 #TERE:
 Elapsed estimation time in seconds:   146.15
 Elapsed covariance time in seconds:     0.91

 ********************                          ITERATIVE TWO STAGE (NO PRIOR)                        ********************
 #OBJT:**************                        FINAL VALUE OF OBJECTIVE FUNCTION                       ********************
 #OBJV:********************************************   -41170.560       **************************************************

 ********************                          ITERATIVE TWO STAGE (NO PRIOR)                        ********************
 ********************                             FINAL PARAMETER ESTIMATE                           ********************

 THETA - VECTOR OF FIXED EFFECTS PARAMETERS   *********
         TH 1      TH 2
         2.00E+00  3.63E+00

 OMEGA - COV MATRIX FOR RANDOM EFFECTS - ETAS  ********
            ETA1      ETA2      ETA3      ETA4      ETA5      ETA6
 ETA1
+        9.69E-03
 ETA2
+        3.76E-05  1.06E-02
 ETA3
+        0.00E+00  0.00E+00  2.72E-02
 ETA4
+        0.00E+00  0.00E+00  1.75E-03  3.19E-02
 ETA5
+        0.00E+00  0.00E+00  0.00E+00  0.00E+00  9.91E-02
 ETA6
+        0.00E+00  0.00E+00  0.00E+00  0.00E+00 -1.69E-02  8.04E-02

 SIGMA - COV MATRIX FOR RANDOM EFFECTS - EPSILONS  ****
            EPS1
 EPS1
+        9.94E-03

 OMEGA - CORR MATRIX FOR RANDOM EFFECTS - ETAS  *******
            ETA1      ETA2      ETA3      ETA4      ETA5      ETA6
 ETA1
+        9.85E-02
 ETA2
+        3.71E-03  1.03E-01
 ETA3
+        0.00E+00  0.00E+00  1.65E-01
 ETA4
+        0.00E+00  0.00E+00  5.96E-02  1.79E-01
 ETA5
+        0.00E+00  0.00E+00  0.00E+00  0.00E+00  3.15E-01
 ETA6
+        0.00E+00  0.00E+00  0.00E+00  0.00E+00 -1.89E-01  2.83E-01

 SIGMA - CORR MATRIX FOR RANDOM EFFECTS - EPSILONS  ***
            EPS1
 EPS1
+        9.97E-02

 ********************                          ITERATIVE TWO STAGE (NO PRIOR)                        ********************
 ********************                          STANDARD ERROR OF ESTIMATE (S)                        ********************

 THETA - VECTOR OF FIXED EFFECTS PARAMETERS   *********
         TH 1      TH 2
         2.35E-03  2.44E-03

 OMEGA - COV MATRIX FOR RANDOM EFFECTS - ETAS  ********
            ETA1      ETA2      ETA3      ETA4      ETA5      ETA6
 ETA1
+        3.40E-04
 ETA2
+        2.55E-04  3.79E-04
 ETA3
+        0.00E+00  0.00E+00  2.28E-03
 ETA4
+        0.00E+00  0.00E+00  1.84E-03  2.72E-03
 ETA5
+        0.00E+00  0.00E+00  0.00E+00  0.00E+00  3.17E-02
 ETA6
+        0.00E+00  0.00E+00  0.00E+00  0.00E+00  2.42E-02  2.69E-02

 SIGMA - COV MATRIX FOR RANDOM EFFECTS - EPSILONS  ****
            EPS1
 EPS1
+        1.27E-04

 OMEGA - CORR MATRIX FOR RANDOM EFFECTS - ETAS  *******
            ETA1      ETA2      ETA3      ETA4      ETA5      ETA6
 ETA1
+        1.73E-03
 ETA2
+        2.52E-02  1.84E-03
 ETA3
+       ......... .........  6.90E-03
 ETA4
+       ......... .........  6.28E-02  7.63E-03
 ETA5
+       ......... ......... ......... .........  5.04E-02
 ETA6
+       ......... ......... ......... .........  2.46E-01  4.74E-02

 SIGMA - CORR MATRIX FOR RANDOM EFFECTS - EPSILONS  ***
            EPS1
 EPS1
+        6.39E-04
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 #TBLN:      2
 #METH: MCMC Bayesian Analysis
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
 #TERM:
 BURN-IN WAS COMPLETED
 STATISTICAL PORTION WAS COMPLETED

 #TERE:
 Elapsed estimation time in seconds:  3183.39
 Elapsed covariance time in seconds:     0.00

 ********************                              MCMC BAYESIAN ANALYSIS                            ********************
 #OBJT:**************                       AVERAGE VALUE OF LIKELIHOOD FUNCTION                     ********************
 #OBJV:********************************************   -73394.787       **************************************************
 #OBJS:********************************************      116.891 (STD) **************************************************

 ********************                              MCMC BAYESIAN ANALYSIS                            ********************
 ********************                             FINAL PARAMETER ESTIMATE                           ********************

 THETA - VECTOR OF FIXED EFFECTS PARAMETERS   *********
         TH 1      TH 2
         1.99E+00  3.63E+00

 OMEGA - COV MATRIX FOR RANDOM EFFECTS - ETAS  ********
            ETA1      ETA2      ETA3      ETA4      ETA5      ETA6
 ETA1
+        1.03E-02
 ETA2
+        1.08E-04  1.13E-02
 ETA3
+        0.00E+00  0.00E+00  2.85E-02
 ETA4
+        0.00E+00  0.00E+00  1.46E-03  3.27E-02
 ETA5
+        0.00E+00  0.00E+00  0.00E+00  0.00E+00  1.14E-01
 ETA6
+        0.00E+00  0.00E+00  0.00E+00  0.00E+00 -1.86E-02  9.27E-02

 SIGMA - COV MATRIX FOR RANDOM EFFECTS - EPSILONS  ****
            EPS1
 EPS1
+        1.00E-02

 OMEGA - CORR MATRIX FOR RANDOM EFFECTS - ETAS  *******
            ETA1      ETA2      ETA3      ETA4      ETA5      ETA6
 ETA1
+        1.02E-01
 ETA2
+        1.00E-02  1.06E-01
 ETA3
+        0.00E+00  0.00E+00  1.69E-01
 ETA4
+        0.00E+00  0.00E+00  4.77E-02  1.81E-01
 ETA5
+        0.00E+00  0.00E+00  0.00E+00  0.00E+00  3.35E-01
 ETA6
+        0.00E+00  0.00E+00  0.00E+00  0.00E+00 -1.78E-01  3.01E-01

 SIGMA - CORR MATRIX FOR RANDOM EFFECTS - EPSILONS  ***
            EPS1
 EPS1
+        1.00E-01

 ********************                              MCMC BAYESIAN ANALYSIS                            ********************
 ********************                STANDARD ERROR OF ESTIMATE (From Sample Variance)               ********************

 THETA - VECTOR OF FIXED EFFECTS PARAMETERS   *********
         TH 1      TH 2
         2.18E-03  2.42E-03

 OMEGA - COV MATRIX FOR RANDOM EFFECTS - ETAS  ********
            ETA1      ETA2      ETA3      ETA4      ETA5      ETA6
 ETA1
+        3.62E-04
 ETA2
+        2.75E-04  4.10E-04
 ETA3
+        0.00E+00  0.00E+00  2.61E-03
 ETA4
+        0.00E+00  0.00E+00  1.94E-03  2.89E-03
 ETA5
+        0.00E+00  0.00E+00  0.00E+00  0.00E+00  3.25E-02
 ETA6
+        0.00E+00  0.00E+00  0.00E+00  0.00E+00  2.12E-02  2.80E-02

 SIGMA - COV MATRIX FOR RANDOM EFFECTS - EPSILONS  ****
            EPS1
 EPS1
+        1.27E-04

 OMEGA - CORR MATRIX FOR RANDOM EFFECTS - ETAS  *******
            ETA1      ETA2      ETA3      ETA4      ETA5      ETA6
 ETA1
+        1.78E-03
 ETA2
+        2.55E-02  1.93E-03
 ETA3
+        0.00E+00  0.00E+00  7.68E-03
 ETA4
+        0.00E+00  0.00E+00  6.29E-02  8.00E-03
 ETA5
+        0.00E+00  0.00E+00  0.00E+00  0.00E+00  4.60E-02
 ETA6
+        0.00E+00  0.00E+00  0.00E+00  0.00E+00  1.85E-01  4.41E-02

 SIGMA - CORR MATRIX FOR RANDOM EFFECTS - EPSILONS  ***
            EPS1
 EPS1
+        6.33E-04
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 #CPUT: Total CPU Time in Seconds,     3283.219
