Sat 09/07/2013
09:36 PM
$PROB RUN# Example 1 (from samp5l)
$INPUT ID TIME  DV=CONC AMT=DOSE RATE EVID MDV CMT SID CID
$DATA superid2.csv

$SUBROUTINES ADVAN1 TRANS2

$PK
MU_1=THETA(1)
MU_2=THETA(2)
CL=DEXP(MU_1+ETA(1)+ETA(3)+ETA(5))
V=DEXP(MU_2+ETA(2)+ETA(4)+ETA(6))
S1=V

$ERROR
Y = F + F*EPS(1)

; Initial values of THETA
$THETA 5.0 5.0
;$OMEGA 0.02 0.02 0.0 FIXED 0.0 FIXED 0.0 FIXED 0.0 FIXED
$OMEGA BLOCK(2)
0.1
0.00001 0.1

$OMEGA BLOCK(2)
0.3
0.00001 0.3

$OMEGA BLOCK(2)
1.0
0.00001 1.0

$SIGMA
0.1

$LEVEL
SID=(3[1],4[2])
CID=(5[3],6[4])

;$EST METHOD=ITS INTERACTION PRINT=1 NSIG=3 NITER=12 SIGL=6 FNLETA=0
$EST METHOD=SAEM INTERACTION PRINT=1 NSIG=3 NBURN=30 NITER=100 CTYPE=3 CINTERVAL=50 SIGL=6
$EST METHOD=IMP INTERACTION PRINT=1 NSIG=3 NITER=10 CTYPE=3 ISAMPLE=300 SIGL=6 EONLY=1 MAPITER=0
$COV MATRIX=R UNCONDITIONAL
$TABLE  ID TIME CONC DOSE RATE EVID MDV CMT SID CID ETA1 ETA2 ETA3 ETA4 ETA5 ETA6
NOAPPEND ONEHEADER FILE=superid2_6.tab  NOPRINT

NM-TRAN MESSAGES
 WARNINGS AND ERRORS (IF ANY) FOR PROBLEM    1
 (WARNING  2) NM-TRAN INFERS THAT THE DATA ARE POPULATION.
 (MU_WARNING 12) MU_001: SHOULD NOT BE ASSOCIATED WITH ETA(003)
 (MU_WARNING 11) MU_001: SHOULD NOT BE ASSOCIATED WITH MORE THAN ONE ETA.
 (MU_WARNING 12) MU_001: SHOULD NOT BE ASSOCIATED WITH ETA(005)
 (MU_WARNING 11) MU_001: SHOULD NOT BE ASSOCIATED WITH MORE THAN ONE ETA.
 (MU_WARNING 12) MU_002: SHOULD NOT BE ASSOCIATED WITH ETA(004)
 (MU_WARNING 11) MU_002: SHOULD NOT BE ASSOCIATED WITH MORE THAN ONE ETA.
 (MU_WARNING 12) MU_002: SHOULD NOT BE ASSOCIATED WITH ETA(006)
 (MU_WARNING 11) MU_002: SHOULD NOT BE ASSOCIATED WITH MORE THAN ONE ETA.

1NONLINEAR MIXED EFFECTS MODEL PROGRAM (NONMEM) VERSION 7.3beta7.0(N)
 ORIGINALLY DEVELOPED BY STUART BEAL, LEWIS SHEINER, AND ALISON BOECKMANN
 CURRENT DEVELOPERS ARE ROBERT BAUER, ICON DEVELOPMENT SOLUTIONS,
 AND ALISON BOECKMANN. IMPLEMENTATION, EFFICIENCY, AND STANDARDIZATION
 PERFORMED BY NOUS INFOSYSTEMS.
 PROBLEM NO.:         1
 RUN# Example 1 (from samp5l)
 TOT. NO. OF OBS RECS:    17500
 TOT. NO. OF INDIVIDUALS:   2500
 ONE COMPARTMENT MODEL (ADVAN1)
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 #TBLN:      1
 #METH: Stochastic Approximation Expectation-Maximization
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
 #TERM:
 STOCHASTIC PORTION WAS NOT TESTED FOR CONVERGENCE
 REDUCED STOCHASTIC PORTION WAS COMPLETED

 ETABAR IS THE ARITHMETIC MEAN OF THE ETA-ESTIMATES,
 AND THE P-VALUE IS GIVEN FOR THE NULL HYPOTHESIS THAT THE TRUE MEAN IS 0.

 ETABAR:        -3.8558E-06 -4.1008E-06  1.0014E-17  1.3406E-18  6.7413E-17  1.7151E-16
 SE:             1.6732E-03  1.7573E-03  9.9679E-03  1.0699E-02  6.2436E-02  5.5624E-02
 N:                    2500        2500         250         250          25          25

 P VAL.:         9.9816E-01  9.9814E-01  1.0000E+00  1.0000E+00  1.0000E+00  1.0000E+00

 ETAshrink(%):   1.0740E+01  1.0378E+01  1.0000E-10  1.8871E-03  1.0000E-10  3.7144E-03
 EBVshrink(%):   1.0743E+01  1.0371E+01  0.0000E+00  0.0000E+00  0.0000E+00  0.0000E+00
 EPSshrink(%):   1.1887E+01


 #TERE:
 Elapsed estimation time in seconds:   734.84
 Elapsed covariance time in seconds:     0.76

 ********************                STOCHASTIC APPROXIMATION EXPECTATION-MAXIMIZATION               ********************
 #OBJT:**************                        FINAL VALUE OF LIKELIHOOD FUNCTION                      ********************
 #OBJV:********************************************   -75342.974       **************************************************

 ********************                STOCHASTIC APPROXIMATION EXPECTATION-MAXIMIZATION               ********************
 ********************                             FINAL PARAMETER ESTIMATE                           ********************

 THETA - VECTOR OF FIXED EFFECTS PARAMETERS   *********
         TH 1      TH 2
         1.99E+00  3.63E+00

 OMEGA - COV MATRIX FOR RANDOM EFFECTS - ETAS  ********
            ETA1      ETA2      ETA3      ETA4      ETA5      ETA6
 ETA1
+        9.76E-03
 ETA2
+        2.61E-05  1.07E-02
 ETA3
+        0.00E+00  0.00E+00  2.76E-02
 ETA4
+        0.00E+00  0.00E+00  1.19E-03  3.18E-02
 ETA5
+        0.00E+00  0.00E+00  0.00E+00  0.00E+00  1.02E-01
 ETA6
+        0.00E+00  0.00E+00  0.00E+00  0.00E+00 -1.82E-02  8.06E-02

 SIGMA - COV MATRIX FOR RANDOM EFFECTS - EPSILONS  ****
            EPS1
 EPS1
+        9.90E-03

 OMEGA - CORR MATRIX FOR RANDOM EFFECTS - ETAS  *******
            ETA1      ETA2      ETA3      ETA4      ETA5      ETA6
 ETA1
+        9.88E-02
 ETA2
+        2.56E-03  1.03E-01
 ETA3
+        0.00E+00  0.00E+00  1.66E-01
 ETA4
+        0.00E+00  0.00E+00  4.02E-02  1.78E-01
 ETA5
+        0.00E+00  0.00E+00  0.00E+00  0.00E+00  3.19E-01
 ETA6
+        0.00E+00  0.00E+00  0.00E+00  0.00E+00 -2.01E-01  2.84E-01

 SIGMA - CORR MATRIX FOR RANDOM EFFECTS - EPSILONS  ***
            EPS1
 EPS1
+        9.95E-02

 ********************                STOCHASTIC APPROXIMATION EXPECTATION-MAXIMIZATION               ********************
 ********************                          STANDARD ERROR OF ESTIMATE (S)                        ********************

 THETA - VECTOR OF FIXED EFFECTS PARAMETERS   *********
         TH 1      TH 2
         2.35E-03  2.44E-03

 OMEGA - COV MATRIX FOR RANDOM EFFECTS - ETAS  ********
            ETA1      ETA2      ETA3      ETA4      ETA5      ETA6
 ETA1
+        3.43E-04
 ETA2
+        2.57E-04  3.82E-04
 ETA3
+        0.00E+00  0.00E+00  2.33E-03
 ETA4
+        0.00E+00  0.00E+00  1.86E-03  2.71E-03
 ETA5
+        0.00E+00  0.00E+00  0.00E+00  0.00E+00  3.28E-02
 ETA6
+        0.00E+00  0.00E+00  0.00E+00  0.00E+00  2.46E-02  2.70E-02

 SIGMA - COV MATRIX FOR RANDOM EFFECTS - EPSILONS  ****
            EPS1
 EPS1
+        1.26E-04

 OMEGA - CORR MATRIX FOR RANDOM EFFECTS - ETAS  *******
            ETA1      ETA2      ETA3      ETA4      ETA5      ETA6
 ETA1
+        1.74E-03
 ETA2
+        2.52E-02  1.85E-03
 ETA3
+       ......... .........  7.00E-03
 ETA4
+       ......... .........  6.29E-02  7.61E-03
 ETA5
+       ......... ......... ......... .........  5.14E-02
 ETA6
+       ......... ......... ......... .........  2.44E-01  4.75E-02

 SIGMA - CORR MATRIX FOR RANDOM EFFECTS - EPSILONS  ***
            EPS1
 EPS1
+        6.31E-04
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 #TBLN:      2
 #METH: Objective Function Evaluation by Importance Sampling
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
 #TERM:
 EXPECTATION ONLY PROCESS COMPLETED

 ETABAR IS THE ARITHMETIC MEAN OF THE ETA-ESTIMATES,
 AND THE P-VALUE IS GIVEN FOR THE NULL HYPOTHESIS THAT THE TRUE MEAN IS 0.

 ETABAR:        -2.3157E-04 -3.9461E-05 -1.1013E-17 -3.5805E-19 -1.2979E-16 -7.1817E-16
 SE:             1.6677E-03  1.7516E-03  9.9930E-03  1.0724E-02  6.2426E-02  5.5680E-02
 N:                    2500        2500         250         250          25          25

 P VAL.:         8.8956E-01  9.8203E-01  1.0000E+00  1.0000E+00  1.0000E+00  1.0000E+00

 ETAshrink(%):   1.1033E+01  1.0665E+01  1.0000E-10  1.0000E-10  1.5269E-02  1.0000E-10
 EBVshrink(%):   1.0953E+01  1.0567E+01  0.0000E+00  0.0000E+00  0.0000E+00  0.0000E+00
 EPSshrink(%):   1.1933E+01


 #TERE:
 Elapsed estimation time in seconds:   588.37
 Elapsed covariance time in seconds:    61.92

 ********************               OBJECTIVE FUNCTION EVALUATION BY IMPORTANCE SAMPLING             ********************
 #OBJT:**************                        FINAL VALUE OF OBJECTIVE FUNCTION                       ********************
 #OBJV:********************************************   -41189.229       **************************************************

 ********************               OBJECTIVE FUNCTION EVALUATION BY IMPORTANCE SAMPLING             ********************
 ********************                             FINAL PARAMETER ESTIMATE                           ********************

 THETA - VECTOR OF FIXED EFFECTS PARAMETERS   *********
         TH 1      TH 2
         1.99E+00  3.63E+00

 OMEGA - COV MATRIX FOR RANDOM EFFECTS - ETAS  ********
            ETA1      ETA2      ETA3      ETA4      ETA5      ETA6
 ETA1
+        9.76E-03
 ETA2
+        2.61E-05  1.07E-02
 ETA3
+        0.00E+00  0.00E+00  2.76E-02
 ETA4
+        0.00E+00  0.00E+00  1.19E-03  3.18E-02
 ETA5
+        0.00E+00  0.00E+00  0.00E+00  0.00E+00  1.02E-01
 ETA6
+        0.00E+00  0.00E+00  0.00E+00  0.00E+00 -1.82E-02  8.06E-02

 SIGMA - COV MATRIX FOR RANDOM EFFECTS - EPSILONS  ****
            EPS1
 EPS1
+        9.90E-03

 OMEGA - CORR MATRIX FOR RANDOM EFFECTS - ETAS  *******
            ETA1      ETA2      ETA3      ETA4      ETA5      ETA6
 ETA1
+        9.88E-02
 ETA2
+        2.56E-03  1.03E-01
 ETA3
+        0.00E+00  0.00E+00  1.66E-01
 ETA4
+        0.00E+00  0.00E+00  4.02E-02  1.78E-01
 ETA5
+        0.00E+00  0.00E+00  0.00E+00  0.00E+00  3.19E-01
 ETA6
+        0.00E+00  0.00E+00  0.00E+00  0.00E+00 -2.01E-01  2.84E-01

 SIGMA - CORR MATRIX FOR RANDOM EFFECTS - EPSILONS  ***
            EPS1
 EPS1
+        9.95E-02

 ********************               OBJECTIVE FUNCTION EVALUATION BY IMPORTANCE SAMPLING             ********************
 ********************                          STANDARD ERROR OF ESTIMATE (R)                        ********************

 THETA - VECTOR OF FIXED EFFECTS PARAMETERS   *********
         TH 1      TH 2
         2.23E-03  2.32E-03

 OMEGA - COV MATRIX FOR RANDOM EFFECTS - ETAS  ********
            ETA1      ETA2      ETA3      ETA4      ETA5      ETA6
 ETA1
+        3.46E-04
 ETA2
+        2.60E-04  3.81E-04
 ETA3
+        0.00E+00  0.00E+00  2.32E-03
 ETA4
+        0.00E+00  0.00E+00  1.85E-03  2.71E-03
 ETA5
+        0.00E+00  0.00E+00  0.00E+00  0.00E+00  3.28E-02
 ETA6
+        0.00E+00  0.00E+00  0.00E+00  0.00E+00  2.46E-02  2.69E-02

 SIGMA - COV MATRIX FOR RANDOM EFFECTS - EPSILONS  ****
            EPS1
 EPS1
+        1.24E-04

 OMEGA - CORR MATRIX FOR RANDOM EFFECTS - ETAS  *******
            ETA1      ETA2      ETA3      ETA4      ETA5      ETA6
 ETA1
+        1.75E-03
 ETA2
+        2.55E-02  1.84E-03
 ETA3
+       ......... .........  6.97E-03
 ETA4
+       ......... .........  6.25E-02  7.59E-03
 ETA5
+       ......... ......... ......... .........  5.14E-02
 ETA6
+       ......... ......... ......... .........  2.44E-01  4.74E-02

 SIGMA - CORR MATRIX FOR RANDOM EFFECTS - EPSILONS  ***
            EPS1
 EPS1
+        6.23E-04
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 #CPUT: Total CPU Time in Seconds,     1367.219
