Sat 09/07/2013
10:00 PM
$PROB RUN#
$INPUT C ID TIME DV AMT RATE EVID MDV CMT ROWNUM SID
$DATA superid3.csv IGNORE=C

$SUBROUTINES ADVAN2 TRANS2

$PK
MU_1=THETA(1)
MU_2=THETA(2)
MU_3=THETA(3)
KA=DEXP(MU_1+ETA(1)+ETA(4))
CL=DEXP(MU_2+ETA(2)+ETA(5))
V=DEXP(MU_3+ETA(3)+ETA(6))
S2=V

$ERROR
IPRE=F
Y = IPRE + IPRE*EPS(1)

; Initial values of THETA
$THETA 0.2 -4 -2
;INITIAL values of OMEGA
$OMEGA BLOCK(3)
0.1
0.001 0.1
0.001 0.001 0.1

$OMEGA BLOCK(3)
0.3
0.001 0.3
0.001 0.001 0.3

;Initial value of SIGMA
$SIGMA
0.1     ;[P]

$LEVEL
SID=(4[1],5[2],6[3])

$EST METHOD=ITS INTERACTION PRINT=1 NSIG=2 NITER=500 SIGL=8 FNLETA=0 NOABORT CTYPE=3 MCETA=0
$EST METHOD=IMP INTERACTION PRINT=1 NSIG=2 NITER=500 SIGL=8 FNLETA=0 NOABORT CTYPE=3 MCETA=0 ISAMPLE=300 MAPITER=0
$EST METHOD=SAEM INTERACTION PRINT=10 NSIG=2 NITER=100 SIGL=8 FNLETA=0 NOABORT CTYPE=3 MCETA=0 ISAMPLE=2 CONSTRAIN=0
$EST METHOD=IMP EONLY=1 INTERACTION PRINT=1 NSIG=2 NITER=5 SIGL=8 FNLETA=0 NOABORT CTYPE=3 MCETA=0 ISAMPLE=300 MAPITER=0
$EST METHOD=BAYES INTERACTION PRINT=10 NSIG=2 NBURN=1000 NITER=500 SIGL=8 FNLETA=0 NOABORT CTYPE=3
$EST METHOD=1 INTERACTION PRINT=5 NSIG=2 NBURN=1000 NITER=500 SIGL=10 FNLETA=0 NOHABORT SLOW NONINFETA=1 MCETA=20
$COV MATRIX=R UNCONDITIONAL SIGL=10
$TABLE  ID TIME DV AMT RATE EVID MDV CMT SID KA CL V ETA1 ETA2 ETA3 ETA4 ETA5 ETA6
NOAPPEND ONEHEADER FILE=superid3_1.tab  NOPRINT
$TABLE  ID SID KA CL V ETA1 ETA2 ETA3 ETA4 ETA5 ETA6 NOAPPEND ONEHEADER FILE=superid3_1.dat
        FIRSTONLY NOPRINT FORMAT=,1PE15.8

NM-TRAN MESSAGES
 WARNINGS AND ERRORS (IF ANY) FOR PROBLEM    1
 (WARNING  2) NM-TRAN INFERS THAT THE DATA ARE POPULATION.
 (MU_WARNING 12) MU_001: SHOULD NOT BE ASSOCIATED WITH ETA(004)
 (MU_WARNING 11) MU_001: SHOULD NOT BE ASSOCIATED WITH MORE THAN ONE ETA.
 (MU_WARNING 12) MU_002: SHOULD NOT BE ASSOCIATED WITH ETA(005)
 (MU_WARNING 11) MU_002: SHOULD NOT BE ASSOCIATED WITH MORE THAN ONE ETA.
 (MU_WARNING 12) MU_003: SHOULD NOT BE ASSOCIATED WITH ETA(006)
 (MU_WARNING 11) MU_003: SHOULD NOT BE ASSOCIATED WITH MORE THAN ONE ETA.

1NONLINEAR MIXED EFFECTS MODEL PROGRAM (NONMEM) VERSION 7.3beta7.0(N)
 ORIGINALLY DEVELOPED BY STUART BEAL, LEWIS SHEINER, AND ALISON BOECKMANN
 CURRENT DEVELOPERS ARE ROBERT BAUER, ICON DEVELOPMENT SOLUTIONS,
 AND ALISON BOECKMANN. IMPLEMENTATION, EFFICIENCY, AND STANDARDIZATION
 PERFORMED BY NOUS INFOSYSTEMS.
 PROBLEM NO.:         1
 RUN#
 TOT. NO. OF OBS RECS:     8000
 TOT. NO. OF INDIVIDUALS:    800
 ONE COMPARTMENT MODEL WITH FIRST-ORDER ABSORPTION (ADVAN2)
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 #TBLN:      1
 #METH: Iterative Two Stage
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
 #TERM:
 OPTIMIZATION WAS COMPLETED

 ETABAR IS THE ARITHMETIC MEAN OF THE ETA-ESTIMATES,
 AND THE P-VALUE IS GIVEN FOR THE NULL HYPOTHESIS THAT THE TRUE MEAN IS 0.

 ETABAR:         3.0346E-10 -5.2824E-07 -5.0781E-07 -2.7874E-16 -2.4980E-17  2.7894E-17
 SE:             2.2545E-03  3.3949E-03  3.3592E-03  4.2798E-02  3.9229E-02  5.5272E-02
 N:                     800         800         800          16          16          16

 P VAL.:         1.0000E+00  9.9988E-01  9.9988E-01  1.0000E+00  1.0000E+00  1.0000E+00

 ETAshrink(%):   3.5865E+01  2.0427E+00  2.6911E+00  3.3154E-05  6.2985E-06  7.7697E-06
 EBVshrink(%):   3.5864E+01  2.0426E+00  2.6910E+00  0.0000E+00  0.0000E+00  0.0000E+00
 EPSshrink(%):   1.2308E+01


 #TERE:
 Elapsed estimation time in seconds:   158.18
 Elapsed covariance time in seconds:     3.06

 ********************                               ITERATIVE TWO STAGE                              ********************
 #OBJT:**************                        FINAL VALUE OF OBJECTIVE FUNCTION                       ********************
 #OBJV:********************************************   -17077.303       **************************************************

 ********************                               ITERATIVE TWO STAGE                              ********************
 ********************                             FINAL PARAMETER ESTIMATE                           ********************

 THETA - VECTOR OF FIXED EFFECTS PARAMETERS   *********
         TH 1      TH 2      TH 3
         1.79E-01 -5.31E+00 -3.08E+00

 OMEGA - COV MATRIX FOR RANDOM EFFECTS - ETAS  ********
            ETA1      ETA2      ETA3      ETA4      ETA5      ETA6
 ETA1
+        1.01E-02
 ETA2
+        1.49E-04  9.80E-03
 ETA3
+        5.39E-04  6.58E-04  9.73E-03
 ETA4
+        0.00E+00  0.00E+00  0.00E+00  3.13E-02
 ETA5
+        0.00E+00  0.00E+00  0.00E+00 -5.61E-03  2.63E-02
 ETA6
+        0.00E+00  0.00E+00  0.00E+00  2.73E-02 -6.28E-03  5.21E-02

 SIGMA - COV MATRIX FOR RANDOM EFFECTS - EPSILONS  ****
            EPS1
 EPS1
+        3.00E-03

 OMEGA - CORR MATRIX FOR RANDOM EFFECTS - ETAS  *******
            ETA1      ETA2      ETA3      ETA4      ETA5      ETA6
 ETA1
+        1.00E-01
 ETA2
+        1.50E-02  9.90E-02
 ETA3
+        5.44E-02  6.74E-02  9.86E-02
 ETA4
+        0.00E+00  0.00E+00  0.00E+00  1.77E-01
 ETA5
+        0.00E+00  0.00E+00  0.00E+00 -1.96E-01  1.62E-01
 ETA6
+        0.00E+00  0.00E+00  0.00E+00  6.76E-01 -1.70E-01  2.28E-01

 SIGMA - CORR MATRIX FOR RANDOM EFFECTS - EPSILONS  ***
            EPS1
 EPS1
+        5.48E-02

 ********************                               ITERATIVE TWO STAGE                              ********************
 ********************                          STANDARD ERROR OF ESTIMATE (S)                        ********************

 THETA - VECTOR OF FIXED EFFECTS PARAMETERS   *********
         TH 1      TH 2      TH 3
         5.72E-03  3.67E-03  3.64E-03

 OMEGA - COV MATRIX FOR RANDOM EFFECTS - ETAS  ********
            ETA1      ETA2      ETA3      ETA4      ETA5      ETA6
 ETA1
+        9.16E-04
 ETA2
+        5.44E-04  5.23E-04
 ETA3
+        6.90E-04  3.85E-04  5.27E-04
 ETA4
+        0.00E+00  0.00E+00  0.00E+00  1.16E-02
 ETA5
+        0.00E+00  0.00E+00  0.00E+00  1.01E-02  1.53E-02
 ETA6
+        0.00E+00  0.00E+00  0.00E+00  1.64E-02  1.20E-02  2.90E-02

 SIGMA - COV MATRIX FOR RANDOM EFFECTS - EPSILONS  ****
            EPS1
 EPS1
+        5.56E-05

 OMEGA - CORR MATRIX FOR RANDOM EFFECTS - ETAS  *******
            ETA1      ETA2      ETA3      ETA4      ETA5      ETA6
 ETA1
+        4.56E-03
 ETA2
+        5.46E-02  2.64E-03
 ETA3
+        6.92E-02  3.89E-02  2.67E-03
 ETA4
+       ......... ......... .........  3.28E-02
 ETA5
+       ......... ......... .........  3.24E-01  4.73E-02
 ETA6
+       ......... ......... .........  1.79E-01  2.80E-01  6.34E-02

 SIGMA - CORR MATRIX FOR RANDOM EFFECTS - EPSILONS  ***
            EPS1
 EPS1
+        5.08E-04
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 #TBLN:      2
 #METH: Importance Sampling
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
 #TERM:
 OPTIMIZATION WAS COMPLETED

 ETABAR IS THE ARITHMETIC MEAN OF THE ETA-ESTIMATES,
 AND THE P-VALUE IS GIVEN FOR THE NULL HYPOTHESIS THAT THE TRUE MEAN IS 0.

 ETABAR:         2.7163E-04 -6.1665E-05 -6.3243E-05 -6.1617E-17  1.3042E-16  7.1262E-17
 SE:             2.2622E-03  3.3936E-03  3.3582E-03  4.2839E-02  3.9230E-02  5.5249E-02
 N:                     800         800         800          16          16          16

 P VAL.:         9.0442E-01  9.8550E-01  9.8497E-01  1.0000E+00  1.0000E+00  1.0000E+00

 ETAshrink(%):   3.5841E+01  2.0678E+00  2.7605E+00  1.0000E-10  1.0000E-10  3.5942E-02
 EBVshrink(%):   3.5952E+01  2.0481E+00  2.6983E+00  0.0000E+00  0.0000E+00  0.0000E+00
 EPSshrink(%):   1.2393E+01


 #TERE:
 Elapsed estimation time in seconds:   336.37
 Elapsed covariance time in seconds:    28.98

 ********************                               IMPORTANCE SAMPLING                              ********************
 #OBJT:**************                        FINAL VALUE OF OBJECTIVE FUNCTION                       ********************
 #OBJV:********************************************   -17079.681       **************************************************

 ********************                               IMPORTANCE SAMPLING                              ********************
 ********************                             FINAL PARAMETER ESTIMATE                           ********************

 THETA - VECTOR OF FIXED EFFECTS PARAMETERS   *********
         TH 1      TH 2      TH 3
         1.80E-01 -5.31E+00 -3.08E+00

 OMEGA - COV MATRIX FOR RANDOM EFFECTS - ETAS  ********
            ETA1      ETA2      ETA3      ETA4      ETA5      ETA6
 ETA1
+        1.01E-02
 ETA2
+        1.56E-04  9.80E-03
 ETA3
+        5.13E-04  6.52E-04  9.74E-03
 ETA4
+        0.00E+00  0.00E+00  0.00E+00  3.12E-02
 ETA5
+        0.00E+00  0.00E+00  0.00E+00 -5.60E-03  2.63E-02
 ETA6
+        0.00E+00  0.00E+00  0.00E+00  2.73E-02 -6.32E-03  5.21E-02

 SIGMA - COV MATRIX FOR RANDOM EFFECTS - EPSILONS  ****
            EPS1
 EPS1
+        3.00E-03

 OMEGA - CORR MATRIX FOR RANDOM EFFECTS - ETAS  *******
            ETA1      ETA2      ETA3      ETA4      ETA5      ETA6
 ETA1
+        1.01E-01
 ETA2
+        1.57E-02  9.90E-02
 ETA3
+        5.16E-02  6.68E-02  9.87E-02
 ETA4
+        0.00E+00  0.00E+00  0.00E+00  1.77E-01
 ETA5
+        0.00E+00  0.00E+00  0.00E+00 -1.96E-01  1.62E-01
 ETA6
+        0.00E+00  0.00E+00  0.00E+00  6.76E-01 -1.71E-01  2.28E-01

 SIGMA - CORR MATRIX FOR RANDOM EFFECTS - EPSILONS  ***
            EPS1
 EPS1
+        5.48E-02

 ********************                               IMPORTANCE SAMPLING                              ********************
 ********************                          STANDARD ERROR OF ESTIMATE (R)                        ********************

 THETA - VECTOR OF FIXED EFFECTS PARAMETERS   *********
         TH 1      TH 2      TH 3
         5.57E-03  3.58E-03  3.60E-03

 OMEGA - COV MATRIX FOR RANDOM EFFECTS - ETAS  ********
            ETA1      ETA2      ETA3      ETA4      ETA5      ETA6
 ETA1
+        8.87E-04
 ETA2
+        5.43E-04  5.15E-04
 ETA3
+        6.11E-04  3.67E-04  5.18E-04
 ETA4
+        0.00E+00  0.00E+00  0.00E+00  1.16E-02
 ETA5
+        0.00E+00  0.00E+00  0.00E+00  1.01E-02  1.53E-02
 ETA6
+        0.00E+00  0.00E+00  0.00E+00  1.64E-02  1.20E-02  2.90E-02

 SIGMA - COV MATRIX FOR RANDOM EFFECTS - EPSILONS  ****
            EPS1
 EPS1
+        5.51E-05

 OMEGA - CORR MATRIX FOR RANDOM EFFECTS - ETAS  *******
            ETA1      ETA2      ETA3      ETA4      ETA5      ETA6
 ETA1
+        4.40E-03
 ETA2
+        5.43E-02  2.60E-03
 ETA3
+        6.09E-02  3.71E-02  2.62E-03
 ETA4
+       ......... ......... .........  3.28E-02
 ETA5
+       ......... ......... .........  3.24E-01  4.73E-02
 ETA6
+       ......... ......... .........  1.79E-01  2.80E-01  6.35E-02

 SIGMA - CORR MATRIX FOR RANDOM EFFECTS - EPSILONS  ***
            EPS1
 EPS1
+        5.03E-04
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 #TBLN:      3
 #METH: Stochastic Approximation Expectation-Maximization
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
 #TERM:
 STOCHASTIC PORTION WAS COMPLETED
 REDUCED STOCHASTIC PORTION WAS COMPLETED

 ETABAR IS THE ARITHMETIC MEAN OF THE ETA-ESTIMATES,
 AND THE P-VALUE IS GIVEN FOR THE NULL HYPOTHESIS THAT THE TRUE MEAN IS 0.

 ETABAR:         1.5829E-05  3.1944E-06  4.5786E-06 -2.1419E-16  1.2528E-16 -1.1671E-16
 SE:             2.4989E-03  3.4066E-03  3.3682E-03  4.3097E-02  3.9288E-02  5.5352E-02
 N:                     800         800         800          16          16          16

 P VAL.:         9.9495E-01  9.9925E-01  9.9892E-01  1.0000E+00  1.0000E+00  1.0000E+00

 ETAshrink(%):   3.0881E+01  1.8104E+00  2.3886E+00  1.3560E-02  1.0000E-10  4.0477E-04
 EBVshrink(%):   3.0847E+01  1.8036E+00  2.3811E+00  0.0000E+00  0.0000E+00  0.0000E+00
 EPSshrink(%):   1.1803E+01


 #TERE:
 Elapsed estimation time in seconds:   753.21
 Elapsed covariance time in seconds:     0.36

 ********************                STOCHASTIC APPROXIMATION EXPECTATION-MAXIMIZATION               ********************
 #OBJT:**************                        FINAL VALUE OF LIKELIHOOD FUNCTION                      ********************
 #OBJV:********************************************   -36042.138       **************************************************

 ********************                STOCHASTIC APPROXIMATION EXPECTATION-MAXIMIZATION               ********************
 ********************                             FINAL PARAMETER ESTIMATE                           ********************

 THETA - VECTOR OF FIXED EFFECTS PARAMETERS   *********
         TH 1      TH 2      TH 3
         1.79E-01 -5.31E+00 -3.08E+00

 OMEGA - COV MATRIX FOR RANDOM EFFECTS - ETAS  ********
            ETA1      ETA2      ETA3      ETA4      ETA5      ETA6
 ETA1
+        1.07E-02
 ETA2
+        3.54E-04  9.83E-03
 ETA3
+        3.96E-04  6.65E-04  9.72E-03
 ETA4
+        0.00E+00  0.00E+00  0.00E+00  3.17E-02
 ETA5
+        0.00E+00  0.00E+00  0.00E+00 -5.56E-03  2.63E-02
 ETA6
+        0.00E+00  0.00E+00  0.00E+00  2.75E-02 -6.22E-03  5.23E-02

 SIGMA - COV MATRIX FOR RANDOM EFFECTS - EPSILONS  ****
            EPS1
 EPS1
+        2.99E-03

 OMEGA - CORR MATRIX FOR RANDOM EFFECTS - ETAS  *******
            ETA1      ETA2      ETA3      ETA4      ETA5      ETA6
 ETA1
+        1.03E-01
 ETA2
+        3.46E-02  9.91E-02
 ETA3
+        3.89E-02  6.80E-02  9.86E-02
 ETA4
+        0.00E+00  0.00E+00  0.00E+00  1.78E-01
 ETA5
+        0.00E+00  0.00E+00  0.00E+00 -1.92E-01  1.62E-01
 ETA6
+        0.00E+00  0.00E+00  0.00E+00  6.75E-01 -1.67E-01  2.29E-01

 SIGMA - CORR MATRIX FOR RANDOM EFFECTS - EPSILONS  ***
            EPS1
 EPS1
+        5.47E-02

 ********************                STOCHASTIC APPROXIMATION EXPECTATION-MAXIMIZATION               ********************
 ********************                          STANDARD ERROR OF ESTIMATE (S)                        ********************

 THETA - VECTOR OF FIXED EFFECTS PARAMETERS   *********
         TH 1      TH 2      TH 3
         5.45E-03  3.66E-03  3.62E-03

 OMEGA - COV MATRIX FOR RANDOM EFFECTS - ETAS  ********
            ETA1      ETA2      ETA3      ETA4      ETA5      ETA6
 ETA1
+        8.94E-04
 ETA2
+        5.11E-04  5.20E-04
 ETA3
+        6.19E-04  3.79E-04  5.16E-04
 ETA4
+        0.00E+00  0.00E+00  0.00E+00  1.18E-02
 ETA5
+        0.00E+00  0.00E+00  0.00E+00  1.03E-02  1.54E-02
 ETA6
+        0.00E+00  0.00E+00  0.00E+00  1.65E-02  1.20E-02  2.90E-02

 SIGMA - COV MATRIX FOR RANDOM EFFECTS - EPSILONS  ****
            EPS1
 EPS1
+        5.50E-05

 OMEGA - CORR MATRIX FOR RANDOM EFFECTS - ETAS  *******
            ETA1      ETA2      ETA3      ETA4      ETA5      ETA6
 ETA1
+        4.33E-03
 ETA2
+        4.98E-02  2.62E-03
 ETA3
+        6.05E-02  3.83E-02  2.62E-03
 ETA4
+       ......... ......... .........  3.30E-02
 ETA5
+       ......... ......... .........  3.27E-01  4.73E-02
 ETA6
+       ......... ......... .........  1.81E-01  2.81E-01  6.34E-02

 SIGMA - CORR MATRIX FOR RANDOM EFFECTS - EPSILONS  ***
            EPS1
 EPS1
+        5.02E-04
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 #TBLN:      4
 #METH: Objective Function Evaluation by Importance Sampling
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
 #TERM:
 EXPECTATION ONLY PROCESS COMPLETED

 ETABAR IS THE ARITHMETIC MEAN OF THE ETA-ESTIMATES,
 AND THE P-VALUE IS GIVEN FOR THE NULL HYPOTHESIS THAT THE TRUE MEAN IS 0.

 ETABAR:         9.6190E-04  8.6274E-05  1.1744E-04  1.3989E-16 -1.2653E-16  2.5112E-16
 SE:             2.2796E-03  3.3965E-03  3.3547E-03  4.2836E-02  3.9254E-02  5.5274E-02
 N:                     800         800         800          16          16          16

 P VAL.:         6.7305E-01  9.7974E-01  9.7207E-01  1.0000E+00  1.0000E+00  1.0000E+00

 ETAshrink(%):   3.6947E+01  2.1018E+00  2.7810E+00  6.1914E-01  8.2700E-02  1.4096E-01
 EBVshrink(%):   3.5643E+01  2.0453E+00  2.7050E+00  0.0000E+00  0.0000E+00  0.0000E+00
 EPSshrink(%):   1.2267E+01


 #TERE:
 Elapsed estimation time in seconds:   138.90
 Elapsed covariance time in seconds:    29.01

 ********************               OBJECTIVE FUNCTION EVALUATION BY IMPORTANCE SAMPLING             ********************
 #OBJT:**************                        FINAL VALUE OF OBJECTIVE FUNCTION                       ********************
 #OBJV:********************************************   -17075.409       **************************************************

 ********************               OBJECTIVE FUNCTION EVALUATION BY IMPORTANCE SAMPLING             ********************
 ********************                             FINAL PARAMETER ESTIMATE                           ********************

 THETA - VECTOR OF FIXED EFFECTS PARAMETERS   *********
         TH 1      TH 2      TH 3
         1.79E-01 -5.31E+00 -3.08E+00

 OMEGA - COV MATRIX FOR RANDOM EFFECTS - ETAS  ********
            ETA1      ETA2      ETA3      ETA4      ETA5      ETA6
 ETA1
+        1.07E-02
 ETA2
+        3.54E-04  9.83E-03
 ETA3
+        3.96E-04  6.65E-04  9.72E-03
 ETA4
+        0.00E+00  0.00E+00  0.00E+00  3.17E-02
 ETA5
+        0.00E+00  0.00E+00  0.00E+00 -5.56E-03  2.63E-02
 ETA6
+        0.00E+00  0.00E+00  0.00E+00  2.75E-02 -6.22E-03  5.23E-02

 SIGMA - COV MATRIX FOR RANDOM EFFECTS - EPSILONS  ****
            EPS1
 EPS1
+        2.99E-03

 OMEGA - CORR MATRIX FOR RANDOM EFFECTS - ETAS  *******
            ETA1      ETA2      ETA3      ETA4      ETA5      ETA6
 ETA1
+        1.03E-01
 ETA2
+        3.46E-02  9.91E-02
 ETA3
+        3.89E-02  6.80E-02  9.86E-02
 ETA4
+        0.00E+00  0.00E+00  0.00E+00  1.78E-01
 ETA5
+        0.00E+00  0.00E+00  0.00E+00 -1.92E-01  1.62E-01
 ETA6
+        0.00E+00  0.00E+00  0.00E+00  6.75E-01 -1.67E-01  2.29E-01

 SIGMA - CORR MATRIX FOR RANDOM EFFECTS - EPSILONS  ***
            EPS1
 EPS1
+        5.47E-02

 ********************               OBJECTIVE FUNCTION EVALUATION BY IMPORTANCE SAMPLING             ********************
 ********************                          STANDARD ERROR OF ESTIMATE (R)                        ********************

 THETA - VECTOR OF FIXED EFFECTS PARAMETERS   *********
         TH 1      TH 2      TH 3
         5.69E-03  3.59E-03  3.59E-03

 OMEGA - COV MATRIX FOR RANDOM EFFECTS - ETAS  ********
            ETA1      ETA2      ETA3      ETA4      ETA5      ETA6
 ETA1
+        9.60E-04
 ETA2
+        5.68E-04  5.17E-04
 ETA3
+        6.36E-04  3.68E-04  5.17E-04
 ETA4
+        0.00E+00  0.00E+00  0.00E+00  1.19E-02
 ETA5
+        0.00E+00  0.00E+00  0.00E+00  1.03E-02  1.54E-02
 ETA6
+        0.00E+00  0.00E+00  0.00E+00  1.66E-02  1.20E-02  2.91E-02

 SIGMA - COV MATRIX FOR RANDOM EFFECTS - EPSILONS  ****
            EPS1
 EPS1
+        5.48E-05

 OMEGA - CORR MATRIX FOR RANDOM EFFECTS - ETAS  *******
            ETA1      ETA2      ETA3      ETA4      ETA5      ETA6
 ETA1
+        4.65E-03
 ETA2
+        5.51E-02  2.61E-03
 ETA3
+        6.21E-02  3.71E-02  2.62E-03
 ETA4
+       ......... ......... .........  3.34E-02
 ETA5
+       ......... ......... .........  3.27E-01  4.74E-02
 ETA6
+       ......... ......... .........  1.80E-01  2.81E-01  6.37E-02

 SIGMA - CORR MATRIX FOR RANDOM EFFECTS - EPSILONS  ***
            EPS1
 EPS1
+        5.01E-04
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 #TBLN:      5
 #METH: MCMC Bayesian Analysis
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
 #TERM:
 BURN-IN WAS COMPLETED
 STATISTICAL PORTION WAS COMPLETED

 #TERE:
 Elapsed estimation time in seconds:   843.09
 Elapsed covariance time in seconds:     0.00

 ********************                              MCMC BAYESIAN ANALYSIS                            ********************
 #OBJT:**************                       AVERAGE VALUE OF LIKELIHOOD FUNCTION                     ********************
 #OBJV:********************************************   -35168.444       **************************************************
 #OBJS:********************************************       88.098 (STD) **************************************************

 ********************                              MCMC BAYESIAN ANALYSIS                            ********************
 ********************                             FINAL PARAMETER ESTIMATE                           ********************

 THETA - VECTOR OF FIXED EFFECTS PARAMETERS   *********
         TH 1      TH 2      TH 3
         1.80E-01 -5.31E+00 -3.08E+00

 OMEGA - COV MATRIX FOR RANDOM EFFECTS - ETAS  ********
            ETA1      ETA2      ETA3      ETA4      ETA5      ETA6
 ETA1
+        1.20E-02
 ETA2
+        5.44E-04  9.97E-03
 ETA3
+        1.03E-03  7.42E-04  9.81E-03
 ETA4
+        0.00E+00  0.00E+00  0.00E+00  4.38E-02
 ETA5
+        0.00E+00  0.00E+00  0.00E+00 -7.36E-03  3.44E-02
 ETA6
+        0.00E+00  0.00E+00  0.00E+00  3.80E-02 -7.76E-03  7.04E-02

 SIGMA - COV MATRIX FOR RANDOM EFFECTS - EPSILONS  ****
            EPS1
 EPS1
+        3.01E-03

 OMEGA - CORR MATRIX FOR RANDOM EFFECTS - ETAS  *******
            ETA1      ETA2      ETA3      ETA4      ETA5      ETA6
 ETA1
+        1.09E-01
 ETA2
+        4.96E-02  9.98E-02
 ETA3
+        9.50E-02  7.49E-02  9.90E-02
 ETA4
+        0.00E+00  0.00E+00  0.00E+00  2.04E-01
 ETA5
+        0.00E+00  0.00E+00  0.00E+00 -1.84E-01  1.81E-01
 ETA6
+        0.00E+00  0.00E+00  0.00E+00  6.72E-01 -1.50E-01  2.60E-01

 SIGMA - CORR MATRIX FOR RANDOM EFFECTS - EPSILONS  ***
            EPS1
 EPS1
+        5.49E-02

 ********************                              MCMC BAYESIAN ANALYSIS                            ********************
 ********************                STANDARD ERROR OF ESTIMATE (From Sample Variance)               ********************

 THETA - VECTOR OF FIXED EFFECTS PARAMETERS   *********
         TH 1      TH 2      TH 3
         6.68E-03  3.57E-03  3.81E-03

 OMEGA - COV MATRIX FOR RANDOM EFFECTS - ETAS  ********
            ETA1      ETA2      ETA3      ETA4      ETA5      ETA6
 ETA1
+        8.65E-04
 ETA2
+        5.63E-04  5.69E-04
 ETA3
+        6.45E-04  3.82E-04  5.25E-04
 ETA4
+        0.00E+00  0.00E+00  0.00E+00  2.03E-02
 ETA5
+        0.00E+00  0.00E+00  0.00E+00  1.35E-02  1.73E-02
 ETA6
+        0.00E+00  0.00E+00  0.00E+00  2.05E-02  1.55E-02  3.03E-02

 SIGMA - COV MATRIX FOR RANDOM EFFECTS - EPSILONS  ****
            EPS1
 EPS1
+        5.59E-05

 OMEGA - CORR MATRIX FOR RANDOM EFFECTS - ETAS  *******
            ETA1      ETA2      ETA3      ETA4      ETA5      ETA6
 ETA1
+        3.93E-03
 ETA2
+        5.10E-02  2.84E-03
 ETA3
+        5.89E-02  3.80E-02  2.64E-03
 ETA4
+        0.00E+00  0.00E+00  0.00E+00  4.41E-02
 ETA5
+        0.00E+00  0.00E+00  0.00E+00  2.62E-01  4.07E-02
 ETA6
+        0.00E+00  0.00E+00  0.00E+00  1.56E-01  2.62E-01  5.34E-02

 SIGMA - CORR MATRIX FOR RANDOM EFFECTS - EPSILONS  ***
            EPS1
 EPS1
+        5.09E-04
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 #TBLN:      6
 #METH: First Order Conditional Estimation with Interaction
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
 #TERM:
0MINIMIZATION SUCCESSFUL
 NO. OF FUNCTION EVALUATIONS USED:      447
 NO. OF SIG. DIGITS IN FINAL EST.:  2.2

 ETABAR IS THE ARITHMETIC MEAN OF THE ETA-ESTIMATES,
 AND THE P-VALUE IS GIVEN FOR THE NULL HYPOTHESIS THAT THE TRUE MEAN IS 0.

 ETABAR:        -3.2742E-04 -9.1717E-05 -7.1640E-05  2.9698E-17 -1.7621E-16 -1.2275E-16
 SE:             2.2699E-03  3.3953E-03  3.3596E-03  4.2896E-02  3.9228E-02  5.5279E-02
 N:                     800         800         800          16          16          16

 P VAL.:         8.8531E-01  9.7845E-01  9.8299E-01  1.0000E+00  1.0000E+00  1.0000E+00

 ETAshrink(%):   3.6584E+01  2.0740E+00  2.7145E+00  9.7958E-01  1.0000E-10  1.0000E-10
 EBVshrink(%):   3.5641E+01  2.0449E+00  2.6950E+00  0.0000E+00  0.0000E+00  0.0000E+00
 EPSshrink(%):   1.2336E+01


 #TERE:
 Elapsed estimation time in seconds:  1338.74
 Elapsed covariance time in seconds:  1585.52
 SKIPPING EXECUTION OF SLOW FNLMOD/FNLETA BY USER REQUEST

 ********************               FIRST ORDER CONDITIONAL ESTIMATION WITH INTERACTION              ********************
 #OBJT:**************                       MINIMUM VALUE OF OBJECTIVE FUNCTION                      ********************
 #OBJV:********************************************   -17078.416       **************************************************

 ********************               FIRST ORDER CONDITIONAL ESTIMATION WITH INTERACTION              ********************
 ********************                             FINAL PARAMETER ESTIMATE                           ********************

 THETA - VECTOR OF FIXED EFFECTS PARAMETERS   *********
         TH 1      TH 2      TH 3
         1.80E-01 -5.31E+00 -3.08E+00

 OMEGA - COV MATRIX FOR RANDOM EFFECTS - ETAS  ********
            ETA1      ETA2      ETA3      ETA4      ETA5      ETA6
 ETA1
+        1.05E-02
 ETA2
+        1.89E-04  9.81E-03
 ETA3
+        5.97E-04  6.70E-04  9.74E-03
 ETA4
+        0.00E+00  0.00E+00  0.00E+00  3.20E-02
 ETA5
+        0.00E+00  0.00E+00  0.00E+00 -4.38E-03  2.51E-02
 ETA6
+        0.00E+00  0.00E+00  0.00E+00  2.75E-02 -5.15E-03  4.98E-02

 SIGMA - COV MATRIX FOR RANDOM EFFECTS - EPSILONS  ****
            EPS1
 EPS1
+        3.00E-03

 OMEGA - CORR MATRIX FOR RANDOM EFFECTS - ETAS  *******
            ETA1      ETA2      ETA3      ETA4      ETA5      ETA6
 ETA1
+        1.02E-01
 ETA2
+        1.87E-02  9.91E-02
 ETA3
+        5.92E-02  6.85E-02  9.87E-02
 ETA4
+        0.00E+00  0.00E+00  0.00E+00  1.79E-01
 ETA5
+        0.00E+00  0.00E+00  0.00E+00 -1.55E-01  1.58E-01
 ETA6
+        0.00E+00  0.00E+00  0.00E+00  6.88E-01 -1.46E-01  2.23E-01

 SIGMA - CORR MATRIX FOR RANDOM EFFECTS - EPSILONS  ***
            EPS1
 EPS1
+        5.48E-02

 ********************               FIRST ORDER CONDITIONAL ESTIMATION WITH INTERACTION              ********************
 ********************                            STANDARD ERROR OF ESTIMATE                          ********************

 THETA - VECTOR OF FIXED EFFECTS PARAMETERS   *********
         TH 1      TH 2      TH 3
         5.63E-03  3.58E-03  3.59E-03

 OMEGA - COV MATRIX FOR RANDOM EFFECTS - ETAS  ********
            ETA1      ETA2      ETA3      ETA4      ETA5      ETA6
 ETA1
+        9.19E-04
 ETA2
+        5.54E-04  5.19E-04
 ETA3
+        6.17E-04  3.70E-04  5.20E-04
 ETA4
+       ......... ......... .........  1.11E-02
 ETA5
+       ......... ......... .........  7.13E-03  8.87E-03
 ETA6
+       ......... ......... .........  1.14E-02  8.73E-03  1.67E-02

 SIGMA - COV MATRIX FOR RANDOM EFFECTS - EPSILONS  ****
            EPS1
 EPS1
+        5.47E-05

 OMEGA - CORR MATRIX FOR RANDOM EFFECTS - ETAS  *******
            ETA1      ETA2      ETA3      ETA4      ETA5      ETA6
 ETA1
+        4.49E-03
 ETA2
+        5.46E-02  2.62E-03
 ETA3
+        6.05E-02  3.74E-02  2.64E-03
 ETA4
+       ......... ......... .........  3.10E-02
 ETA5
+       ......... ......... .........  2.42E-01  2.80E-02
 ETA6
+       ......... ......... .........  1.29E-01  2.38E-01  3.74E-02

 SIGMA - CORR MATRIX FOR RANDOM EFFECTS - EPSILONS  ***
            EPS1
 EPS1
+        5.00E-04
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 #CPUT: Total CPU Time in Seconds,     5151.812
