Mon 09/30/2013
03:05 PM
; Modified from appendix 4 of Jun Shen, Alison Boeckmann & Andrew Vick
; Modified for NONMEM 7.3
; Journal of Pharmacokinetics and Pharmacodynamics
; ISSN 1567-567X Volume 39 Number 3
; J Pharmacokinet Pharmacodyn (2012) 39:251-262 DOI 10.1007/s10928-012-9247-3

$PROBLEM Dose Superposition
$INPUT ID TIME CMT AMT DV ADDL II RATE
$DATA sumdosetf.csv IGNORE=@  ; identical to sall6.csv
$SUBROUTINES ADVAN6 TOL=10 TRANS1

$MODEL COMP=ABS ;(DEFDOSE)
       COMP=CENTRAL;(DEFOBS)
       COMP=PERI

$abbr declare dosetime(100),dose(100)
$abbr declare dowhile i
$abbr declare dowhile ndose

$PK
CALLFL=-2
IF (NEWIND < 2) NDOSE=0

IF (AMT > 0 .and. cmt==1) THEN
 NDOSE=NDOSE+1
 dosetime(NDOSE)=TIME
 DOSE(NDOSE)=AMT
ENDIF

CL = THETA(1)*EXP(ETA(1))
V2 = THETA(2)*EXP(ETA(2))
Q  = THETA(3)
V3 = THETA(4)

K=CL/V2
S2 =V2
K23=Q/V2
K32=Q/V3

;--------ABSORPTION MODEL-----------
F1=0
MTT  = THETA(5)*EXP(ETA(4))
NN   = THETA(6)*EXP(ETA(5))
BIO  = THETA(7)*EXP(ETA(3))
KTR  = (NN+1)/MTT

NFAC=SQRT(2*3.1416)*NN**(NN+0.5)*(EXP(-NN))*(1+1/(12*NN))
KINPT=BIO*KTR**(NN+1)/NFAC

$DES
INPT=0
I=1
DOWHILE (I<=NDOSE)
IPT=0
IF (T>=dosetime(I)) IPT=DOSE(I)*(T-dosetime(I))**NN*EXP(-KTR*(T-dosetime(I)))
INPT=INPT+IPT
I=I+1
ENDDO

 DADT(1)=KINPT*INPT-KTR*A(1)
 DADT(2)=KTR*A(1)-K23*A(2)-K*A(2)+K32*A(3)
 DADT(3)=K23*A(2)-K32*A(3)

$ERROR

Y = F*EXP(EPS(1))

$THETA
4 ;CL
3 ;V2
1 ;Q
2 ;V3
10 ;MTT
5 ;NN
0.85 ;BIO

$OMEGA 0 FIX 0 FIX 0 FIX 0 FIX 0 FIX
$SIGMA 0 FIX
$SIMULATION (123456) ONLY
;$ESTIMATION METHOD=0
$TABLE  ID TIME CMT CL V2 Q V3 MTT NN INPT ONEHEADER NOPRINT FORMAT=s1PE18.11 FILE=sumdosetn.txt

NM-TRAN MESSAGES
 WARNINGS AND ERRORS (IF ANY) FOR PROBLEM    1
 (WARNING  2) NM-TRAN INFERS THAT THE DATA ARE POPULATION.
 (WARNING  98) A RANDOM QUANTITY IS RAISED TO A POWER. IF THE RESULT AFFECTS
 THE VALUE OF THE OBJECTIVE FUNCTION AND THE "ONLYSIM" OPTION IS NOT USED,
 THE USER SHOULD ENSURE THAT THE RANDOM QUANTITY IS NEVER 0 WHEN THE POWER
 IS < 1.
 (WARNING  100) A RANDOM QUANTITY IS USED AS A POWER. IF THE RESULT AFFECTS
 THE VALUE OF THE OBJECTIVE FUNCTION AND THE "ONLYSIM" OPTION IS NOT USED,
 THE USER SHOULD ENSURE THAT THE QUANTITY RAISED TO THE POWER IS NOT 0.
 (DATA WARNING   2) RECORD         1, DATA ITEM   8, CONTENTS:
 THE NUMBER OF DATA ITEMS SPECIFIED IN $INPUT EXCEEDS THE NUMBER OF VALUES
 IN A RECORD OF THE NM-TRAN DATA FILE. NULLS WERE SUPPLIED FOR MISSING
 VALUES, STARTING WITH THE ABOVE NUMBERED DATA ITEM.
 (DATA WARNING   2) RECORD         2, DATA ITEM   8, CONTENTS:
 THE NUMBER OF DATA ITEMS SPECIFIED IN $INPUT EXCEEDS THE NUMBER OF VALUES
 IN A RECORD OF THE NM-TRAN DATA FILE. NULLS WERE SUPPLIED FOR MISSING
 VALUES, STARTING WITH THE ABOVE NUMBERED DATA ITEM.
 (WARNING  48) DES-DEFINED ITEMS ARE COMPUTED ONLY WHEN EVENT TIME
 INCREASES. E.G., DISPLAYED VALUES ASSOCIATED WITH THE FIRST EVENT RECORD
 OF AN INDIVIDUAL RECORD ARE COMPUTED WITH (THE LAST ADVANCE TO) AN EVENT
 TIME OF THE PRIOR INDIVIDUAL RECORD.
 * THE MAXIMUM NUMBER OF WARNINGS OF ONE OR MORE TYPES WAS REACHED.
 IT IS POSSIBLE THAT SOME WARNING MESSAGES WERE SUPPRESSED.
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
1NONLINEAR MIXED EFFECTS MODEL PROGRAM (NONMEM) VERSION 7.3beta7.0(P)
 ORIGINALLY DEVELOPED BY STUART BEAL, LEWIS SHEINER, AND ALISON BOECKMANN
 CURRENT DEVELOPERS ARE ROBERT BAUER, ICON DEVELOPMENT SOLUTIONS,
 AND ALISON BOECKMANN. IMPLEMENTATION, EFFICIENCY, AND STANDARDIZATION
 PERFORMED BY NOUS INFOSYSTEMS.
 PROBLEM NO.:         1
 Dose Superposition
 TOT. NO. OF OBS RECS:      119
 TOT. NO. OF INDIVIDUALS:      1
 GENERAL NONLINEAR KINETICS MODEL (ADVAN6)
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 SIMULATION STEP PERFORMED
 #CPUT: Total CPU Time in Seconds,        0.125
