$PROB RUN# Example 1 (from samp5l)
$INPUT ID TIME  DV=CONC AMT=DOSE RATE EVID MDV CMT SID CID
$DATA superid2.csv

$SUBROUTINES ADVAN1 TRANS2

$PK
MU_1=THETA(1)
MU_2=THETA(2)
CL=DEXP(MU_1+ETA(1)+ETA(3)+ETA(5))
V=DEXP(MU_2+ETA(2)+ETA(4)+ETA(6))
S1=V

$ERROR
Y = F + F*EPS(1)

; Initial values of THETA
$THETA 5.0 5.0
;$OMEGA 0.02 0.02 0.0 FIXED 0.0 FIXED 0.0 FIXED 0.0 FIXED
$OMEGA BLOCK(2)
0.05
0.00001 0.05

$OMEGA BLOCK(2)
0.1
0.00001 0.1

$OMEGA BLOCK(2)
0.5
0.00001 0.5

$SIGMA
0.05

$LEVEL
SID=(3[1],4[2])
CID=(5[3],6[4])

;$EST METHOD=ITS INTERACTION PRINT=1 NSIG=3 NITER=0 SIGL=6 FNLETA=0
$EST METHOD=IMPMAP INTERACTION PRINT=1 NSIG=3 NITER=50 CTYPE=3 ISAMPLE=300 SIGL=8 FNLETA=0 MCETA=3
$COV MATRIX=R UNCONDITIONAL
$TABLE  ID TIME CONC DOSE RATE EVID MDV CMT SID CID ETA1 ETA2 ETA3 ETA4 ETA5 ETA6
NOAPPEND ONEHEADER FILE=superid2_3.tab  NOPRINT
$TABLE  ID SID CID CL V ETA1 ETA2 ETA3 ETA4 ETA5 ETA6 NOAPPEND ONEHEADER FILE=superid2_3.dat FIRSTONLY NOPRINT FORMAT=,1PE15.8
