; Used for comparing single versus parallel computing for FOCE method.
;$SIZES LVR=30
;$SIZES LTH=15
;$SIZES LIM1=100
$PROB RUN# Example 1 (from samp5l)
$INPUT C ID JID TIME  DV=CONC AMT=DOSE RATE EVID MDV CMT SID CID
$DATA superid2_sim.csv IGNORE=C

$SUBROUTINES ADVAN1 TRANS2

$PK
MU_1=THETA(1)
MU_2=THETA(2)
CL=DEXP(MU_1+ETA(1)+ETA(3)+ETA(5))
V=DEXP(MU_2+ETA(2)+ETA(4)+ETA(6))
S1=V

$ERROR
Y = F + F*EPS(1)

; Initial values of THETA
$THETA 2.0  3.69
;INITIAL values of OMEGA
$OMEGA 0.01 0.01

$OMEGA 0.03 0.03

$OMEGA 0.1 0.1

$SIGMA
0.01

$LEVEL
SID=(3[1],4[2])
CID=(5[3],6[4])

$SIMULATION (567811 NORMAL) (2933012 UNIFORM) ONLYSIMULATION SUBPROBLEMS=1
$TABLE  ID TIME DV DOSE RATE EVID MDV CMT SID CID CL V ETA1 ETA2 ETA3 ETA4 ETA5 ETA6
NOAPPEND ONEHEADER FILE=superid2.csv  NOPRINT
$TABLE  ID SID CID CL V ETA1 ETA2 ETA3 ETA4 ETA5 ETA6 NOAPPEND ONEHEADER FILE=superid2.dat FIRSTONLY NOPRINT
