$PROB RUN#
$INPUT C ID TIME DV AMT RATE EVID MDV CMT ROWNUM SID
$DATA superid3.csv IGNORE=C

$SUBROUTINES ADVAN2 TRANS2

$PK
MU_1=THETA(1)
MU_2=THETA(2)
MU_3=THETA(3)
KA=DEXP(MU_1+ETA(1)+ETA(4))
CL=DEXP(MU_2+ETA(2)+ETA(5))
V=DEXP(MU_3+ETA(3)+ETA(6))
S2=V

$ERROR
IPRE=F
Y = IPRE + IPRE*EPS(1)

; Initial values of THETA
$THETA 0.2 -4 -2
;INITIAL values of OMEGA
$OMEGA BLOCK(3)
0.1
0.001 0.1
0.001 0.001 0.1

$OMEGA BLOCK(3)
0.3
0.001 0.3
0.001 0.001 0.3

;Initial value of SIGMA
$SIGMA
0.1     ;[P]

$LEVEL
SID=(4[1],5[2],6[3])


$EST METHOD=ITS INTERACTION PRINT=1 NSIG=2 NITER=500 SIGL=8 FNLETA=0 NOABORT CTYPE=3 MCETA=0
$EST METHOD=IMP INTERACTION PRINT=1 NSIG=2 NITER=500 SIGL=8 FNLETA=0 NOABORT CTYPE=3 MCETA=0 ISAMPLE=300 MAPITER=0
$EST METHOD=SAEM INTERACTION PRINT=10 NSIG=2 NITER=100 SIGL=8 FNLETA=0 NOABORT CTYPE=3 MCETA=0 ISAMPLE=2 CONSTRAIN=0
$EST METHOD=IMP EONLY=1 INTERACTION PRINT=1 NSIG=2 NITER=5 SIGL=8 FNLETA=0 NOABORT CTYPE=3 MCETA=0 ISAMPLE=300 MAPITER=0
$EST METHOD=BAYES INTERACTION PRINT=10 NSIG=2 NBURN=1000 NITER=500 SIGL=8 FNLETA=0 NOABORT CTYPE=3
$EST METHOD=1 INTERACTION PRINT=5 NSIG=2 NBURN=1000 NITER=500 SIGL=10 FNLETA=0 NOHABORT SLOW NONINFETA=1 MCETA=20
$COV MATRIX=R UNCONDITIONAL SIGL=10
$TABLE  ID TIME DV AMT RATE EVID MDV CMT SID KA CL V ETA1 ETA2 ETA3 ETA4 ETA5 ETA6
NOAPPEND ONEHEADER FILE=superid3_1.tab  NOPRINT
$TABLE  ID SID KA CL V ETA1 ETA2 ETA3 ETA4 ETA5 ETA6 NOAPPEND ONEHEADER FILE=superid3_1.dat
        FIRSTONLY NOPRINT FORMAT=,1PE15.8
