Mon 09/30/2013
04:02 PM
$SIZES LTH=60
$PROB RUN#
$INPUT C ID TIME DV AMT RATE EVID MDV CMT ROWNUM SID TYPE L2
$DATA superid3_6.csv IGNORE=C

$SUBROUTINES ADVAN2 TRANS2
$ABBR REPLACE THETA(SID_KA)=THETA(,4 to 19)
$ABBR REPLACE THETA(SID_CL)=THETA(,20 to 35)
$ABBR REPLACE THETA(SID_V)=THETA(,36 to 51)
$ABBR DECLARE DOWHILE I
$ABBR DECLARE INTEGER NSID

$PK
MU_1=THETA(1)
MU_2=THETA(2)
MU_3=THETA(3)
NSID=16
THSUM_KA=0.0
THSUM_CL=0.0
THSUM_V=0.0
I=1
DO WHILE (I<=NSID)
THSUM_KA=THSUM_KA-THETA(I+3)
THSUM_CL=THSUM_CL-THETA(I+19)
THSUM_V=THSUM_V-THETA(I+35)
I=I+1
ENDDO

IF(SID<NSID) THEN
KA=DEXP(MU_1+ETA(1)+THETA(SID_KA))
CL=DEXP(MU_2+ETA(2)+THETA(SID_CL))
V=DEXP(MU_3+ETA(3)+THETA(SID_V))
ELSE
KA=DEXP(MU_1+ETA(1)+THSUM_KA)
CL=DEXP(MU_2+ETA(2)+THSUM_CL)
V=DEXP(MU_3+ETA(3)+THSUM_V)
ENDIF

S2=V

$ERROR
IPRE=F
IF(TYPE==0) Y = IPRE + IPRE*EPS(1)
IF(TYPE==1.AND.SID<NSID) Y=THETA(SID_KA)+EPS(2)
IF(TYPE==1.AND.SID==NSID) Y=THSUM_KA+EPS(2)
IF(TYPE==2.AND.SID<NSID) Y=THETA(SID_CL)+EPS(3)
IF(TYPE==2.AND.SID==NSID) Y=THSUM_CL+EPS(3)
IF(TYPE==3.AND.SID<NSID) Y=THETA(SID_V)+EPS(4)
IF(TYPE==3.AND.SID==NSID) Y=THSUM_V+EPS(4)

; Initial values of THETA
$THETA 0.2 -4 -2
       (0.1)x15 (0.0 FIXED)
       (0.1)x15 (0.0 FIXED)
       (0.1)x15 (0.0 FIXED)
;INITIAL values of OMEGA
$OMEGA BLOCK(3) VALUES(0.1,0.001)
;$OMEGA (0.0 FIXED)

;Initial value of SIGMA
$SIGMA
0.1     ;[P]

;$SIGMA 0.3 0.3 0.3
$SIGMA BLOCK(3) VALUES(0.3,0.001)

;$EST METHOD=ITS INTERACTION PRINT=1 NSIG=2 NITER=500 SIGL=8 FNLETA=0 NOHABORT CTYPE=3 MCETA=10
;$EST METHOD=IMP INTERACTION PRINT=1 NSIG=2 NITER=500 SIGL=8 FNLETA=0 NOABORT CTYPE=3 MCETA=0 ISAMPLE=300 MAPITER=0
;$EST METHOD=SAEM INTERACTION PRINT=10 NSIG=2 NITER=100 SIGL=8 FNLETA=0 NOABORT CTYPE=3 MCETA=0 ISAMPLE=2 CONSTRAIN=0
;$EST METHOD=IMP EONLY=1 INTERACTION PRINT=1 NSIG=2 NITER=5 SIGL=8 FNLETA=0 NOABORT CTYPE=3 MCETA=0 ISAMPLE=300 MAPITER=0
;$EST METHOD=BAYES INTERACTION PRINT=10 NSIG=2 NBURN=1000 NITER=500 SIGL=8 FNLETA=0 NOABORT CTYPE=3
$EST METHOD=1 INTERACTION PRINT=1 NSIG=2 SIGL=10 FNLETA=0 NOHABORT NONINFETA=1 MCETA=20
$COV MATRIX=R UNCONDITIONAL SIGL=10
;$TABLE  ID TIME DV AMT RATE EVID MDV CMT SID KA CL V ETA1 ETA2 ETA3 ETA4 ETA5 ETA6
;NOAPPEND ONEHEADER FILE=superid3_6.tab  NOPRINT
;$TABLE  ID SID KA CL V ETA1 ETA2 ETA3 ETA4 ETA5 ETA6 NOAPPEND ONEHEADER FILE=superid3_6.dat
;        FIRSTONLY NOPRINT FORMAT=,1PE15.8

NM-TRAN MESSAGES
 WARNINGS AND ERRORS (IF ANY) FOR PROBLEM    1
 (WARNING  2) NM-TRAN INFERS THAT THE DATA ARE POPULATION.
 (WARNING  3) THERE MAY BE AN ERROR IN THE ABBREVIATED CODE. THE FOLLOWING
 ONE OR MORE RANDOM VARIABLES ARE DEFINED WITH "IF" STATEMENTS THAT DO NOT
 PROVIDE DEFINITIONS FOR BOTH THE "THEN" AND "ELSE" CASES. IF ALL
 CONDITIONS FAIL, THE VALUES OF THESE VARIABLES WILL BE ZERO.
   Y
 (MU_WARNING 13) MU_001: DOES NOT HAVE ADDITIVE ASSOCIATION WITH ETA(001)
 (MU_WARNING 13) MU_002: DOES NOT HAVE ADDITIVE ASSOCIATION WITH ETA(002)
 (MU_WARNING 13) MU_003: DOES NOT HAVE ADDITIVE ASSOCIATION WITH ETA(003)
 (MU_WARNING 13) MU_001: DOES NOT HAVE ADDITIVE ASSOCIATION WITH ETA(001)
 (MU_WARNING 19) ETA(001): HAS ALREADY BEEN MU_ ASSOCIATED, CANNOT BE USED AGAIN.
 (MU_WARNING 22) MU_001: HAS ALREADY BEEN MU_ ASSOCIATED, CANNOT BE USED AGAIN.
 (MU_WARNING 13) MU_002: DOES NOT HAVE ADDITIVE ASSOCIATION WITH ETA(002)
 (MU_WARNING 19) ETA(002): HAS ALREADY BEEN MU_ ASSOCIATED, CANNOT BE USED AGAIN.
 (MU_WARNING 22) MU_002: HAS ALREADY BEEN MU_ ASSOCIATED, CANNOT BE USED AGAIN.
 (MU_WARNING 13) MU_003: DOES NOT HAVE ADDITIVE ASSOCIATION WITH ETA(003)
 (MU_WARNING 19) ETA(003): HAS ALREADY BEEN MU_ ASSOCIATED, CANNOT BE USED AGAIN.
 (MU_WARNING 22) MU_003: HAS ALREADY BEEN MU_ ASSOCIATED, CANNOT BE USED AGAIN.

1NONLINEAR MIXED EFFECTS MODEL PROGRAM (NONMEM) VERSION 7.3beta7.0(P)
 ORIGINALLY DEVELOPED BY STUART BEAL, LEWIS SHEINER, AND ALISON BOECKMANN
 CURRENT DEVELOPERS ARE ROBERT BAUER, ICON DEVELOPMENT SOLUTIONS,
 AND ALISON BOECKMANN. IMPLEMENTATION, EFFICIENCY, AND STANDARDIZATION
 PERFORMED BY NOUS INFOSYSTEMS.
 PROBLEM NO.:         1
 RUN#
 TOT. NO. OF OBS RECS:     8048
 TOT. NO. OF INDIVIDUALS:    816
 ONE COMPARTMENT MODEL WITH FIRST-ORDER ABSORPTION (ADVAN2)
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 #TBLN:      1
 #METH: First Order Conditional Estimation with Interaction
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
 #TERM:
0MINIMIZATION TERMINATED
 DUE TO MAX. NO. OF FUNCTION EVALUATIONS EXCEEDED
 NO. OF FUNCTION EVALUATIONS USED:    14702
 NO. OF SIG. DIGITS UNREPORTABLE

 ETABAR IS THE ARITHMETIC MEAN OF THE ETA-ESTIMATES,
 AND THE P-VALUE IS GIVEN FOR THE NULL HYPOTHESIS THAT THE TRUE MEAN IS 0.

 ETABAR:        -1.8539E-04 -6.1053E-05 -1.1901E-04
 SE:             2.1841E-03  3.3238E-03  3.2881E-03
 N:                     816         816         816

 P VAL.:         9.3236E-01  9.8534E-01  9.7113E-01

 ETAshrink(%):   3.6691E+01  2.9922E+00  3.6487E+00
 EBVshrink(%):   3.6725E+01  3.0476E+00  3.7019E+00
 EPSshrink(%):   1.2290E+01  5.5910E-03  5.5910E-03  5.5910E-03


 #TERE:
 Elapsed estimation time in seconds:  3750.25
 Elapsed covariance time in seconds:  4469.10

 ********************               FIRST ORDER CONDITIONAL ESTIMATION WITH INTERACTION              ********************
 #OBJT:**************                       MINIMUM VALUE OF OBJECTIVE FUNCTION                      ********************
 #OBJV:********************************************   -18658.972       **************************************************

 ********************               FIRST ORDER CONDITIONAL ESTIMATION WITH INTERACTION              ********************
 ********************                             FINAL PARAMETER ESTIMATE                           ********************

 THETA - VECTOR OF FIXED EFFECTS PARAMETERS   *********
         TH 1      TH 2      TH 3      TH 4      TH 5      TH 6      TH 7      TH 8      TH 9      TH10      TH11      TH12
          TH13      TH14      TH15      TH16      TH17      TH18      TH19      TH20      TH21      TH22      TH23      TH24
         TH25      TH26      TH27      TH28      TH29      TH30      TH31      TH32      TH33      TH34      TH35      TH36
          TH37      TH38      TH39      TH40      TH41      TH42      TH43      TH44      TH45      TH46      TH47      TH48
         TH49      TH50      TH51
         1.80E-01 -5.31E+00 -3.08E+00 -4.16E-01 -2.51E-02  2.52E-02  9.88E-02 -1.19E-01 -6.08E-03 -1.89E-02 -1.94E-01 -2.63E-01
          3.14E-01  1.60E-01  2.31E-01  1.06E-01  4.79E-02  2.06E-02  0.00E+00  1.31E-01  4.48E-02 -1.14E-01  1.41E-01  1.14E-01
         1.89E-02  2.22E-01 -2.32E-01 -1.31E-01 -7.46E-02 -2.05E-01 -1.04E-01 -2.59E-01  2.61E-01  1.05E-01  0.00E+00 -2.80E-01
          7.18E-02  1.20E-01 -2.19E-01 -2.83E-02 -2.16E-01  3.19E-01 -1.61E-01 -4.31E-01  2.70E-01  3.48E-01  1.68E-01  1.44E-01
        -5.92E-02  1.12E-01  0.00E+00

 OMEGA - COV MATRIX FOR RANDOM EFFECTS - ETAS  ********
            ETA1      ETA2      ETA3
 ETA1
+        9.72E-03
 ETA2
+        1.00E-04  9.59E-03
 ETA3
+        4.77E-04  6.24E-04  9.51E-03

 SIGMA - COV MATRIX FOR RANDOM EFFECTS - EPSILONS  ****
            EPS1      EPS2      EPS3      EPS4
 EPS1
+        3.00E-03
 EPS2
+        0.00E+00  3.12E-02
 EPS3
+        0.00E+00 -4.57E-03  2.48E-02
 EPS4
+        0.00E+00  2.68E-02 -5.24E-03  4.95E-02

 OMEGA - CORR MATRIX FOR RANDOM EFFECTS - ETAS  *******
            ETA1      ETA2      ETA3
 ETA1
+        9.86E-02
 ETA2
+        1.04E-02  9.79E-02
 ETA3
+        4.95E-02  6.53E-02  9.75E-02

 SIGMA - CORR MATRIX FOR RANDOM EFFECTS - EPSILONS  ***
            EPS1      EPS2      EPS3      EPS4
 EPS1
+        5.48E-02
 EPS2
+        0.00E+00  1.77E-01
 EPS3
+        0.00E+00 -1.65E-01  1.57E-01
 EPS4
+        0.00E+00  6.82E-01 -1.50E-01  2.22E-01

 ********************               FIRST ORDER CONDITIONAL ESTIMATION WITH INTERACTION              ********************
 ********************                            STANDARD ERROR OF ESTIMATE                          ********************

 THETA - VECTOR OF FIXED EFFECTS PARAMETERS   *********
         TH 1      TH 2      TH 3      TH 4      TH 5      TH 6      TH 7      TH 8      TH 9      TH10      TH11      TH12
          TH13      TH14      TH15      TH16      TH17      TH18      TH19      TH20      TH21      TH22      TH23      TH24
         TH25      TH26      TH27      TH28      TH29      TH30      TH31      TH32      TH33      TH34      TH35      TH36
          TH37      TH38      TH39      TH40      TH41      TH42      TH43      TH44      TH45      TH46      TH47      TH48
         TH49      TH50      TH51
         5.47E-03  3.54E-03  3.56E-03  2.06E-02  2.09E-02  2.10E-02  2.10E-02  2.08E-02  2.09E-02  2.11E-02  2.09E-02  2.07E-02
          2.14E-02  2.12E-02  2.12E-02  2.11E-02  2.09E-02  2.09E-02 .........  1.37E-02  1.37E-02  1.37E-02  1.37E-02  1.37E-02
         1.37E-02  1.37E-02  1.37E-02  1.37E-02  1.37E-02  1.37E-02  1.37E-02  1.37E-02  1.37E-02  1.37E-02 .........  1.37E-02
          1.37E-02  1.37E-02  1.37E-02  1.37E-02  1.37E-02  1.38E-02  1.38E-02  1.37E-02  1.37E-02  1.38E-02  1.37E-02  1.37E-02
         1.37E-02  1.37E-02 .........

 OMEGA - COV MATRIX FOR RANDOM EFFECTS - ETAS  ********
            ETA1      ETA2      ETA3
 ETA1
+        8.53E-04
 ETA2
+        5.32E-04  5.03E-04
 ETA3
+        5.95E-04  3.59E-04  5.05E-04

 SIGMA - COV MATRIX FOR RANDOM EFFECTS - EPSILONS  ****
            EPS1      EPS2      EPS3      EPS4
 EPS1
+        5.49E-05
 EPS2
+       .........  1.12E-02
 EPS3
+       .........  7.16E-03  8.83E-03
 EPS4
+       .........  1.20E-02  9.17E-03  1.76E-02

 OMEGA - CORR MATRIX FOR RANDOM EFFECTS - ETAS  *******
            ETA1      ETA2      ETA3
 ETA1
+        4.33E-03
 ETA2
+        5.50E-02  2.57E-03
 ETA3
+        6.14E-02  3.71E-02  2.59E-03

 SIGMA - CORR MATRIX FOR RANDOM EFFECTS - EPSILONS  ***
            EPS1      EPS2      EPS3      EPS4
 EPS1
+        5.01E-04
 EPS2
+       .........  3.17E-02
 EPS3
+       .........  2.47E-01  2.81E-02
 EPS4
+       .........  1.36E-01  2.54E-01  3.95E-02
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 #CPUT: Total CPU Time in Seconds,     8209.194
