$PROB RUN# Example 1 (from samp5l)
$INPUT ID TIME  DV=CONC AMT=DOSE RATE EVID MDV CMT
$DATA tdist6.csv IGNORE=C

$SUBROUTINES ADVAN3 TRANS4

$PK
MU_1=THETA(1)
MU_2=THETA(2)
MU_3=THETA(3)
MU_4=THETA(4)
NU=4.0
CL=EXP(MU_1+ETA(1))
V1=EXP(MU_2+ETA(2))
Q=EXP(MU_3+ETA(3))
V2=EXP(MU_4+ETA(4))
S1=V1

$ERROR
Y = F + F*EPS(1)

;$THETA 1.68338E+00  1.58811E+00  8.12694E-01  2.37435E+00
$THETA 2 2 2 2
$OMEGA BLOCK(4)
0.3
0.001 0.3
0.001 0.001 0.3
0.001 0.001 0.001 0.3

$SIGMA
0.3

$EST METHOD=ITS LAPLACE INTERACTION MAXEVAL=9999 PRINT=5 NOHABORT SIGL=8 CTYPE=3 NITER=200
$EST METHOD=IMP INTERACTION MAXEVAL=9999 PRINT=1 NOABORT ISAMPLE=3000 NITER=200 SIGL=8 DF=1
$EST METHOD=1 LAPLACE INTERACTION MAXEVAL=9999 PRINT=1 NOHABORT
$COV MATRIX=R UNCONDITIONAL
