Mon 09/09/2013
08:21 AM
$PROB RUN# Example 1 (from samp5l)
$INPUT ID TIME  DV=CONC AMT=DOSE RATE EVID MDV CMT
$DATA tdist6.csv IGNORE=C

$SUBROUTINES ADVAN3 TRANS4

$PK
MU_1=THETA(1)
MU_2=THETA(2)
MU_3=THETA(3)
MU_4=THETA(4)
NU=4.0
CL=EXP(MU_1+ETA(1))
V1=EXP(MU_2+ETA(2))
Q=EXP(MU_3+ETA(3))
V2=EXP(MU_4+ETA(4))
S1=V1

$ERROR
Y = F + F*EPS(1)

;$THETA 1.68338E+00  1.58811E+00  8.12694E-01  2.37435E+00
$THETA 2 2 2 2
$OMEGA BLOCK(4)
0.3
0.001 0.3
0.001 0.001 0.3
0.001 0.001 0.001 0.3

$SIGMA
0.3

$EST METHOD=ITS LAPLACE INTERACTION MAXEVAL=9999 PRINT=5 NOHABORT SIGL=8 CTYPE=3 NITER=200
$EST METHOD=IMP INTERACTION MAXEVAL=9999 PRINT=1 NOABORT ISAMPLE=3000 NITER=200 SIGL=8 DF=1
$EST METHOD=1 LAPLACE INTERACTION MAXEVAL=9999 PRINT=1 NOHABORT
$COV MATRIX=R UNCONDITIONAL

NM-TRAN MESSAGES
 WARNINGS AND ERRORS (IF ANY) FOR PROBLEM    1
 (WARNING  2) NM-TRAN INFERS THAT THE DATA ARE POPULATION.
 (WARNING  87) WITH "LAPLACIAN" AND "INTERACTION", "NUMERICAL" AND "SLOW"
 ARE ALSO REQUIRED ON $ESTIM RECORD, AND "SLOW" IS REQUIRED ON $COV
 RECORD. NM-TRAN HAS SUPPLIED THESE OPTIONS.
 (WARNING  87) WITH "LAPLACIAN" AND "INTERACTION", "NUMERICAL" AND "SLOW"
 ARE ALSO REQUIRED ON $ESTIM RECORD, AND "SLOW" IS REQUIRED ON $COV
 RECORD. NM-TRAN HAS SUPPLIED THESE OPTIONS.
 (WARNING  87) WITH "LAPLACIAN" AND "INTERACTION", "NUMERICAL" AND "SLOW"
 ARE ALSO REQUIRED ON $ESTIM RECORD, AND "SLOW" IS REQUIRED ON $COV
 RECORD. NM-TRAN HAS SUPPLIED THESE OPTIONS.

1NONLINEAR MIXED EFFECTS MODEL PROGRAM (NONMEM) VERSION 7.3beta7.0(N)
 ORIGINALLY DEVELOPED BY STUART BEAL, LEWIS SHEINER, AND ALISON BOECKMANN
 CURRENT DEVELOPERS ARE ROBERT BAUER, ICON DEVELOPMENT SOLUTIONS,
 AND ALISON BOECKMANN. IMPLEMENTATION, EFFICIENCY, AND STANDARDIZATION
 PERFORMED BY NOUS INFOSYSTEMS.
 PROBLEM NO.:         1
 RUN# Example 1 (from samp5l)
 TOT. NO. OF OBS RECS:      500
 TOT. NO. OF INDIVIDUALS:    100
 TWO COMPARTMENT MODEL (ADVAN3)
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 #TBLN:      1
 #METH: Iterative Two Stage
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
 #TERM:
 OPTIMIZATION WAS COMPLETED

 ETABAR IS THE ARITHMETIC MEAN OF THE ETA-ESTIMATES,
 AND THE P-VALUE IS GIVEN FOR THE NULL HYPOTHESIS THAT THE TRUE MEAN IS 0.

 ETABAR:         6.8035E-08 -3.1435E-08  1.3001E-07  1.1983E-07
 SE:             2.3700E-02  2.9494E-02  1.9703E-02  2.7107E-02
 N:                     100         100         100         100

 P VAL.:         1.0000E+00  1.0000E+00  9.9999E-01  1.0000E+00

 ETAshrink(%):   2.1815E+00  6.1585E+00  1.6219E+01  6.1486E+00
 EBVshrink(%):   2.1815E+00  6.1585E+00  1.6219E+01  6.1487E+00
 EPSshrink(%):   4.0829E+01


 #TERE:
 Elapsed estimation time in seconds:    16.80
 Elapsed covariance time in seconds:     0.34

 ********************                               ITERATIVE TWO STAGE                              ********************
 #OBJT:**************                        FINAL VALUE OF OBJECTIVE FUNCTION                       ********************
 #OBJV:********************************************    -1639.782       **************************************************

 ********************                               ITERATIVE TWO STAGE                              ********************
 ********************                             FINAL PARAMETER ESTIMATE                           ********************

 THETA - VECTOR OF FIXED EFFECTS PARAMETERS   *********
         TH 1      TH 2      TH 3      TH 4
         1.69E+00  1.58E+00  8.03E-01  2.38E+00

 OMEGA - COV MATRIX FOR RANDOM EFFECTS - ETAS  ********
            ETA1      ETA2      ETA3      ETA4
 ETA1
+        5.93E-02
 ETA2
+        2.63E-02  9.98E-02
 ETA3
+        4.33E-03  3.51E-02  5.59E-02
 ETA4
+        2.20E-02 -9.28E-03  3.49E-02  8.43E-02

 SIGMA - COV MATRIX FOR RANDOM EFFECTS - EPSILONS  ****
            EPS1
 EPS1
+        9.46E-03

 OMEGA - CORR MATRIX FOR RANDOM EFFECTS - ETAS  *******
            ETA1      ETA2      ETA3      ETA4
 ETA1
+        2.44E-01
 ETA2
+        3.41E-01  3.16E-01
 ETA3
+        7.52E-02  4.70E-01  2.36E-01
 ETA4
+        3.12E-01 -1.01E-01  5.09E-01  2.90E-01

 SIGMA - CORR MATRIX FOR RANDOM EFFECTS - EPSILONS  ***
            EPS1
 EPS1
+        9.73E-02

 ********************                               ITERATIVE TWO STAGE                              ********************
 ********************                          STANDARD ERROR OF ESTIMATE (S)                        ********************

 THETA - VECTOR OF FIXED EFFECTS PARAMETERS   *********
         TH 1      TH 2      TH 3      TH 4
         2.79E-02  4.61E-02  3.53E-02  3.63E-02

 OMEGA - COV MATRIX FOR RANDOM EFFECTS - ETAS  ********
            ETA1      ETA2      ETA3      ETA4
 ETA1
+        7.19E-03
 ETA2
+        1.30E-02  1.68E-02
 ETA3
+        9.91E-03  9.58E-03  1.50E-02
 ETA4
+        1.16E-02  1.26E-02  1.47E-02  1.76E-02

 SIGMA - COV MATRIX FOR RANDOM EFFECTS - EPSILONS  ****
            EPS1
 EPS1
+        1.42E-03

 OMEGA - CORR MATRIX FOR RANDOM EFFECTS - ETAS  *******
            ETA1      ETA2      ETA3      ETA4
 ETA1
+        1.48E-02
 ETA2
+        1.44E-01  2.66E-02
 ETA3
+        1.69E-01  1.20E-01  3.18E-02
 ETA4
+        1.33E-01  1.35E-01  1.41E-01  3.03E-02

 SIGMA - CORR MATRIX FOR RANDOM EFFECTS - EPSILONS  ***
            EPS1
 EPS1
+        7.32E-03

 ********************                               ITERATIVE TWO STAGE                              ********************
 ********************                        COVARIANCE MATRIX OF ESTIMATE (S)                       ********************

            TH 1      TH 2      TH 3      TH 4      OM11      OM12      OM13      OM14      OM22      OM23      OM24      OM33
             OM34      OM44      SG11
 TH 1
+        7.77E-04
 TH 2
+        4.11E-04  2.12E-03
 TH 3
+        1.13E-04  8.11E-04  1.25E-03
 TH 4
+        2.51E-04 -7.80E-05  7.28E-04  1.32E-03
 OM11
+        4.18E-06  1.08E-04  1.18E-05 -3.46E-05  5.16E-05
 OM12
+        7.53E-05  2.77E-04  1.06E-04  2.09E-06  5.52E-05  1.70E-04
 OM13
+       -2.65E-05  1.24E-04 -2.63E-07 -3.76E-05  4.07E-05  5.79E-05  9.83E-05
 OM14
+       -9.72E-05  7.78E-05  1.96E-05 -2.18E-05  4.02E-05  1.88E-05  7.98E-05  1.34E-04
 OM22
+        6.67E-05  2.87E-05 -1.18E-04 -1.38E-04  3.51E-05  1.23E-04  3.11E-05  8.60E-06  2.82E-04
 OM23
+       -1.13E-05 -1.84E-04 -9.40E-05 -2.02E-05 -7.02E-06 -2.77E-05  8.36E-06 -2.12E-06 -8.82E-06  9.18E-05
 OM24
+        1.53E-05  3.54E-05  7.74E-05  1.56E-04  1.18E-05  2.43E-05  1.92E-05  6.62E-06 -9.61E-05  2.74E-05  1.59E-04
 OM33
+       -7.11E-05 -2.17E-04 -3.50E-05  4.55E-05 -1.03E-05 -5.54E-05  1.24E-05  2.41E-05 -7.43E-05  5.89E-05  3.37E-05  2.26E-04
 OM34
+       -3.83E-05  2.43E-05  6.74E-05  7.39E-05  1.20E-05 -6.29E-06  4.58E-05  5.30E-05 -7.40E-05 -2.02E-05  6.74E-05  1.40E-04
          2.15E-04
 OM44
+       -1.05E-04  9.52E-05  7.29E-05 -1.25E-05  2.66E-05 -7.39E-06  7.15E-05  1.47E-04 -2.66E-05 -4.13E-05  3.92E-06  1.04E-04
          1.97E-04  3.09E-04
 SG11
+       -1.24E-06  1.37E-05  8.24E-06  1.37E-07  4.78E-07  8.30E-07 -1.38E-06 -4.08E-07 -2.91E-06 -2.18E-06 -1.35E-07 -9.11E-06
         -5.95E-06 -4.19E-06  2.03E-06

 ********************                               ITERATIVE TWO STAGE                              ********************
 ********************                        CORRELATION MATRIX OF ESTIMATE (S)                      ********************

            TH 1      TH 2      TH 3      TH 4      OM11      OM12      OM13      OM14      OM22      OM23      OM24      OM33
             OM34      OM44      SG11
 TH 1
+        2.79E-02
 TH 2
+        3.20E-01  4.61E-02
 TH 3
+        1.15E-01  4.98E-01  3.53E-02
 TH 4
+        2.48E-01 -4.66E-02  5.68E-01  3.63E-02
 OM11
+        2.09E-02  3.26E-01  4.65E-02 -1.33E-01  7.19E-03
 OM12
+        2.07E-01  4.61E-01  2.31E-01  4.42E-03  5.90E-01  1.30E-02
 OM13
+       -9.57E-02  2.72E-01 -7.49E-04 -1.04E-01  5.71E-01  4.49E-01  9.91E-03
 OM14
+       -3.01E-01  1.46E-01  4.80E-02 -5.20E-02  4.84E-01  1.25E-01  6.95E-01  1.16E-02
 OM22
+        1.43E-01  3.71E-02 -1.99E-01 -2.26E-01  2.91E-01  5.63E-01  1.87E-01  4.43E-02  1.68E-02
 OM23
+       -4.21E-02 -4.16E-01 -2.78E-01 -5.80E-02 -1.02E-01 -2.22E-01  8.80E-02 -1.91E-02 -5.48E-02  9.58E-03
 OM24
+        4.34E-02  6.08E-02  1.74E-01  3.40E-01  1.31E-01  1.48E-01  1.53E-01  4.53E-02 -4.54E-01  2.27E-01  1.26E-02
 OM33
+       -1.70E-01 -3.13E-01 -6.59E-02  8.34E-02 -9.57E-02 -2.83E-01  8.35E-02  1.39E-01 -2.95E-01  4.09E-01  1.78E-01  1.50E-02
 OM34
+       -9.37E-02  3.60E-02  1.30E-01  1.39E-01  1.14E-01 -3.29E-02  3.15E-01  3.13E-01 -3.01E-01 -1.44E-01  3.65E-01  6.38E-01
          1.47E-02
 OM44
+       -2.15E-01  1.18E-01  1.17E-01 -1.97E-02  2.11E-01 -3.23E-02  4.10E-01  7.24E-01 -9.03E-02 -2.45E-01  1.77E-02  3.96E-01
          7.65E-01  1.76E-02
 SG11
+       -3.14E-02  2.09E-01  1.64E-01  2.64E-03  4.67E-02  4.48E-02 -9.81E-02 -2.47E-02 -1.22E-01 -1.60E-01 -7.51E-03 -4.26E-01
         -2.85E-01 -1.67E-01  1.42E-03
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 #TBLN:      2
 #METH: Importance Sampling
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
 #TERM:
 OPTIMIZATION WAS COMPLETED

 ETABAR IS THE ARITHMETIC MEAN OF THE ETA-ESTIMATES,
 AND THE P-VALUE IS GIVEN FOR THE NULL HYPOTHESIS THAT THE TRUE MEAN IS 0.

 ETABAR:        -9.5542E-06 -3.8230E-04 -7.2086E-05  1.6791E-04
 SE:             2.3597E-02  2.9609E-02  1.9291E-02  2.6780E-02
 N:                     100         100         100         100

 P VAL.:         9.9968E-01  9.8970E-01  9.9702E-01  9.9500E-01

 ETAshrink(%):   2.3909E+00  6.5637E+00  1.7124E+01  6.6714E+00
 EBVshrink(%):   2.3008E+00  6.3932E+00  1.7179E+01  6.5577E+00
 EPSshrink(%):   4.0880E+01


 #TERE:
 Elapsed estimation time in seconds:   195.40
 Elapsed covariance time in seconds:    10.09

 ********************                               IMPORTANCE SAMPLING                              ********************
 #OBJT:**************                        FINAL VALUE OF OBJECTIVE FUNCTION                       ********************
 #OBJV:********************************************    -1645.141       **************************************************

 ********************                               IMPORTANCE SAMPLING                              ********************
 ********************                             FINAL PARAMETER ESTIMATE                           ********************

 THETA - VECTOR OF FIXED EFFECTS PARAMETERS   *********
         TH 1      TH 2      TH 3      TH 4
         1.68E+00  1.57E+00  7.87E-01  2.36E+00

 OMEGA - COV MATRIX FOR RANDOM EFFECTS - ETAS  ********
            ETA1      ETA2      ETA3      ETA4
 ETA1
+        5.90E-02
 ETA2
+        2.68E-02  1.01E-01
 ETA3
+        3.60E-03  3.45E-02  5.47E-02
 ETA4
+        2.13E-02 -1.08E-02  3.38E-02  8.32E-02

 SIGMA - COV MATRIX FOR RANDOM EFFECTS - EPSILONS  ****
            EPS1
 EPS1
+        9.74E-03

 OMEGA - CORR MATRIX FOR RANDOM EFFECTS - ETAS  *******
            ETA1      ETA2      ETA3      ETA4
 ETA1
+        2.43E-01
 ETA2
+        3.46E-01  3.18E-01
 ETA3
+        6.34E-02  4.63E-01  2.34E-01
 ETA4
+        3.04E-01 -1.17E-01  5.01E-01  2.88E-01

 SIGMA - CORR MATRIX FOR RANDOM EFFECTS - EPSILONS  ***
            EPS1
 EPS1
+        9.87E-02

 ********************                               IMPORTANCE SAMPLING                              ********************
 ********************                          STANDARD ERROR OF ESTIMATE (R)                        ********************

 THETA - VECTOR OF FIXED EFFECTS PARAMETERS   *********
         TH 1      TH 2      TH 3      TH 4
         2.50E-02  3.43E-02  2.98E-02  3.17E-02

 OMEGA - COV MATRIX FOR RANDOM EFFECTS - ETAS  ********
            ETA1      ETA2      ETA3      ETA4
 ETA1
+        9.05E-03
 ETA2
+        9.21E-03  1.81E-02
 ETA3
+        7.45E-03  1.13E-02  1.34E-02
 ETA4
+        8.52E-03  1.12E-02  1.11E-02  1.46E-02

 SIGMA - COV MATRIX FOR RANDOM EFFECTS - EPSILONS  ****
            EPS1
 EPS1
+        1.32E-03

 OMEGA - CORR MATRIX FOR RANDOM EFFECTS - ETAS  *******
            ETA1      ETA2      ETA3      ETA4
 ETA1
+        1.86E-02
 ETA2
+        9.74E-02  2.83E-02
 ETA3
+        1.29E-01  1.16E-01  2.87E-02
 ETA4
+        1.03E-01  1.20E-01  9.83E-02  2.54E-02

 SIGMA - CORR MATRIX FOR RANDOM EFFECTS - EPSILONS  ***
            EPS1
 EPS1
+        6.69E-03

 ********************                               IMPORTANCE SAMPLING                              ********************
 ********************                        COVARIANCE MATRIX OF ESTIMATE (R)                       ********************

            TH 1      TH 2      TH 3      TH 4      OM11      OM12      OM13      OM14      OM22      OM23      OM24      OM33
             OM34      OM44      SG11
 TH 1
+        6.23E-04
 TH 2
+        3.07E-04  1.18E-03
 TH 3
+        9.86E-05  3.68E-04  8.88E-04
 TH 4
+        2.69E-04 -7.66E-05  5.59E-04  1.00E-03
 OM11
+        1.18E-06  1.17E-06  3.15E-06  2.31E-06  8.18E-05
 OM12
+        6.25E-07 -3.78E-06  2.65E-06  1.06E-06  4.01E-05  8.49E-05
 OM13
+        1.66E-06  1.46E-06 -2.51E-06  1.32E-06  1.39E-05  2.81E-05  5.55E-05
 OM14
+        1.72E-06  4.15E-06  3.42E-06  4.62E-06  3.61E-05  4.80E-06  3.80E-05  7.25E-05
 OM22
+       -7.22E-06 -1.41E-05 -4.52E-05 -3.44E-05  2.17E-05  7.99E-05  2.70E-05 -4.67E-06  3.26E-04
 OM23
+        2.00E-07 -1.41E-05  3.32E-05  1.47E-05  6.96E-06  2.60E-05  3.06E-05  1.66E-05  8.83E-05  1.29E-04
 OM24
+        3.43E-06 -4.70E-06  3.11E-05  2.13E-05  1.69E-05  2.81E-05  2.80E-05  3.20E-05 -3.11E-05  6.55E-05  1.25E-04
 OM33
+        2.29E-07 -1.67E-05  3.40E-05  1.29E-05  4.06E-06  1.01E-05  2.13E-05  1.48E-05  1.58E-05  8.36E-05  5.44E-05  1.81E-04
 OM34
+        1.25E-06  2.88E-06 -2.49E-06 -2.28E-06  7.04E-06  1.02E-05  3.14E-05  2.76E-05 -1.58E-05  1.86E-05  4.13E-05  1.07E-04
          1.23E-04
 OM44
+        2.93E-06  1.71E-05 -9.00E-06 -4.04E-06  1.68E-05 -3.65E-06  3.22E-05  5.59E-05 -9.23E-06 -7.47E-06 -9.41E-06  6.69E-05
          1.16E-04  2.14E-04
 SG11
+       -2.17E-08  9.08E-07  3.86E-10  3.59E-07 -7.00E-07 -5.97E-07 -1.54E-06 -1.28E-06 -2.23E-06 -8.24E-07 -9.46E-07 -4.77E-06
         -3.33E-06 -2.86E-06  1.75E-06

 ********************                               IMPORTANCE SAMPLING                              ********************
 ********************                        CORRELATION MATRIX OF ESTIMATE (R)                      ********************

            TH 1      TH 2      TH 3      TH 4      OM11      OM12      OM13      OM14      OM22      OM23      OM24      OM33
             OM34      OM44      SG11
 TH 1
+        2.50E-02
 TH 2
+        3.58E-01  3.43E-02
 TH 3
+        1.33E-01  3.60E-01  2.98E-02
 TH 4
+        3.40E-01 -7.05E-02  5.92E-01  3.17E-02
 OM11
+        5.23E-03  3.78E-03  1.17E-02  8.06E-03  9.05E-03
 OM12
+        2.72E-03 -1.20E-02  9.65E-03  3.63E-03  4.82E-01  9.21E-03
 OM13
+        8.91E-03  5.72E-03 -1.13E-02  5.58E-03  2.06E-01  4.09E-01  7.45E-03
 OM14
+        8.07E-03  1.42E-02  1.35E-02  1.71E-02  4.69E-01  6.12E-02  5.99E-01  8.52E-03
 OM22
+       -1.60E-02 -2.27E-02 -8.39E-02 -6.00E-02  1.33E-01  4.80E-01  2.00E-01 -3.04E-02  1.81E-02
 OM23
+        7.06E-04 -3.64E-02  9.82E-02  4.09E-02  6.79E-02  2.49E-01  3.62E-01  1.72E-01  4.31E-01  1.13E-02
 OM24
+        1.23E-02 -1.23E-02  9.32E-02  6.01E-02  1.67E-01  2.73E-01  3.37E-01  3.36E-01 -1.54E-01  5.17E-01  1.12E-02
 OM33
+        6.82E-04 -3.63E-02  8.48E-02  3.02E-02  3.34E-02  8.18E-02  2.12E-01  1.29E-01  6.50E-02  5.49E-01  3.62E-01  1.34E-02
 OM34
+        4.53E-03  7.59E-03 -7.55E-03 -6.49E-03  7.02E-02  1.00E-01  3.80E-01  2.92E-01 -7.89E-02  1.48E-01  3.33E-01  7.18E-01
          1.11E-02
 OM44
+        8.01E-03  3.41E-02 -2.06E-02 -8.70E-03  1.27E-01 -2.70E-02  2.95E-01  4.49E-01 -3.49E-02 -4.50E-02 -5.75E-02  3.40E-01
          7.16E-01  1.46E-02
 SG11
+       -6.57E-04  2.00E-02  9.81E-06  8.57E-03 -5.86E-02 -4.90E-02 -1.56E-01 -1.14E-01 -9.37E-02 -5.50E-02 -6.40E-02 -2.69E-01
         -2.28E-01 -1.48E-01  1.32E-03
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 #TBLN:      3
 #METH: Laplacian Conditional Estimation with Interaction
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
 #TERM:
0MINIMIZATION SUCCESSFUL
 HOWEVER, PROBLEMS OCCURRED WITH THE MINIMIZATION.
 REGARD THE RESULTS OF THE ESTIMATION STEP CAREFULLY, AND ACCEPT THEM ONLY
 AFTER CHECKING THAT THE COVARIANCE STEP PRODUCES REASONABLE OUTPUT.
 NO. OF FUNCTION EVALUATIONS USED:      470
 NO. OF SIG. DIGITS IN FINAL EST.:  3.1

 ETABAR IS THE ARITHMETIC MEAN OF THE ETA-ESTIMATES,
 AND THE P-VALUE IS GIVEN FOR THE NULL HYPOTHESIS THAT THE TRUE MEAN IS 0.

 ETABAR:         9.3627E-03  7.4786E-03  9.0091E-03  7.7814E-03
 SE:             2.3623E-02  2.9504E-02  1.9234E-02  2.6940E-02
 N:                     100         100         100         100

 P VAL.:         6.9185E-01  7.9990E-01  6.3949E-01  7.7271E-01

 ETAshrink(%):   1.6246E+00  5.8239E+00  1.6058E+01  5.3563E+00
 EBVshrink(%):   2.2488E+00  6.2751E+00  1.6963E+01  6.3502E+00
 EPSshrink(%):   4.0395E+01


 #TERE:
 Elapsed estimation time in seconds:    64.34
 Elapsed covariance time in seconds:    58.90

 ********************                LAPLACIAN CONDITIONAL ESTIMATION WITH INTERACTION               ********************
 #OBJT:**************                       MINIMUM VALUE OF OBJECTIVE FUNCTION                      ********************
 #OBJV:********************************************    -1640.378       **************************************************

 ********************                LAPLACIAN CONDITIONAL ESTIMATION WITH INTERACTION               ********************
 ********************                             FINAL PARAMETER ESTIMATE                           ********************

 THETA - VECTOR OF FIXED EFFECTS PARAMETERS   *********
         TH 1      TH 2      TH 3      TH 4
         1.68E+00  1.57E+00  7.87E-01  2.36E+00

 OMEGA - COV MATRIX FOR RANDOM EFFECTS - ETAS  ********
            ETA1      ETA2      ETA3      ETA4
 ETA1
+        5.82E-02
 ETA2
+        2.62E-02  9.91E-02
 ETA3
+        3.29E-03  3.37E-02  5.30E-02
 ETA4
+        2.09E-02 -1.08E-02  3.29E-02  8.18E-02

 SIGMA - COV MATRIX FOR RANDOM EFFECTS - EPSILONS  ****
            EPS1
 EPS1
+        9.63E-03

 OMEGA - CORR MATRIX FOR RANDOM EFFECTS - ETAS  *******
            ETA1      ETA2      ETA3      ETA4
 ETA1
+        2.41E-01
 ETA2
+        3.45E-01  3.15E-01
 ETA3
+        5.91E-02  4.65E-01  2.30E-01
 ETA4
+        3.03E-01 -1.20E-01  4.99E-01  2.86E-01

 SIGMA - CORR MATRIX FOR RANDOM EFFECTS - EPSILONS  ***
            EPS1
 EPS1
+        9.81E-02

 ********************                LAPLACIAN CONDITIONAL ESTIMATION WITH INTERACTION               ********************
 ********************                            STANDARD ERROR OF ESTIMATE                          ********************

 THETA - VECTOR OF FIXED EFFECTS PARAMETERS   *********
         TH 1      TH 2      TH 3      TH 4
         2.48E-02  3.39E-02  2.94E-02  3.14E-02

 OMEGA - COV MATRIX FOR RANDOM EFFECTS - ETAS  ********
            ETA1      ETA2      ETA3      ETA4
 ETA1
+        8.70E-03
 ETA2
+        8.95E-03  1.72E-02
 ETA3
+        7.02E-03  1.09E-02  1.27E-02
 ETA4
+        8.25E-03  1.08E-02  1.05E-02  1.40E-02

 SIGMA - COV MATRIX FOR RANDOM EFFECTS - EPSILONS  ****
            EPS1
 EPS1
+        1.29E-03

 OMEGA - CORR MATRIX FOR RANDOM EFFECTS - ETAS  *******
            ETA1      ETA2      ETA3      ETA4
 ETA1
+        1.80E-02
 ETA2
+        9.66E-02  2.73E-02
 ETA3
+        1.24E-01  1.16E-01  2.76E-02
 ETA4
+        1.01E-01  1.19E-01  9.70E-02  2.45E-02

 SIGMA - CORR MATRIX FOR RANDOM EFFECTS - EPSILONS  ***
            EPS1
 EPS1
+        6.56E-03

 ********************                LAPLACIAN CONDITIONAL ESTIMATION WITH INTERACTION               ********************
 ********************                          COVARIANCE MATRIX OF ESTIMATE                         ********************

            TH 1      TH 2      TH 3      TH 4      OM11      OM12      OM13      OM14      OM22      OM23      OM24      OM33
             OM34      OM44      SG11
 TH 1
+        6.15E-04
 TH 2
+        3.00E-04  1.15E-03
 TH 3
+        9.38E-05  3.59E-04  8.64E-04
 TH 4
+        2.64E-04 -7.78E-05  5.45E-04  9.87E-04
 OM11
+        1.02E-06  4.96E-07  3.02E-06  2.55E-06  7.57E-05
 OM12
+       -2.16E-07 -3.85E-06  2.15E-06  8.58E-07  3.76E-05  8.01E-05
 OM13
+        1.65E-06  1.63E-06 -9.84E-07  1.74E-06  1.35E-05  2.50E-05  4.93E-05
 OM14
+        2.30E-06  4.30E-06  4.01E-06  4.55E-06  3.39E-05  3.23E-06  3.43E-05  6.81E-05
 OM22
+       -6.72E-06 -8.19E-06 -3.97E-05 -3.03E-05  2.07E-05  7.38E-05  2.20E-05 -6.31E-06  2.96E-04
 OM23
+        2.35E-07 -1.02E-05  3.44E-05  1.51E-05  5.90E-06  2.20E-05  2.70E-05  1.43E-05  7.51E-05  1.19E-04
 OM24
+        3.36E-06 -2.58E-06  3.00E-05  1.88E-05  1.50E-05  2.51E-05  2.50E-05  2.83E-05 -3.38E-05  6.10E-05  1.18E-04
 OM33
+        1.21E-06 -1.41E-05  3.79E-05  1.56E-05  5.00E-06  7.02E-06  1.65E-05  1.30E-05  5.09E-06  7.59E-05  5.05E-05  1.62E-04
 OM34
+        1.62E-06  2.54E-06 -6.22E-08 -5.62E-07  7.64E-06  7.57E-06  2.58E-05  2.50E-05 -2.16E-05  1.39E-05  3.82E-05  9.37E-05
          1.10E-04
 OM44
+        2.80E-06  1.37E-05 -7.42E-06 -1.47E-06  1.66E-05 -6.63E-06  2.69E-05  5.42E-05 -1.38E-05 -1.01E-05 -8.61E-06  5.95E-05
          1.06E-04  1.97E-04
 SG11
+       -1.43E-07  5.97E-07 -3.53E-07  9.35E-08 -8.80E-07 -4.26E-07 -1.13E-06 -1.20E-06 -2.01E-06 -5.77E-07 -7.58E-07 -4.13E-06
         -2.77E-06 -2.65E-06  1.66E-06

 ********************                LAPLACIAN CONDITIONAL ESTIMATION WITH INTERACTION               ********************
 ********************                          CORRELATION MATRIX OF ESTIMATE                        ********************

            TH 1      TH 2      TH 3      TH 4      OM11      OM12      OM13      OM14      OM22      OM23      OM24      OM33
             OM34      OM44      SG11
 TH 1
+        2.48E-02
 TH 2
+        3.57E-01  3.39E-02
 TH 3
+        1.29E-01  3.60E-01  2.94E-02
 TH 4
+        3.38E-01 -7.31E-02  5.90E-01  3.14E-02
 OM11
+        4.75E-03  1.68E-03  1.18E-02  9.34E-03  8.70E-03
 OM12
+       -9.75E-04 -1.27E-02  8.16E-03  3.05E-03  4.83E-01  8.95E-03
 OM13
+        9.49E-03  6.86E-03 -4.76E-03  7.87E-03  2.21E-01  3.99E-01  7.02E-03
 OM14
+        1.12E-02  1.54E-02  1.65E-02  1.76E-02  4.72E-01  4.37E-02  5.92E-01  8.25E-03
 OM22
+       -1.58E-02 -1.40E-02 -7.85E-02 -5.62E-02  1.39E-01  4.79E-01  1.82E-01 -4.44E-02  1.72E-02
 OM23
+        8.68E-04 -2.76E-02  1.07E-01  4.41E-02  6.21E-02  2.25E-01  3.52E-01  1.59E-01  4.00E-01  1.09E-02
 OM24
+        1.25E-02 -7.02E-03  9.40E-02  5.53E-02  1.59E-01  2.58E-01  3.28E-01  3.16E-01 -1.81E-01  5.14E-01  1.08E-02
 OM33
+        3.84E-03 -3.26E-02  1.01E-01  3.91E-02  4.52E-02  6.16E-02  1.84E-01  1.24E-01  2.33E-02  5.46E-01  3.66E-01  1.27E-02
 OM34
+        6.22E-03  7.14E-03 -2.01E-04 -1.70E-03  8.35E-02  8.05E-02  3.49E-01  2.88E-01 -1.19E-01  1.21E-01  3.35E-01  7.01E-01
          1.05E-02
 OM44
+        8.05E-03  2.87E-02 -1.80E-02 -3.34E-03  1.36E-01 -5.28E-02  2.73E-01  4.68E-01 -5.72E-02 -6.62E-02 -5.66E-02  3.33E-01
          7.17E-01  1.40E-02
 SG11
+       -4.49E-03  1.37E-02 -9.33E-03  2.31E-03 -7.85E-02 -3.69E-02 -1.24E-01 -1.13E-01 -9.08E-02 -4.10E-02 -5.43E-02 -2.52E-01
         -2.05E-01 -1.46E-01  1.29E-03
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 #CPUT: Total CPU Time in Seconds,      339.812
