$PROB RUN# Example 1 (from samp5l)
$INPUT C SET ID JID TIME  DV=CONC AMT=DOSE RATE EVID MDV CMT SID
$DATA tdist_sim.csv IGNORE=C

$SUBROUTINES ADVAN3 TRANS4

$PK
MU_1=THETA(1)
MU_2=THETA(2)
MU_3=THETA(3)
MU_4=THETA(4)
NU=4.0
CLA=ETA(1)/SQRT(OMEGA(1,1))
V1A=ETA(2)/SQRT(OMEGA(2,2))
QQA=ETA(3)/SQRT(OMEGA(3,3))
V2A=ETA(4)/SQRT(OMEGA(4,4))
CLB=ETA(5)
V1B=ETA(6)
QQB=ETA(7)
V2B=ETA(8)
CLR=(CLA*CLA+CLB*CLB)/NU
V1R=(V1A*V1A+V1B*V1B)/NU
QQR=(QQA*QQA+QQB*QQB)/NU
V2R=(V2A*V2A+V2B*V2B)/NU
CL=EXP(MU_1+ETA(1)*SQRT((EXP(CLR)-1.0)/CLR))
V1=EXP(MU_2+ETA(2)*SQRT((EXP(V1R)-1.0)/V1R))
Q= EXP(MU_3+ETA(3)*SQRT((EXP(QQR)-1.0)/QQR))
V2=EXP(MU_4+ETA(4)*SQRT((EXP(V2R)-1.0)/V2R))
S1=V1

$ERROR
Y = F + F*EPS(1)

; Initial values of THETA
$THETA 1.68338E+00  1.58811E+00  8.12694E-01  2.37435E+00
;INITIAL values of OMEGA
$OMEGA BLOCK(4)
0.03
0.01  0.03
-0.006 0.01  0.03
0.01 -0.006  0.01 0.03

$OMEGA (1.0 FIXED) (1.0 FIXED) (1.0 FIXED) (1.0 FIXED)

$SIGMA
0.01

$SIMULATION (567811 NORMAL) (2933012 UNIFORM) ONLYSIMULATION SUBPROBLEMS=1
$TABLE  ID TIME CONC DOSE RATE EVID MDV CMT ETA1 ETA2 ETA3 ETA4 CL V1 Q V2
NOAPPEND ONEHEADER FILE=tdist6.csv  NOPRINT
