Mon 09/30/2013
03:05 PM
; Used for comparing single versus parallel computing for FOCE method.
;$SIZES LVR=30
;$SIZES LTH=15
;$SIZES LIM1=100
$PROB RUN# Example 1 (from samp5l)
$INPUT C SET ID JID TIME  DV=CONC AMT=DOSE RATE EVID MDV CMT CLX V1X QX V2X SDIX SDSX
$DATA example1.csv IGNORE=C

$SUBROUTINES ADVAN3 TRANS4

$THETAI
THETA=DLOG(THETAI)

$THETAR
THETAR=DEXP(THETA)

$PK
MU_1=THETA(1)
MU_2=THETA(2)
MU_3=THETA(3)
MU_4=THETA(4)
CL=DEXP(MU_1+ETA(1))
V1=DEXP(MU_2+ETA(2))
Q=DEXP(MU_3+ETA(3))
V2=DEXP(MU_4+ETA(4))
S1=V1

$ERROR
Y = F + F*EPS(1)

; Initial values of THETA
$THETA 7.389 7.389 7.389 7.389
;INITIAL values of OMEGA
$OMEGA BLOCK(4)
0.15   ;[P]
0.01  ;[F]
0.15   ;[P]
0.01  ;[F]
0.01  ;[F]
0.15   ;[P]
0.01  ;[F]
0.01  ;[F]
0.01  ;[F]
0.15   ;[P]
;Initial value of SIGMA
$SIGMA
(0.6 )   ;[P]

$PRIOR NWPRI NTHETA=4, NETA=4, NTHP=4, NETP=4
; Prior information of THETAS
$THETA (7.389 FIX) (7.389  FIX) (7.389  FIX) (7.389  FIX)

; Variance to prior information of THETAS.  Because variances are very large, this
; means that the prior information to the THETAS is highly uninformative.
$OMEGA BLOCK(4)
545973 FIX
0.00 545973
0.00  0.00 545973
0.00  0.00 0.0 545973

; Prior information to the OMEGAS.
$OMEGA BLOCK(4)
0.2 FIX
0.0  0.2
0.0  0.0 0.2
0.0  0.0 0.0 0.2
;Degrees of freedom to prior OMEGA matrix.  Because degrees of freedom is very low, equal to the
; the dimension of the prior OMEGA, this means that the prior information to the OMEGAS is
; highly uninformative
$THETA (4 FIX)

$EST METHOD=ITS INTERACTION NOABORT CTYPE=3 PRINT=5 NOPRIOR=1
$EST METHOD=BAYES INTERACTION NOABORT NBURN=200 NITER=500 CTYPE=3 PRINT=50 NOPRIOR=0
$EST METHOD=1 INTERACTION NSIG=3 SIGL=10 PRINT=1 NOABORT MAXEVAL=9999 NOPRIOR=1
$COV MATRIX=R PRINT=E UNCONDITIONAL

NM-TRAN MESSAGES
 WARNINGS AND ERRORS (IF ANY) FOR PROBLEM    1
 (WARNING  2) NM-TRAN INFERS THAT THE DATA ARE POPULATION.

1NONLINEAR MIXED EFFECTS MODEL PROGRAM (NONMEM) VERSION 7.3beta7.0(P)
 ORIGINALLY DEVELOPED BY STUART BEAL, LEWIS SHEINER, AND ALISON BOECKMANN
 CURRENT DEVELOPERS ARE ROBERT BAUER, ICON DEVELOPMENT SOLUTIONS,
 AND ALISON BOECKMANN. IMPLEMENTATION, EFFICIENCY, AND STANDARDIZATION
 PERFORMED BY NOUS INFOSYSTEMS.
 PROBLEM NO.:         1
 RUN# Example 1 (from samp5l)
 TOT. NO. OF OBS RECS:      500
 TOT. NO. OF INDIVIDUALS:    100
 TWO COMPARTMENT MODEL (ADVAN3)
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 #TBLN:      1
 #METH: Iterative Two Stage (No Prior)
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
 #TERM:
 OPTIMIZATION WAS NOT COMPLETED

 ETABAR IS THE ARITHMETIC MEAN OF THE ETA-ESTIMATES,
 AND THE P-VALUE IS GIVEN FOR THE NULL HYPOTHESIS THAT THE TRUE MEAN IS 0.

 ETABAR:         6.8463E-06 -5.9096E-06  1.5471E-05  1.8212E-05
 SE:             3.9032E-02  2.9091E-02  3.4975E-02  3.4027E-02
 N:                     100         100         100         100

 P VAL.:         9.9986E-01  9.9984E-01  9.9965E-01  9.9957E-01

 ETAshrink(%):   3.3133E+00  1.9640E+01  2.2889E+01  1.4543E+01
 EBVshrink(%):   3.3170E+00  1.9649E+01  2.2931E+01  1.4563E+01
 EPSshrink(%):   3.1638E+01


 #TERE:
 Elapsed estimation time in seconds:     4.73
 Elapsed covariance time in seconds:     0.09

 ********************                          ITERATIVE TWO STAGE (NO PRIOR)                        ********************
 #OBJT:**************                        FINAL VALUE OF OBJECTIVE FUNCTION                       ********************
 #OBJV:********************************************    -1120.320       **************************************************

 ********************                          ITERATIVE TWO STAGE (NO PRIOR)                        ********************
 ********************                             FINAL PARAMETER ESTIMATE                           ********************

 THETA - VECTOR OF FIXED EFFECTS PARAMETERS   *********
         TH 1      TH 2      TH 3      TH 4
         5.38E+00  4.90E+00  2.25E+00  1.07E+01

 OMEGA - COV MATRIX FOR RANDOM EFFECTS - ETAS  ********
            ETA1      ETA2      ETA3      ETA4
 ETA1
+        1.65E-01
 ETA2
+        3.95E-03  1.32E-01
 ETA3
+        4.91E-03  1.74E-02  2.08E-01
 ETA4
+       -1.64E-02  1.23E-02  4.96E-02  1.60E-01

 SIGMA - COV MATRIX FOR RANDOM EFFECTS - EPSILONS  ****
            EPS1
 EPS1
+        5.55E-02

 OMEGA - CORR MATRIX FOR RANDOM EFFECTS - ETAS  *******
            ETA1      ETA2      ETA3      ETA4
 ETA1
+        4.06E-01
 ETA2
+        2.68E-02  3.64E-01
 ETA3
+        2.66E-02  1.05E-01  4.56E-01
 ETA4
+       -1.01E-01  8.42E-02  2.72E-01  4.00E-01

 SIGMA - CORR MATRIX FOR RANDOM EFFECTS - EPSILONS  ***
            EPS1
 EPS1
+        2.36E-01

 ********************                          ITERATIVE TWO STAGE (NO PRIOR)                        ********************
 ********************                          STANDARD ERROR OF ESTIMATE (S)                        ********************

 THETA - VECTOR OF FIXED EFFECTS PARAMETERS   *********
         TH 1      TH 2      TH 3      TH 4
         2.48E-01  2.40E-01  1.46E-01  5.78E-01

 OMEGA - COV MATRIX FOR RANDOM EFFECTS - ETAS  ********
            ETA1      ETA2      ETA3      ETA4
 ETA1
+        2.89E-02
 ETA2
+        2.31E-02  3.48E-02
 ETA3
+        3.23E-02  3.80E-02  6.47E-02
 ETA4
+        2.76E-02  2.73E-02  4.51E-02  4.04E-02

 SIGMA - COV MATRIX FOR RANDOM EFFECTS - EPSILONS  ****
            EPS1
 EPS1
+        7.77E-03

 OMEGA - CORR MATRIX FOR RANDOM EFFECTS - ETAS  *******
            ETA1      ETA2      ETA3      ETA4
 ETA1
+        3.56E-02
 ETA2
+        1.54E-01  4.78E-02
 ETA3
+        1.73E-01  2.25E-01  7.10E-02
 ETA4
+        1.75E-01  1.82E-01  1.93E-01  5.05E-02

 SIGMA - CORR MATRIX FOR RANDOM EFFECTS - EPSILONS  ***
            EPS1
 EPS1
+        1.65E-02

 ********************                          ITERATIVE TWO STAGE (NO PRIOR)                        ********************
 ********************                        COVARIANCE MATRIX OF ESTIMATE (S)                       ********************

            TH 1      TH 2      TH 3      TH 4      OM11      OM12      OM13      OM14      OM22      OM23      OM24      OM33
             OM34      OM44      SG11
 TH 1
+        6.16E-02
 TH 2
+        9.59E-03  5.75E-02
 TH 3
+        4.33E-03  2.41E-03  2.15E-02
 TH 4
+       -1.81E-03  8.26E-03  3.87E-02  3.35E-01
 OM11
+       -1.31E-03  4.80E-04  1.78E-04 -8.70E-04  8.35E-04
 OM12
+        7.98E-05  8.67E-04  9.28E-05 -1.39E-03  3.09E-04  5.32E-04
 OM13
+       -8.77E-04  7.91E-06 -5.51E-04  2.49E-03  1.39E-04  2.40E-04  1.04E-03
 OM14
+       -9.51E-04 -1.04E-03  3.51E-04  1.94E-03  2.21E-04  1.82E-04  5.41E-04  7.62E-04
 OM22
+       -2.07E-04 -9.21E-05 -4.62E-04 -1.16E-03  1.39E-04  2.35E-04  8.49E-05  1.40E-04  1.21E-03
 OM23
+       -4.05E-04 -4.64E-04  1.47E-04  1.38E-03  1.88E-04  3.79E-05 -6.18E-05 -3.07E-05  2.82E-04  1.45E-03
 OM24
+       -1.39E-03 -5.09E-04  3.30E-04  1.71E-03  1.15E-04  8.57E-05  2.24E-05  9.11E-05  3.79E-04  5.81E-04  7.46E-04
 OM33
+       -1.74E-03 -1.61E-03 -3.83E-04  5.87E-03  2.24E-04  1.49E-04  8.01E-04  3.90E-04  5.49E-04  4.35E-04  4.07E-04  4.19E-03
 OM34
+       -1.07E-04 -4.47E-04  6.30E-04  3.06E-03  2.52E-04  1.18E-04  2.92E-04  2.22E-04  3.82E-04  3.69E-04  3.35E-04  2.19E-03
          2.03E-03
 OM44
+        1.71E-04 -8.02E-05  4.64E-04 -3.04E-03  2.71E-04  1.26E-04  6.72E-05  1.57E-04  3.27E-04  1.92E-04  2.29E-04  1.11E-03
          1.34E-03  1.64E-03
 SG11
+        2.45E-04  3.04E-04 -1.54E-05  2.74E-04 -6.03E-05 -4.30E-05 -5.85E-05 -7.99E-05 -8.09E-05  8.14E-06 -4.16E-05 -1.04E-04
         -1.13E-04 -1.20E-04  6.03E-05

 ********************                          ITERATIVE TWO STAGE (NO PRIOR)                        ********************
 ********************                        CORRELATION MATRIX OF ESTIMATE (S)                      ********************

            TH 1      TH 2      TH 3      TH 4      OM11      OM12      OM13      OM14      OM22      OM23      OM24      OM33
             OM34      OM44      SG11
 TH 1
+        2.48E-01
 TH 2
+        1.61E-01  2.40E-01
 TH 3
+        1.19E-01  6.85E-02  1.46E-01
 TH 4
+       -1.26E-02  5.96E-02  4.56E-01  5.78E-01
 OM11
+       -1.83E-01  6.93E-02  4.20E-02 -5.20E-02  2.89E-02
 OM12
+        1.39E-02  1.57E-01  2.75E-02 -1.05E-01  4.64E-01  2.31E-02
 OM13
+       -1.10E-01  1.02E-03 -1.17E-01  1.33E-01  1.49E-01  3.23E-01  3.23E-02
 OM14
+       -1.39E-01 -1.57E-01  8.67E-02  1.22E-01  2.77E-01  2.86E-01  6.08E-01  2.76E-02
 OM22
+       -2.40E-02 -1.10E-02 -9.07E-02 -5.76E-02  1.38E-01  2.93E-01  7.56E-02  1.46E-01  3.48E-02
 OM23
+       -4.29E-02 -5.08E-02  2.63E-02  6.26E-02  1.71E-01  4.32E-02 -5.04E-02 -2.93E-02  2.13E-01  3.80E-02
 OM24
+       -2.05E-01 -7.77E-02  8.26E-02  1.08E-01  1.46E-01  1.36E-01  2.54E-02  1.21E-01  3.99E-01  5.59E-01  2.73E-02
 OM33
+       -1.08E-01 -1.04E-01 -4.04E-02  1.57E-01  1.20E-01  1.00E-01  3.84E-01  2.18E-01  2.44E-01  1.77E-01  2.30E-01  6.47E-02
 OM34
+       -9.56E-03 -4.14E-02  9.53E-02  1.17E-01  1.94E-01  1.13E-01  2.01E-01  1.78E-01  2.43E-01  2.15E-01  2.72E-01  7.51E-01
          4.51E-02
 OM44
+        1.70E-02 -8.27E-03  7.84E-02 -1.30E-01  2.32E-01  1.36E-01  5.15E-02  1.41E-01  2.33E-01  1.25E-01  2.07E-01  4.24E-01
          7.32E-01  4.04E-02
 SG11
+        1.27E-01  1.63E-01 -1.35E-02  6.11E-02 -2.69E-01 -2.40E-01 -2.34E-01 -3.73E-01 -2.99E-01  2.75E-02 -1.96E-01 -2.06E-01
         -3.24E-01 -3.83E-01  7.77E-03
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
 ********************                          ITERATIVE TWO STAGE (NO PRIOR)                        ********************
 ********************                    EIGENVALUES OF COR MATRIX OF ESTIMATE (S)                   ********************

             1         2         3         4         5         6         7         8         9        10        11        12
             13        14        15
         1.28E-01  2.51E-01  3.18E-01  3.39E-01  4.51E-01  5.04E-01  6.13E-01  7.78E-01  9.48E-01  1.05E+00  1.37E+00  1.44E+00
          1.57E+00  1.75E+00  3.48E+00
 #TBLN:      2
 #METH: MCMC Bayesian Analysis
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
 #TERM:
 BURN-IN WAS NOT COMPLETED
 STATISTICAL PORTION WAS COMPLETED

 #TERE:
 Elapsed estimation time in seconds:    10.19
 Elapsed covariance time in seconds:     0.00

 ********************                              MCMC BAYESIAN ANALYSIS                            ********************
 #OBJT:**************                       AVERAGE VALUE OF LIKELIHOOD FUNCTION                     ********************
 #OBJV:********************************************    -2316.002       **************************************************
 #OBJS:********************************************       41.666 (STD) **************************************************

 ********************                              MCMC BAYESIAN ANALYSIS                            ********************
 ********************                             FINAL PARAMETER ESTIMATE                           ********************

 THETA - VECTOR OF FIXED EFFECTS PARAMETERS   *********
         TH 1      TH 2      TH 3      TH 4
         5.12E+00  4.72E+00  2.10E+00  1.04E+01

 OMEGA - COV MATRIX FOR RANDOM EFFECTS - ETAS  ********
            ETA1      ETA2      ETA3      ETA4
 ETA1
+        1.76E-01
 ETA2
+       -2.04E-03  1.49E-01
 ETA3
+        4.54E-03 -4.32E-03  1.77E-01
 ETA4
+       -2.23E-02  8.69E-03  3.21E-03  1.40E-01

 SIGMA - COV MATRIX FOR RANDOM EFFECTS - EPSILONS  ****
            EPS1
 EPS1
+        6.11E-02

 OMEGA - CORR MATRIX FOR RANDOM EFFECTS - ETAS  *******
            ETA1      ETA2      ETA3      ETA4
 ETA1
+        4.18E-01
 ETA2
+       -1.34E-02  3.83E-01
 ETA3
+        2.27E-02 -3.48E-02  4.17E-01
 ETA4
+       -1.47E-01  5.85E-02  1.09E-02  3.72E-01

 SIGMA - CORR MATRIX FOR RANDOM EFFECTS - EPSILONS  ***
            EPS1
 EPS1
+        2.47E-01

 ********************                              MCMC BAYESIAN ANALYSIS                            ********************
 ********************                STANDARD ERROR OF ESTIMATE (From Sample Variance)               ********************

 THETA - VECTOR OF FIXED EFFECTS PARAMETERS   *********
         TH 1      TH 2      TH 3      TH 4
         2.41E-01  2.75E-01  1.47E-01  5.55E-01

 OMEGA - COV MATRIX FOR RANDOM EFFECTS - ETAS  ********
            ETA1      ETA2      ETA3      ETA4
 ETA1
+        2.94E-02
 ETA2
+        2.36E-02  3.92E-02
 ETA3
+        2.58E-02  3.00E-02  5.02E-02
 ETA4
+        2.01E-02  2.10E-02  2.31E-02  3.20E-02

 SIGMA - COV MATRIX FOR RANDOM EFFECTS - EPSILONS  ****
            EPS1
 EPS1
+        7.19E-03

 OMEGA - CORR MATRIX FOR RANDOM EFFECTS - ETAS  *******
            ETA1      ETA2      ETA3      ETA4
 ETA1
+        3.46E-02
 ETA2
+        1.44E-01  4.93E-02
 ETA3
+        1.40E-01  1.84E-01  5.80E-02
 ETA4
+        1.25E-01  1.44E-01  1.46E-01  4.25E-02

 SIGMA - CORR MATRIX FOR RANDOM EFFECTS - EPSILONS  ***
            EPS1
 EPS1
+        1.46E-02

 ********************                              MCMC BAYESIAN ANALYSIS                            ********************
 ********************               COVARIANCE MATRIX OF ESTIMATE (From Sample Variance)             ********************

            TH 1      TH 2      TH 3      TH 4      OM11      OM12      OM13      OM14      OM22      OM23      OM24      OM33
             OM34      OM44      SG11
 TH 1
+        5.79E-02
 TH 2
+        1.48E-02  7.58E-02
 TH 3
+        8.63E-03  1.29E-02  2.16E-02
 TH 4
+        1.56E-02  5.44E-02  4.15E-02  3.08E-01
 OM11
+        7.82E-04  1.05E-03  3.93E-04  2.41E-03  8.62E-04
 OM12
+        8.87E-04  1.22E-03  7.59E-04  1.97E-03  1.08E-04  5.58E-04
 OM13
+       -1.91E-04  6.93E-04 -5.92E-04 -3.80E-04  1.33E-04 -9.58E-06  6.67E-04
 OM14
+        8.94E-05  1.19E-03  1.50E-04 -9.42E-05  1.75E-05  6.32E-05  1.23E-04  4.02E-04
 OM22
+       -1.58E-03 -2.28E-03 -2.58E-03 -8.46E-03 -2.38E-04 -7.59E-05 -4.55E-05 -2.21E-05  1.54E-03
 OM23
+       -2.87E-04  4.45E-05  6.16E-04 -4.33E-04 -6.52E-05  2.37E-05  1.56E-05 -3.89E-05 -1.26E-04  9.01E-04
 OM24
+       -7.92E-04 -1.33E-03 -4.90E-04 -2.27E-03 -1.01E-04 -7.36E-05 -5.65E-05 -6.27E-05  2.22E-04  8.02E-05  4.41E-04
 OM33
+       -9.67E-04 -1.90E-03 -1.12E-03 -3.37E-03 -1.07E-04 -1.06E-04  1.52E-04 -1.99E-04 -2.14E-05  5.63E-04  2.25E-04  2.52E-03
 OM34
+       -3.46E-04 -2.99E-04 -2.41E-04 -2.74E-03 -1.04E-05 -1.83E-05  1.53E-05  3.88E-05  7.59E-05  9.70E-05  5.94E-05  2.79E-04
          5.35E-04
 OM44
+       -3.63E-04  7.37E-04 -5.58E-04 -1.87E-03  3.50E-05  9.50E-05  3.68E-05  2.58E-05  2.26E-04 -2.29E-04  1.29E-05 -2.67E-04
          2.33E-04  1.02E-03
 SG11
+        1.68E-04  1.95E-04  2.90E-04  1.21E-03  2.53E-05  2.18E-06 -6.83E-07  3.36E-06 -9.49E-05  1.10E-05 -1.87E-05 -5.74E-05
         -4.47E-05 -6.83E-05  5.17E-05

 ********************                              MCMC BAYESIAN ANALYSIS                            ********************
 ********************              CORRELATION MATRIX OF ESTIMATE (From Sample Variance)             ********************

            TH 1      TH 2      TH 3      TH 4      OM11      OM12      OM13      OM14      OM22      OM23      OM24      OM33
             OM34      OM44      SG11
 TH 1
+        2.41E-01
 TH 2
+        2.23E-01  2.75E-01
 TH 3
+        2.44E-01  3.20E-01  1.47E-01
 TH 4
+        1.17E-01  3.56E-01  5.09E-01  5.55E-01
 OM11
+        1.11E-01  1.30E-01  9.13E-02  1.48E-01  2.94E-02
 OM12
+        1.56E-01  1.87E-01  2.19E-01  1.50E-01  1.56E-01  2.36E-02
 OM13
+       -3.07E-02  9.75E-02 -1.56E-01 -2.65E-02  1.76E-01 -1.57E-02  2.58E-02
 OM14
+        1.85E-02  2.16E-01  5.10E-02 -8.47E-03  2.97E-02  1.33E-01  2.37E-01  2.01E-02
 OM22
+       -1.67E-01 -2.11E-01 -4.48E-01 -3.89E-01 -2.07E-01 -8.19E-02 -4.49E-02 -2.81E-02  3.92E-02
 OM23
+       -3.97E-02  5.39E-03  1.40E-01 -2.60E-02 -7.40E-02  3.34E-02  2.02E-02 -6.46E-02 -1.07E-01  3.00E-02
 OM24
+       -1.57E-01 -2.31E-01 -1.59E-01 -1.95E-01 -1.64E-01 -1.48E-01 -1.04E-01 -1.49E-01  2.70E-01  1.27E-01  2.10E-02
 OM33
+       -8.00E-02 -1.38E-01 -1.52E-01 -1.21E-01 -7.24E-02 -8.98E-02  1.17E-01 -1.98E-01 -1.09E-02  3.73E-01  2.13E-01  5.02E-02
 OM34
+       -6.22E-02 -4.70E-02 -7.11E-02 -2.13E-01 -1.53E-02 -3.36E-02  2.56E-02  8.37E-02  8.36E-02  1.40E-01  1.22E-01  2.40E-01
          2.31E-02
 OM44
+       -4.72E-02  8.36E-02 -1.19E-01 -1.05E-01  3.72E-02  1.26E-01  4.45E-02  4.03E-02  1.80E-01 -2.38E-01  1.93E-02 -1.66E-01
          3.15E-01  3.20E-02
 SG11
+        9.72E-02  9.88E-02  2.74E-01  3.04E-01  1.20E-01  1.28E-02 -3.68E-03  2.33E-02 -3.37E-01  5.11E-02 -1.24E-01 -1.59E-01
         -2.69E-01 -2.97E-01  7.19E-03
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
 ********************                              MCMC BAYESIAN ANALYSIS                            ********************
 ********************           EIGENVALUES OF COR MATRIX OF ESTIMATE (From Sample Variance)         ********************

             1         2         3         4         5         6         7         8         9        10        11        12
             13        14        15
         3.61E-01  4.04E-01  4.97E-01  5.41E-01  6.15E-01  6.38E-01  7.91E-01  8.16E-01  8.79E-01  9.46E-01  1.03E+00  1.28E+00
          1.49E+00  1.79E+00  2.92E+00
 #TBLN:      3
 #METH: First Order Conditional Estimation with Interaction (No Prior)
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
 #TERM:
0MINIMIZATION SUCCESSFUL
 NO. OF FUNCTION EVALUATIONS USED:      524
 NO. OF SIG. DIGITS IN FINAL EST.:  3.1

 ETABAR IS THE ARITHMETIC MEAN OF THE ETA-ESTIMATES,
 AND THE P-VALUE IS GIVEN FOR THE NULL HYPOTHESIS THAT THE TRUE MEAN IS 0.

 ETABAR:        -3.2411E-07 -1.1914E-02 -3.5037E-03 -1.1570E-02
 SE:             3.9192E-02  2.8848E-02  3.2725E-02  3.3058E-02
 N:                     100         100         100         100

 P VAL.:         9.9999E-01  6.7961E-01  9.1474E-01  7.2634E-01

 ETAshrink(%):   3.0463E+00  2.0022E+01  2.4035E+01  1.4177E+01
 EBVshrink(%):   3.3162E+00  1.9863E+01  2.4454E+01  1.5064E+01
 EPSshrink(%):   3.0938E+01


 #TERE:
 Elapsed estimation time in seconds:    16.07
 Elapsed covariance time in seconds:     5.88

 ********************          FIRST ORDER CONDITIONAL ESTIMATION WITH INTERACTION (NO PRIOR)        ********************
 #OBJT:**************                       MINIMUM VALUE OF OBJECTIVE FUNCTION                      ********************
 #OBJV:********************************************    -1121.028       **************************************************

 ********************          FIRST ORDER CONDITIONAL ESTIMATION WITH INTERACTION (NO PRIOR)        ********************
 ********************                             FINAL PARAMETER ESTIMATE                           ********************

 THETA - VECTOR OF FIXED EFFECTS PARAMETERS   *********
         TH 1      TH 2      TH 3      TH 4
         5.40E+00  5.01E+00  2.27E+00  1.09E+01

 OMEGA - COV MATRIX FOR RANDOM EFFECTS - ETAS  ********
            ETA1      ETA2      ETA3      ETA4
 ETA1
+        1.65E-01
 ETA2
+       -7.38E-04  1.31E-01
 ETA3
+        1.24E-02  1.60E-02  1.87E-01
 ETA4
+       -1.28E-02  1.39E-02  3.32E-02  1.50E-01

 SIGMA - COV MATRIX FOR RANDOM EFFECTS - EPSILONS  ****
            EPS1
 EPS1
+        5.72E-02

 OMEGA - CORR MATRIX FOR RANDOM EFFECTS - ETAS  *******
            ETA1      ETA2      ETA3      ETA4
 ETA1
+        4.06E-01
 ETA2
+       -5.01E-03  3.63E-01
 ETA3
+        7.04E-02  1.02E-01  4.33E-01
 ETA4
+       -8.11E-02  9.91E-02  1.98E-01  3.87E-01

 SIGMA - CORR MATRIX FOR RANDOM EFFECTS - EPSILONS  ***
            EPS1
 EPS1
+        2.39E-01

 ********************          FIRST ORDER CONDITIONAL ESTIMATION WITH INTERACTION (NO PRIOR)        ********************
 ********************                            STANDARD ERROR OF ESTIMATE                          ********************

 THETA - VECTOR OF FIXED EFFECTS PARAMETERS   *********
         TH 1      TH 2      TH 3      TH 4
         2.34E-01  2.39E-01  1.60E-01  5.66E-01

 OMEGA - COV MATRIX FOR RANDOM EFFECTS - ETAS  ********
            ETA1      ETA2      ETA3      ETA4
 ETA1
+        2.72E-02
 ETA2
+        2.15E-02  3.16E-02
 ETA3
+        3.07E-02  3.54E-02  7.90E-02
 ETA4
+        2.40E-02  2.36E-02  4.67E-02  4.02E-02

 SIGMA - COV MATRIX FOR RANDOM EFFECTS - EPSILONS  ****
            EPS1
 EPS1
+        8.40E-03

 OMEGA - CORR MATRIX FOR RANDOM EFFECTS - ETAS  *******
            ETA1      ETA2      ETA3      ETA4
 ETA1
+        3.34E-02
 ETA2
+        1.46E-01  4.36E-02
 ETA3
+        1.66E-01  2.27E-01  9.12E-02
 ETA4
+        1.58E-01  1.63E-01  2.26E-01  5.19E-02

 SIGMA - CORR MATRIX FOR RANDOM EFFECTS - EPSILONS  ***
            EPS1
 EPS1
+        1.76E-02

 ********************          FIRST ORDER CONDITIONAL ESTIMATION WITH INTERACTION (NO PRIOR)        ********************
 ********************                          COVARIANCE MATRIX OF ESTIMATE                         ********************

            TH 1      TH 2      TH 3      TH 4      OM11      OM12      OM13      OM14      OM22      OM23      OM24      OM33
             OM34      OM44      SG11
 TH 1
+        5.46E-02
 TH 2
+        6.66E-03  5.74E-02
 TH 3
+        7.10E-03  2.67E-03  2.56E-02
 TH 4
+        1.44E-02  1.79E-02  4.89E-02  3.20E-01
 OM11
+        4.01E-04  6.96E-04  4.63E-04  1.84E-03  7.38E-04
 OM12
+        4.31E-04  6.56E-04  5.99E-04  1.90E-03  1.42E-04  4.61E-04
 OM13
+        6.10E-04  9.46E-04  1.02E-04  2.40E-03  2.82E-04  1.66E-04  9.41E-04
 OM14
+        5.12E-04  6.68E-04  5.47E-04  2.39E-03  1.54E-04  1.51E-04  4.39E-04  5.78E-04
 OM22
+       -1.43E-05  1.94E-04 -5.51E-04 -7.40E-04  2.53E-05  1.02E-04  1.16E-04  7.52E-05  9.99E-04
 OM23
+        3.01E-04  4.76E-04  1.89E-03  2.71E-03  6.16E-05  1.70E-04 -5.54E-05  2.57E-05 -4.58E-05  1.25E-03
 OM24
+        1.69E-04 -6.99E-05  7.18E-04  2.04E-03  4.11E-05  6.11E-05  6.03E-05  1.06E-04  1.45E-04  3.37E-04  5.55E-04
 OM33
+        1.42E-03  1.28E-04  2.13E-03  7.86E-03  3.84E-04  3.80E-04  1.13E-03  7.13E-04  4.19E-04  1.88E-05  2.79E-04  6.24E-03
 OM34
+        8.69E-04  3.61E-04  8.33E-04  3.55E-03  2.18E-04  2.26E-04  6.09E-04  4.74E-04  2.82E-04 -1.83E-05  2.39E-04  3.04E-03
          2.18E-03
 OM44
+        5.86E-04  7.07E-04  3.18E-04  2.55E-03  1.53E-04  1.60E-04  3.79E-04  3.12E-04  2.36E-04 -5.19E-06  2.64E-04  1.63E-03
          1.37E-03  1.62E-03
 SG11
+        2.49E-05  4.29E-05 -2.89E-05 -2.30E-04 -3.97E-05 -4.53E-05 -8.94E-05 -6.75E-05 -8.12E-05  1.29E-05 -3.05E-05 -3.92E-04
         -2.33E-04 -1.66E-04  7.05E-05

 ********************          FIRST ORDER CONDITIONAL ESTIMATION WITH INTERACTION (NO PRIOR)        ********************
 ********************                          CORRELATION MATRIX OF ESTIMATE                        ********************

            TH 1      TH 2      TH 3      TH 4      OM11      OM12      OM13      OM14      OM22      OM23      OM24      OM33
             OM34      OM44      SG11
 TH 1
+        4.32E-02
 TH 2
+        1.19E-01  4.78E-02
 TH 3
+        1.90E-01  6.98E-02  7.05E-02
 TH 4
+        1.09E-01  1.32E-01  5.40E-01  5.18E-02
 OM11
+        6.33E-02  1.07E-01  1.06E-01  1.19E-01  2.72E-02
 OM12
+        8.59E-02  1.28E-01  1.74E-01  1.56E-01  2.44E-01  2.15E-02
 OM13
+        8.52E-02  1.29E-01  2.07E-02  1.38E-01  3.39E-01  2.51E-01  3.07E-02
 OM14
+        9.11E-02  1.16E-01  1.42E-01  1.76E-01  2.36E-01  2.92E-01  5.95E-01  2.40E-02
 OM22
+       -1.94E-03  2.57E-02 -1.09E-01 -4.14E-02  2.95E-02  1.50E-01  1.20E-01  9.90E-02  3.16E-02
 OM23
+        3.65E-02  5.62E-02  3.33E-01  1.36E-01  6.41E-02  2.23E-01 -5.11E-02  3.02E-02 -4.09E-02  3.54E-02
 OM24
+        3.06E-02 -1.24E-02  1.91E-01  1.53E-01  6.42E-02  1.21E-01  8.34E-02  1.87E-01  1.94E-01  4.04E-01  2.36E-02
 OM33
+        7.71E-02  6.78E-03  1.69E-01  1.76E-01  1.79E-01  2.24E-01  4.66E-01  3.75E-01  1.68E-01  6.74E-03  1.50E-01  7.90E-02
 OM34
+        7.97E-02  3.22E-02  1.12E-01  1.34E-01  1.72E-01  2.25E-01  4.25E-01  4.22E-01  1.91E-01 -1.11E-02  2.17E-01  8.23E-01
          4.67E-02
 OM44
+        6.24E-02  7.34E-02  4.95E-02  1.12E-01  1.40E-01  1.85E-01  3.07E-01  3.22E-01  1.85E-01 -3.65E-03  2.78E-01  5.14E-01
          7.29E-01  4.02E-02
 SG11
+        1.27E-02  2.13E-02 -2.15E-02 -4.83E-02 -1.74E-01 -2.51E-01 -3.47E-01 -3.34E-01 -3.06E-01  4.33E-02 -1.54E-01 -5.91E-01
         -5.94E-01 -4.91E-01  8.40E-03
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
 ********************          FIRST ORDER CONDITIONAL ESTIMATION WITH INTERACTION (NO PRIOR)        ********************
 ********************                      EIGENVALUES OF COR MATRIX OF ESTIMATE                     ********************

             1         2         3         4         5         6         7         8         9        10        11        12
             13        14        15
         1.17E-01  3.27E-01  3.85E-01  4.27E-01  4.49E-01  5.66E-01  7.48E-01  8.03E-01  8.59E-01  8.77E-01  1.00E+00  1.16E+00
          1.35E+00  1.92E+00  4.00E+00
 #CPUT: Total CPU Time in Seconds,       36.676
