;; x1. Author: Sungpil Han
$PROB THEOPHYLLINE POPULATION DATA
$INPUT ID DOSE=AMT TIME CP=DV WT
$DATA THEOPP
$SUBROUTINES ADVAN2

$PK
;SCALING PARAMETER=VOLUME/WT SINCE DOSE IS WEIGHT-ADJUSTED
   CALLFL=1
   KA=THETA(1)+ETA(1)
   K=THETA(2)+ETA(2)
   CL=THETA(3)*WT+ETA(3)
   SC=CL/K/WT

$ERROR
   Y=F+EPS(1)

$THETA
  (.1,3,5) ; MEAN ABSORPTION RATE CONSTANT (1/HR)
  (.008,.08,.5) ; MEAN ELIMINATION RATE CONSTANT (1/HR)
  (.004,.04,.9) ; SLOPE OF CLEARANCE VS WEIGHT RELATIONSHIP (LITERS/HR/KG)
$OMEGA BLOCK(3)
6
.005 .0002
.3 .006 .4
$SIGMA  .4

$EST     MAXEVAL=450  PRINT=5
$COV
$TABLE          ID DOSE WT TIME
$SCAT           (RES WRES) VS TIME BY ID
